# Worksheet setting: ORIGIN = 1
EL := READPRN("EL.txt")
h_e := 1000
E := 210*10^3
dim := max(EL[:, 2], EL[:, 3])
d := 10  # mm
A := π*d^2/4 = 78.5398
EL = [1, 1, 2, 1; 2, 2, 3, 1; 3, 3, 4, 1; 4, 4, 5, 1; 5, 5, 6, 1; 6, 6, 7, 1; 7, 7, 8, 1]
N(x, h_e, i) :=
    R ← 1 - x/h_e if i == 1
    R ← x/h_e if i == 2
    return R
ρ := 7.8*10^-9
dN(x, h_e, i) :=
    R ← -1/h_e if i == 1
    R ← 1/h_e if i == 2
    return R
L := 6000
s := 0, 50 .. h_e
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W := [1, -1/sqrt(3); 1, 1/sqrt(3)]
BOUND(n) :=
    dim ← max(EL[:, 2], EL[:, 3])
    dim_red ← rows(n)
    for j ∈ 1 .. dim
        for i ∈ 1 .. dim - dim_red
            R[i, j] ← 0
    ind ← 1
    s ← 0
    for k ∈ 1 .. dim
        if k ≠ n[ind]
            1
            R[k - s, k] ← 1
        if k == n[ind]
            ind ← ind + 1 if ind ≠ rows(n)
            s ← s + 1
        S[k] ← s
    return R
K_el(E, A, h_e) :=
    for i ∈ 1 .. 2
        for j ∈ 1 .. 2
            R[i, j] ← 0
    for inte ∈ 1 .. rows(W)
        x_a ← 0
        x_b ← h_e
        x ← 1/2*(x_a + x_b + W[inte, 2]*(x_b - x_a))
        for i ∈ 1 .. 2
            for j ∈ 1 .. 2
                R[i, j] ← R[i, j] + E*A*W[inte, 1]*dN(x, h_e, i)*dN(x, h_e, j)*(x_b - x_a)/2
    return R
K_gl :=
    dim ← max(EL[:, 2], EL[:, 3])
    for i ∈ 1 .. dim
        for j ∈ 1 .. dim
            R[i, j] ← 0
    for el ∈ 1 .. max(EL[:, 1])
        Kel ← K_el(E, A, h_e)
        for i ∈ 1 .. 2
            for j ∈ 1 .. 2
                R[EL[el, i + 1], EL[el, j + 1]] ← R[EL[el, i + 1], EL[el, j + 1]] + Kel[i, j]
    return R
# Massimaatriksi arvutamine
M_el(ρ, A, h_e) :=
    for i ∈ 1 .. 2
        for j ∈ 1 .. 2
            R[i, j] ← 0
    for inte ∈ 1 .. rows(W)
        x_a ← 0
        x_b ← h_e
        x ← 1/2*(x_a + x_b + W[inte, 2]*(x_b - x_a))
        for i ∈ 1 .. 2
            for j ∈ 1 .. 2
                R[i, j] ← R[i, j] + ρ*A*W[inte, 1]*N(x, h_e, i)*N(x, h_e, j)*(x_b - x_a)/2
    return R  # Globaalne massimaatriks
M_gl :=
    dim ← max(EL[:, 2], EL[:, 3])
    for i ∈ 1 .. dim
        for j ∈ 1 .. dim
            R[i, j] ← 0
    for el ∈ 1 .. 6
        Mel ← M_el(ρ, A, h_e)
        for i ∈ 1 .. 2
            for j ∈ 1 .. 2
                R[EL[el, i + 1], EL[el, j + 1]] ← R[EL[el, i + 1], EL[el, j + 1]] + Mel[i, j]
    return R
M_gl = [
    0.000204204, 0.000102102, 0, 0, 0, 0, 0, 0;
    0.000102102, 0.000408407, 0.000102102, 0, 0, 0, 0, 0;
    0, 0.000102102, 0.000408407, 0.000102102, 0, 0, 0, 0;
    0, 0, 0.000102102, 0.000408407, 0.000102102, 0, 0, 0;
    0, 0, 0, 0.000102102, 0.000408407, 0.000102102, 0, 0;
    0, 0, 0, 0, 0.000102102, 0.000408407, 0.000102102, 0;
    0, 0, 0, 0, 0, 0.000102102, 0.000204204, 0;
    0, 0, 0, 0, 0, 0, 0, 0
]
K_gl = [
    16493.4, -16493.4, 0, 0, 0, 0, 0, 0;
    -16493.4, 32986.7, -16493.4, 0, 0, 0, 0, 0;
    0, -16493.4, 32986.7, -16493.4, 0, 0, 0, 0;
    0, 0, -16493.4, 32986.7, -16493.4, 0, 0, 0;
    0, 0, 0, -16493.4, 32986.7, -16493.4, 0, 0;
    0, 0, 0, 0, -16493.4, 32986.7, -16493.4, 0;
    0, 0, 0, 0, 0, -16493.4, 32986.7, -16493.4;
    0, 0, 0, 0, 0, 0, -16493.4, 16493.4
]
s := 0, 0.0001 .. 0.07
s1 := 0, 0.0001 .. 0.12
f_1(t) :=
    δ ← 0.1
    R ← sin(π*t/δ) if t ≤ δ
    R ← 0 otherwise
    return R*1000
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f_2(u) :=
    dist ← 100
    k ← 100*E*A/h_e
    R ← -k*(u[8, 1] - dist) if u[8, 1] ≥ dist
    R ← 0 if u[8, 1] ≥ dist
    return R
F_gl(t, u) :=
    ind ← max(EL[:, 2], EL[:, 3])
    for i ∈ 1 .. max(EL[:, 2], EL[:, 3])
        R[i, 1] ← 0
    R[1, 1] ← f_1(t)
    R[ind, 1] ← f_2(u)
    return R
INTE :=
    dim ← max(EL[:, 2], EL[:, 3])
    α ← 1/2
    γ ← 1/2
    β ← 1/2*γ
    for j ∈ 1 .. dim
        u_s0[j, 1] ← 0
        u_s1[j, 1] ← 0
        v_s0[j, 1] ← 0
        v_s1[j, 1] ← 0
        a_s0[j, 1] ← 0
        a_s1[j, 1] ← 0
    t_max ← 0.5
    t ← 0
    Δt ← 1/40*h_e*sqrt(ρ/E)
    Kk ← K_gl + 1/(β*Δt^2)*M_gl
    Kk_inv ← Kk^-1
    a_1 ← α*Δt
    a_2 ← (1 - α)*Δt
    a_3 ← 1/(β*Δt^2)
    a_4 ← a_3*Δt
    a_5 ← 1/γ - 1
    i ← 1
    T[i, 1] ← 1
    for j ∈ 1 .. dim
        RU[i, j] ← u_s0[j, 1]
        RV[i, j] ← v_s0[j, 1]
        RA[i, j] ← a_s0[j, 1]
    while t ≤ t_max
        i ← i + 1
        A ← a_3*u_s0 + a_4*v_s0 + a_5*a_s0
        Fk ← F_gl(t, u_s0) + M_gl*A
        u_s1 ← Kk_inv*Fk
        a_s1 ← a_3*(u_s1 - u_s0) - a_4*v_s0 - a_5*a_s0
        v_s1 ← v_s0 + a_2*a_s0 + a_1*a_s1
        t ← t + Δt
        u_s0 ← u_s1
        v_s0 ← v_s1
        a_s0 ← a_s1
        T[i, 1] ← t
        for j ∈ 1 .. dim
            RU[i, j] ← u_s0[j, 1]
            RV[i, j] ← v_s0[j, 1]
            RA[i, j] ← a_s0[j, 1]
    return [T, RU, RV, RA]
[T, RU, RV, RA] := INTE
T =  # no stored result
RU =  # no stored result
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n := [1]  # Ääretingimuste maatriks
U := BOUND(n) = [
    0, 1, 0, 0, 0, 0, 0, 0;
    0, 0, 1, 0, 0, 0, 0, 0;
    0, 0, 0, 1, 0, 0, 0, 0;
    0, 0, 0, 0, 1, 0, 0, 0;
    0, 0, 0, 0, 0, 1, 0, 0;
    0, 0, 0, 0, 0, 0, 1, 0;
    0, 0, 0, 0, 0, 0, 0, 1
]
K := U*K_gl*transpose(U)
M := U*M_gl*transpose(U)
K = [
    32986.7, -16493.4, 0, 0, 0, 0, 0;
    -16493.4, 32986.7, -16493.4, 0, 0, 0, 0;
    0, -16493.4, 32986.7, -16493.4, 0, 0, 0;
    0, 0, -16493.4, 32986.7, -16493.4, 0, 0;
    0, 0, 0, -16493.4, 32986.7, -16493.4, 0;
    0, 0, 0, 0, -16493.4, 32986.7, -16493.4;
    0, 0, 0, 0, 0, -16493.4, 16493.4
]
M = [
    0.000408407, 0.000102102, 0, 0, 0, 0, 0;
    0.000102102, 0.000408407, 0.000102102, 0, 0, 0, 0;
    0, 0.000102102, 0.000408407, 0.000102102, 0, 0, 0;
    0, 0, 0.000102102, 0.000408407, 0.000102102, 0, 0;
    0, 0, 0, 0.000102102, 0.000408407, 0.000102102, 0;
    0, 0, 0, 0, 0.000102102, 0.000204204, 0;
    0, 0, 0, 0, 0, 0, 0
]
Omaväärtused
OMAVÄÄRTUS := genvals(K, M)
Sagedus :=
    for i ∈ 1 .. rows(OMAVÄÄRTUS)
        R[i] ← (1/(2*π)*sqrt(OMAVÄÄRTUS[i]))
    return R
OMAVÄÄRTUS = [0; 0; 0; 0; 0; 0; 1.79769e308]
k := 1, 2 .. 4
((2*k - 1)/(2*2*π))*π/L*(E/ρ)^0.5 = [216.198; 648.593; 1080.99; 1513.38]
Sagedus = [0; 0; 0; 0; 0; 0; 2.13392e153]
σ(el, x) :=
    u_1 ← u[EL[el, 2]]
    u_2 ← u[EL[el, 3]]
    R ← E*u_1*dN(x, h_e, 1) + E*u_2*dN(x, h_e, 2)
    return R  # error: This variable is undefined.
U(el, x) :=
    u_1 ← u[EL[el, 2]]
    u_2 ← u[EL[el, 3]]
    R ← u_1*N(x, h_e, 1) + u_2*N(x, h_e, 2)
    return R  # error: This variable is undefined.
L := 6*h_e
s := 0, 0.1 .. h_e
C := A*ρ*4*π^2*8.33^2
s1 := 0, 500 .. L
u_a(x) := 1/(E*A)*(-C*x^3/6 + C*L^2/2*x)
σ_a(x) := 1/A*(-C*x^2/2 + C*L^2/2)
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