# Ülesanne 2
# a)
p == 0.6 % == 0.006
K == 5000
5000*0.006 == 30  # 1. aasta intress
5000 + 30 == 5030
5000 + 5000*0.006 == 5030
5000*(1 + 0.006)
# 1. aasta intress
5030 + 5030*0.006 == 5030*(1 + 0.006) == 5000*(1 + 0.006)*(1 + 0.006)
5000*(1 + 0.6 %/100)^2 == 5000*(1 + 0.006)^2 == 5060.18
# b)
(p2 == 0.6 %)*10 == 6 % == 0.06
S == A*(1 + p*%/100)^n
A := 5000
p := 6
n := 2
S := A*(1 + p/100)^n = 5618
5.618*10^3 - 5060.18 = 557.82
# Ülesanne 3
1 - sin(x)^2 == cos(x)^2
cos(x)^2 + sin(x)^2 == 1  # =>
sin(90 - x) == cos(x)
cos(x)^2/cos(x) == cos(x)
A(m, 0.5)
y == f(x) == cos(x)
arcsin(sin(x) == x)
f(m) == cos(m) == 0.5
arccos(cos(m)) == arccos(0.5)  # cos^-1
m == arccos(1/2) == cos^-1*0.5 == 60
sqrt(3)/2
# 180* - π rad
# 60* - x rad
x == 60*π/180 == π/3  # rad
A(60, 0.5)
# Ülesanne 4
x(x + 1) < 4*(1 + x)
2 < -4
x^2 + x < 4 + 4*x
x^2 - 3*x - 4 < 0
x^2 - 3*x - 4 == 0
(x - □)*(x - □)
m := -(-3)/2 = 1.5
d := sqrt(m^2 - (-4)) = 2.5
x1 := m + d = 4
x2 := m - d = -1
(x - 4)*(x + 1) < 0
x - 4 < 0 and x + 1 < 0
x < 4
x < -1
# Ülesanne 5 | Ülesanne 6
# 1) 6 inimest
# 2) 15
f(x) := (x^3 - 3*x^2)
# 3)
1/24 = 0.0416667
d/dx(f(x) == 3*x^2 - 6*x)
# 4)
1/16 = 0.0625
3*x^2 - 6*x == 0
x1 == 0
x2 == 2
d^2/dx^2(f(x) == d/dx(3*x^2 - 6*x)) == 6*x - 6
d^2/dx^2((f(2) == 6*2 - 6) == (6 > 0))  # min
d^2/dx^2((f(0) == 6*0 - 6) == (-6 < 0))  # max
# Miinimupunkti koordinaadid | Puutuja
y := (3^3 - 6*3) = 9
f(2) == 2^3 - 3*2^2 == -4
y == 3^3 - 3*3^2 + (3*3^2 - 6*3)*(x - 3)
y == 9*(x - 3) == 9*x - 27
k == 9
# ülesanne 7
a := (1860 + 220 + 40)/2 = 1060
Siinusteoreem
180 - 88.9 - α == β
x/sin(β) == 1860/sin(88.9) == 1520/sin(α)
1520*sin(1.55159770502)/1860 = 0.817054
sin(α) == 0.817
0.956*180/π = 54.7748
α := asin(0.817) = 0.956189
180 - 88.9 - 54.775 = 36.325
x/sin(36.325) == 1860/sin(88.9) == 1520/sin(54.775)
x := 1860*sin(0.633990850787)/sin(1.55159770502) = 1102  # ~1100 km
