# LOGARITMID
log(10, 2) = 3.32193
log(3, 3) = 1
log(10, 10) = 1
log(0.1) = -1
log(10) = 1
log(9, 3) = 2
log(100) = 2
log(27, 3) = 3
log(1000) = 3
log(10000) = 4
log(100000) = 5
a := 100
b := 1000
log(a*b) = 5
log(100*1000) == log(100) + log(1000) == 2 + 3 == 5
n := 3
log(a*b) == log(a) + log(b)
a := 1000
log(1000^3) == log(1000*1000*1000) == 9
log(a^n) == n*log(a)
log(a^n) = 9
log(a, b) == 1/log(b, a)
log(10, 1000) == 1/log(1000, 10) == 1/3 == 0.333
b := 10
a := 1000
log(b, a) = 0.333333
log(a, b) == c
# =>
b^log(a, b) == b^c
# =>
a == b^c
a == b^c
# =>
log(a, b) == log(b^c, b)
# =>
log(a, b) == c*log(b, b)  # =>
# =>
log(a, b) == c*1
log(1024, 1024) = 1
# 26.
# g)
log(x, 4) == 3
# j)
ln(x) == log(x, e)
4^log(x, 4) == 4^3
log(2*x + 3, e) == ln(2*x + 3) == 2
x == 4^3
e^ln(2*x + 3) == e^2
x := 4^3 = 64
2*x + 3 == e^2
log(x, 4) = 3
2*x == e^2 - 3
x := (e^2 - 3)/2 = 2.19453
ln(2*x + 3) = 2
log(a, b) == c
# =>
b^log(a, b) == b^c
# =>
a == b^c
# l)
log(log(x)) == 1
# i)
ln(x + 3) == 0
e^ln(x + 3) == e^0
10^log(log(x)) == 10^1
x + 3 == 1
log(x) == 10
x := 1 - 3 = -2
10^log(x) == 10^10
ln(x + 3) = 0
ln(1) == 0
x := 10^10 = 10000000000
log(log(x)) = 1
s := -5 .. 5
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i := sqrt(-1)
e^(i*θ) == cos(θ) + i*sin(θ)
ln(-1) = 3.14159i
e^(i*45) == sqrt(2)/2 + i*sqrt(2)/2
ln(-i) = -1.5708i
e^(i*π) == cos(π) + i*sin(π)
i^2 == -1
e^(i*π) == -1
e^(i*π) + 1 == 0
π/2 = 1.5708
ln(e^(i*π)) == ln(-1)
ln(-1) == i*π*ln(e) == π*i
# a)
log(2*x - 1) + log(2*x + 1) == 2
log(a*b) == log(a) + log(b)
log((2*x - 1)*(2*x + 1)) == 2
log(a, b) == c  # =>
b^log(a, b) == b^c  # =>
a == b^c
log(4*x^2 - 1) == 2
10^log(4*x^2 - 1) == 10^2
4*x^2 - 1 == 100
4*x^2 == 101
x == sqrt(101/4) == sqrt(101/2^2) == sqrt(101)/sqrt(2^2)
x := sqrt(101)/2 = 5.02494
log(a/b) == log(a) - log(b)
# c)
log(x)^2 - 2*log(x) == 3
a ← log(x)
a^2 - 2*a - 3 == 0
b := -2
c := -3
m := -b/2 = 1
d := (m^2 - c) = 4
a == m + sqrt(d)
a1 := m + sqrt(d) = 3
a2 := m - sqrt(d) = -1
log(x) == 3
log(x) == -1
10^x == 10^3
10^log(x) == 10^-1
x2 := 1/10
x1 := 10^3 = 1000
vp1 := log(x1)^2 - 2*log(x1) = 3
vp2 := log(x2)^2 - 2*log(x2) = 3
pp1 := 3
pp2 := 3
vp == pp
log(a, b) == c  # =>
b^log(a, b) == b^c  # =>
a == b^c
# e)
log(2*x, x) == 2
x^log(2*x, x) == x^2
2*x == x^2
x^2 - 2*x == 0
x*(x - 2) == 0
x == 0
x - 2 == 0
x1 := 0  # x1 on väärlahend
x2 := 2
log(2, 2) = 1
log(4, 2) = 2
log(2*x2, x2) = 2
log(8, 2) = 3
log(a/b) == log(a) - log(b)
# g)
1 - log(x + 3, 5) == log(2, 5)
# b)
log(2*x - 1) - log(2*x + 1) == 2
1 == log(x + 3, 5) + log(2, 5)
log(2*(x + 3), 5) == 1
log((2*x - 1)/(2*x + 1)) == 2
5^log(2*(x + 3), 5) == 5^1
2*(x + 3) == 5
10^log((2*x - 1)/(2*x + 1)) == 10^2
2*x == 5 - 6
(2*x - 1)/(2*x + 1) == 100
x := -1/2
(2*x - 1) == 100*(2*x + 1)
2*x - 1 == 200*x + 100
# d)
ln(x)^2 - 4*ln(x) - 5 == 0
198*x == -101
η ← ln(x)
x := -101/198
η^2 - 4*η - 5 == 0
b := -4
c := -5
log(2*x - 1) - log(2*x + 1) = 2
m := -b/2 = 2
log(a*b) == log(a) + log(b)
d := (m^2 - c) = 9
# f)
log(x) + log(2) - log(4) == log(1/4)
a == m + sqrt(d)
η1 := m + sqrt(d) = 5
η2 := m - sqrt(d) = -1
log(x) + log(2) == log(4) + log(1/4)
ln(x1) == 5
ln(x2) == -1
log(2*x) == log(4*1/4)
x1 := e^5 = 148.413
x2 := 1/e = 0.367879
log(2*x) == log(1)
pp1 == pp2 == 0
2*x == 1
vp1 := ln(x1)^2 - 4*ln(x1) - 5 = 0
x := 1/2
vp2 := ln(x2)^2 - 4*ln(x2) - 5 = 0
# h)
log(x^2 - 8*x, 3) == 2 + log(1, 5)
log(x^2 - 8*x, 3) == 2
x^2 - 8*x - 9 == 0
b := -8
c := -9
m := -b/2 = 4
d := (m^2 - c) = 25
a == m + sqrt(d)
x1 := m + sqrt(d) = 9
x2 := m - sqrt(d) = -1
vp1 := log(x1^2 - 8*x1, 3) = 2
vp2 := log(x2^2 - 8*x2, 3) = 2
pp1 := 2 + log(1, 5) = 2
pp2 := 2 + log(1, 5) = 2
ln(2 - 3i) = 1.28247 - 0.982794i
ln(-2) = 0.693147 + 3.14159i
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# Viimane valem jäi vaatamata, kuid on ülimalt tähtis omadus logaritmide arvutamise puhul.
#
# Sisuliselt väidetakse seda, et kui sul on olemas ükskõik, mis algusega logaritm (nt log(x,e), log(x,10), log(x,2) jne), siis on võimalik tema väärtuste alusel arvutada välja mistahes väärtuse ja alusega logaritm.
#
# Antud programmis on default funktsioonid log(x) = log(x,10) ning ln(x)=log(x,e). Kasutades ainult nende alustega logaritme, arvutame välja mõned suvalised logaritmid.
# Näide 1:
Kui
log(78, 63) = 1.05155  # siis
log(78, 63) == log(78)/log(63) == ln(78)/ln(63)
sest
log(78)/log(63) = 1.05155  # ning
ln(78)/ln(63) = 1.05155
log(78) = 1.89209
ln(78) = 4.35671
log(63) = 1.79934
ln(63) = 4.14313
# Näide 2: Ei pea olema ainult alusega 10 ja e. Lubatud on mistahes arvud, niikaua kui valemist kinni pead.
Kui
log(8, 24) = 0.654313  # siis
log(8, 24) == log(8, 47)/log(24, 47) == log(8, 53)/log(24, 53)
sest
log(8, 47)/log(24, 47) = 0.654313  # ning
log(8, 53)/log(24, 53) = 0.654313
log(8, 47) = 0.540094
log(8, 53) = 0.52375
log(24, 47) = 0.825437
log(24, 53) = 0.800458
