# Ülesanne kiiruse valemi kohta
# Tallinnast Viljandisse  on ligikaudu 160 km. Üheaegselt alustasid sõitu Tallinnast Viljandisse BMW i8 ja Mazda RX Vision. BMW keskmine kiirus oli 10 km/h suurem kui Mazdal ja jõudis Viljandisse 2 min varem kui Mazda. Leia autode keskmised kiirused (km/h) ja aeg, mis kummagil autol kulus vahemaa läbimiseks (min).
# Lahendus:
s := 160  # Kogu teepikkus, mille autod peavad läbima
# Olgu aeg, millega BMW antud teepikkuse läbis t_1 ja Mazda t_2.
# Kui BMW jõudis Viljandisse varem kui Mazda, siis t1 < t2, sest BMW oli kiirem ja seega kulus tal vähem aega. Ülesande lahendamiseks soovime leida seost, kus mõlemad pooled on võrdsed, ehk BMW ajale tuleb juurde liita mingi tundmat ajahulk t ehk t1 + t = t2 või Mazda ajast maha lahutada mingi tundmatu t ehk t1 = t2 - t. See tundmatu t on teksti põhjal suurus 2 min ehk t = 2. Kumb kirjapilt algselt valida on täiesti meeldevaldne. Antud juhul valin esimese t1 + t = t2.
# Vaatame nüüd sarnast seost kiirusega. Olgu kiirus, millega BMW antud teepikkuse läbis v_1 ja Mazda v_2
# Kui BMW jõudis Viljandisse varem kui Mazda, siis v1 > v2, sest BMW keskmine kiirus oli küllap suurem kui ta varem kohale jõudis. Ülesande lahendamiseks soovime leida seost, kus mõlemad pooled on võrdsed, ehk BMW kiirusest tuleb maha lahutada mingi tundmat kiirusehulk v ehk v1 - v = v2 või Mazda ajale juurde liita mingi tundmatu v ehk v1 = v2 + v. See tundmatu v on teksti põhjal suurus 10 km/h ehk v = 10. Kumb kirjapilt algselt valida on täiesti meeldevaldne. Antud juhul valin teise v1 = v2 + v.
# Kirjutame antud seosed välja. | Kasutame antud juhul meile teadatuntud kiiruse valemit:
# t1 + 2min = t2
(1)
v == s/t  # (3)
# v1 = v2 + 10km/h | (2)
# Asendame valemi (3) valemisse (2). Samas on lubatud (3) valemit muuta kujule t = s/v ja asendada esimesse. Valik on jällegi meelevaldne.
t1 + 2 == t2  # (1)
s1/t1 == s2/t2 + 10  # (2)
# Kuna teepikkused, mille mõlemad autod läbivad on samad siis s1 = s2 = s = 160km.
t1 + 2 == t2  # (1)
160/t1 == 160/t2 + 10  # (2)
# Järgmiseks on vaja aeg t = 2 min vaja teisendada kas tundidesse või keskmine kiirus v = 10 km/h vaja teisendada sellisesse dimesiooni, mis sisaldab minuteid. Näiteks km/min või m/min. Kuna II variant mulle ei meeldi ja reeglina kiirust niimoodi ei avaldata, siis valin I variandi ja teisendan minutid tundidesse ehk
t == 2 min == 2*1/60*h == 2/60*h == 0.033h
# Peale teisendust avaldan (1) seosest t1 ja asendan valemisse (2).
# |
# |
# |
# |
# |
# |
# |
# |
# |
# |
# |
# |
# |
# Tuletuskäik:
t1 == t2 - 1/30  # (1)
# =>
160/(t2 - 1/30) == 160/t2 + 10  # (4)
160 == (t2 - 1/30)*(160/t2 + 10)
160/t1 == 160/t2 + 10  # (2)
160 == 160 + 10*t2 - 16/(3*t2) - 1/3
# Lihtsustan avaldist (4).
160*t2 == 160*t2 + 10*t2^2 - 16/3 - 1/3*t2
# Saame:
10*t2^2 - 1/3*t2 - 16/3 == 0
10*t2^2 - 1/3*t2 - 16/3 == 0  # (5)
D := (-1/3)^2 - 4*10*(-16/3) = 213.444
# Ruutvõrrandis ruutjuure all olev avaldis ehk diskriminant
# D = b^2 - 4ac. Kirjutasin eraldi paremaks arvutamiseks välja.
sqrt(D) = 14.6097
t2_1 := (-(-1/3) + sqrt(D))/(2*10) = 0.747154  # h
aeg2 := t2_1*60 = 44.8292  # min
# Ehk Mazda läbis 160 km ajaga
aeg2 = 44.8292  # min.
t2_2 := (-(-1/3) - sqrt(D))/(2*10) = -0.71382  # h  # Negatiivset aega me antud ülesande puhul kasutada ei saa. Seega see on väärlahend.
# Kontroll:
10*t2_1^2 - 1/3*t2_1 - 16/3 = -8.88178e-16
# Avaldame kontrolli jaoks t1 :
t1 := t2_1 - 1/30 = 0.71382  # h
aeg1 := t1*60 = 42.8292  # min
# Ehk BMW läbis 160 km ajaga
aeg1 = 42.8292  # min.
# Kontrollime seose (2) vasakut ja paremat poolt:
vp := 160/t1 = 224.146
# =>
vp == pp
# Klapivad :)
#
# Kui vastused siin ei klapiks, on viga seostes (1) või (2). Kui need on korras, siis võib olla viga (4) võrdusest t2 avaldamises nagu mul algselt.
pp := 160/t2_1 + 10 = 224.146
# Vaatame huvi pärast, mis oli kummagi auto kesmine kiirus:
v1 := 160/t2_1 + 10 = 224.146  # km/h  # Ehk BMW keskmine kiirus oli ca 224.146 km/h.
v2 := v1 - 10 = 214.146  # km/h  # Ehk Mazda keskmine kiirus oli ca 214.146 km/h.
# Järeldus: Tüübid sõitsid ikka päris kiiresti, kui BMW keskmine kiirus oli
v1 = 224.146  # km/h
# ja 160 km läbimiseks kulus tal
t1 = 0.71382  # tundi ehk ligikaudu
aeg1 = 42.8292  # minutit. Samas Mazda ei teinud ka väga pahasti. Tema keskmine kiirus oli
v2 = 214.146  # km/h
# ja aeg, mis tal kulus antud teekonna jaoks oli
t2_1 = 0.747154  # tundi
# ehk ligikaudu
aeg2 = 44.8292  # minutit.
