i := sqrt(-1)
E := [0; 220; 220]
Z := [1, -1, -1; 0, 8 - 6*i, 0; 0, 0, 3 + 4*i]
I := Z^-1*E
I = [44 - 22i; 17.6 + 13.2i; 26.4 - 35.2i]
Z^-1 = [1, 0.08 + 0.06i, 0.12 - 0.16i; 0, 0.08 + 0.06i, 0; 0, 0, 0.12 - 0.16i]
|Z| = 48 + 14i
18 + 24 = 42
adj(Z) := [48 + 14i, -(-3 - 4i), 8 - 6i; 0, 3 + 4i, 0; 0, 0, 8 - 6i]
(8 - 6i)*(3 + 4i) = 48 + 14i
8*3 + 24 = 48
32i - 18i = 14i
adj(Z) = [48 + 14i, 3 + 4i, 8 - 6i; 0, 3 + 4i, 0; 0, 0, 8 - 6i]
Z_1 := 1/|Z|*adj(Z) = [1, 0.08 + 0.06i, 0.12 - 0.16i; 0, 0.08 + 0.06i, 0; 0, 0, 0.12 - 0.16i]
a := (3 + 4i)*(48 - 14i)*1/(48^2 + 14^2) = 0.08 + 0.06i
b := (8 - 6i)*(48 - 14i)*1/(48^2 + 14^2) = 0.12 - 0.16i
1*0 + a*220 + b*220 = 44 - 22i
I = [44 - 22i; 17.6 + 13.2i; 26.4 - 35.2i]
a*220 = 17.6 + 13.2i
I[0] = 44 - 22i
b*220 = 26.4 - 35.2i
I[1] = 17.6 + 13.2i
U_v := I[2]*4i - I[1]*12i = 299.2 - 105.6i
I[2] = 26.4 - 35.2i
i_0 := sqrt(44^2 + (-22)^2) = 49.1935
u_v := sqrt(299.2^2 + (-105.6)^2) = 317.289
arg(U_v)*180/π = -19.44
i_1 := sqrt(17.6^2 + 13.2^2) = 22
arg(I[0])*180/π = -26.5651
i_0 := sqrt(26.4^2 + (-35.2)^2) = 44
arg(I[1])*180/π = 36.8699
arg(I[2])*180/π = -53.1301
