# Worksheet setting: ORIGIN = 1
# Näide
EL := READPRN("Euleri_tala_siirded.txt")
E := 210000  # MPa
h_e := 1000
q := 4
U_FEMAP := READPRN("FEM_labipaine.txt")
σ_FEMAP := READPRN("FEM_Pinge.txt")
s := 0, 50 .. h_e
EL = [
    1, 1, 2, 750, 4033000, 210000;
    2, 2, 3, 750, 4033000, 210000;
    3, 3, 4, 750, 4033000, 210000;
    4, 4, 5, 750, 4033000, 210000;
    5, 5, 6, 750, 4033000, 210000;
    6, 6, 7, 750, 4033000, 210000;
    7, 7, 8, 750, 4033000, 210000;
    8, 8, 9, 750, 4033000, 210000
]
I := 150^3*80/12 - (150 - 2*20)^3*(80 - 8)/12
U_FEMAP = [
    0, 0, 1;
    1000, -32.3559, 2;
    2000, -57.6874, 3;
    3000, -70.2171, 4;
    4000, -66.5722, 5;
    5000, -50.7099, 6;
    6000, -28.9922, 7;
    7000, -9.09338, 8;
    8000, 0, 9
]
σ_FEMAP = [
    500, 0, 1;
    1500, -111.664, 2;
    2500, -202.659, 3;
    3500, -272.984, 4;
    4500, -193.453, 5;
    5500, -93.2531, 6;
    6500, 27.6168, 7;
    7500, 169.156, 8
]
W := [-sqrt(3/5), 5/9; 0, 8/9; sqrt(3/5), 5/9]
I = 14514000
# Vt. ϕ.1-4 5.loeng
ϕ(i, h_e, x) :=
    R ← 2*x^3/h_e^3 - 3*x^2/h_e^2 + 1 if i == 1
    R ← 2*x^2/h_e - x^3/h_e^2 - x if i == 2
    R ← 3*x^2/h_e^2 - 2*x^3/h_e^3 if i == 3
    R ← x^2/h_e - x^3/h_e^2 if i == 4
    return R
ddϕ(i, h_e, x) :=
    R ← 12*x/h_e^3 - 6/h_e^2 if i == 1
    R ← 4/h_e - 6*x/h_e^2 if i == 2
    R ← 6/h_e^2 - 12*x/h_e^3 if i == 3
    R ← 2/h_e - 6*x/h_e^2 if i == 4
    return R
dddϕ(i, h_e, x) :=
    R ← 12/h_e^3 if i == 1
    R ← -6/h_e^2 if i == 2
    R ← -12/h_e^3 if i == 3
    R ← -6/h_e^2 if i == 4
    return R
2*max(EL[:, 2], EL[:, 3]) = 18
dim := 2*max(EL[:, 2], EL[:, 3])
dim = 18
W = [-0.774597, 0.555556; 0, 0.888889; 0.774597, 0.555556]
rows(EL) = 8
ddϕ(1, 1000, 200) = -3.6e-6
Dim := max(EL[:, 2], EL[:, 3])
Dim = 9
h_e = 1000
K_el(E, I, h_e) :=
    for i ∈ 1 .. 4
        for j ∈ 1 .. 4
            R[i, j] ← 0
    for inte ∈ 1 .. rows(W)
        x_a ← 0
        x_b ← h_e
        x ← 1/2*(x_a + x_b + W[inte, 1]*(x_b - x_a))
        for i ∈ 1 .. 4
            for j ∈ 1 .. 4
                R[i, j] ← R[i, j] + E*I*W[inte, 2]*ddϕ(i, h_e, x)*ddϕ(j, h_e, x)*(x_b - x_a)/2
    return R
T(θ) := [cos(θ), sin(θ), 0, 0; -sin(θ), cos(θ), 0, 0; 0, 0, cos(θ), sin(θ); 0, 0, -sin(θ), cos(θ)]
F_el(h_e) :=
    for i ∈ 1 .. 4
        R[i] ← 0
    for inte ∈ 1 .. rows(W)
        x_a ← 0
        x_b ← h_e
        x ← 1/2*(x_a + x_b + W[inte, 1]*(x_b - x_a))
        for i ∈ 1 .. 4
            R[i] ← R[i] + W[inte, 2]*ϕ(i, h_e, x)*q*(x_b - x_a)/2
    return R
E = 210000
K_el(E, I, h_e) = [
    36575.3, -18287640, -36575.3, -18287640;
    -18287640, 1.21918e10, 18287640, 6.09588e9;
    -36575.3, 18287640, 36575.3, 18287640;
    -18287640, 6.09588e9, 18287640, 1.21918e10
]
I = 14514000  # //Vastused klapivad, seega korras.
F_el(h_e) = [2000; -333333; 2000; 333333]
q*h_e/12*[6; -h_e; 6; h_e] = [2000; -333333; 2000; 333333]
2*E*I/h_e^3*2*h_e^2 = 12191760000
K_gl :=
    dim ← 2*max(EL[:, 2], EL[:, 3])
    for i ∈ 1 .. dim
        for j ∈ 1 .. dim
            R[i, j] ← 0
    for el_n ∈ 1 .. rows(EL)
        K ← K_el(E, I, h_e)
        for i ∈ 1 .. 2
            for j ∈ 1 .. 2
                for i2 ∈ 1 .. 2
                    for j2 ∈ 1 .. 2
                        Ι ← (2*(EL[el_n, i + 1] - 1) + i2)
                        Γ ← (2*(EL[el_n, j + 1] - 1) + j2)
                        R[Ι, Γ] ← R[Ι, Γ] + K[2*(i - 1) + i2, 2*(j - 1) + j2]
    return R
K_gl = [
    36575.3, -18287640, -36575.3, -18287640, 0, 0, 0, 0, 0, 0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;
    -18287640, 1.21918e10, 18287640, 6.09588e9, 0, 0, 0, 0, 0, 0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;
    -36575.3, 18287640, 73150.6, 0, -36575.3, -18287640, 0, 0, 0, 0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;
    -18287640, 6.09588e9, 0, 24383520000, 18287640, 6.09588e9, 0, 0, 0, 0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;
    0, 0, -36575.3, 18287640, 73150.6, 0, -36575.3, -18287640, 0, 0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;
    0, 0, -18287640, 6.09588e9, 0, 24383520000, 18287640, 6.09588e9, 0, 0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;
    0, 0, 0, 0, -36575.3, 18287640, 73150.6, 0, -36575.3, -18287640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;
    0, 0, 0, 0, -18287640, 6.09588e9, 0, 24383520000, 18287640, 6.09588e9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;
    0, 0, 0, 0, 0, 0, -36575.3, 18287640, 73150.6, 0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;
    0, 0, 0, 0, 0, 0, -18287640, 6.09588e9, 0, 24383520000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;
    0, 0, 0, 0, 0, 0, 0, 0, -36575.3, 18287640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;
    0, 0, 0, 0, 0, 0, 0, 0, -18287640, 6.09588e9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;
    0, 0, 0, 0, 0, 0, 0, 0, 0, 0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;
    0, 0, 0, 0, 0, 0, 0, 0, 0, 0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;
    0, 0, 0, 0, 0, 0, 0, 0, 0, 0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;
    0, 0, 0, 0, 0, 0, 0, 0, 0, 0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;
    0, 0, 0, 0, 0, 0, 0, 0, 0, 0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;
    0, 0, 0, 0, 0, 0, 0, 0, 0, 0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]
F1_gl :=
    dim ← 2*max(EL[:, 2], EL[:, 3])
    for i ∈ 1 .. dim
        R[i] ← 0
    for el_n ∈ 1 .. rows(EL)
        F ← F_el(h_e)
        for i ∈ 1 .. 2
            for i2 ∈ 1 .. 2
                Ι ← 2*(EL[el_n, i + 1] - 1) + i2
                R[Ι] ← R[Ι] + F[2*(i - 1) + i2]
    return R
F2_gl :=
    dim ← 2*max(EL[:, 2], EL[:, 3])
    for i ∈ 1 .. dim
        R[i] ← 0
    R[7] ← 25*10^3
    return R
F_gl := F1_gl + F2_gl
F_gl = [2000; -333333; 4000; 0; 4000; 0; 29000; 0; 4000; 0; 4000; 0; 4000; 0; 4000; 0; 2000; 333333]
n := [1; 17; 18]
BOUND(n) :=
    dim ← 2*max(EL[:, 2], EL[:, 3])
    dim_red ← rows(n)
    for j ∈ 1 .. dim
        for i ∈ 1 .. dim - dim_red
            R[i, j] ← 0
    ind ← 1
    s ← 0
    for k ∈ 1 .. dim
        if k ≠ n[ind]
            1
            R[k - s, k] ← 1
        if k == n[ind]
            ind ← ind + 1 if ind ≠ rows(n)
            s ← s + 1
        S[k] ← s
    return R
U := BOUND(n)
U = [
    0, 1, 0, 0, 0, 0, 0, 0, 0, 0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;
    0, 0, 1, 0, 0, 0, 0, 0, 0, 0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;
    0, 0, 0, 1, 0, 0, 0, 0, 0, 0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;
    0, 0, 0, 0, 1, 0, 0, 0, 0, 0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;
    0, 0, 0, 0, 0, 1, 0, 0, 0, 0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;
    0, 0, 0, 0, 0, 0, 1, 0, 0, 0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;
    0, 0, 0, 0, 0, 0, 0, 1, 0, 0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;
    0, 0, 0, 0, 0, 0, 0, 0, 1, 0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;
    0, 0, 0, 0, 0, 0, 0, 0, 0, 1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;
    0, 0, 0, 0, 0, 0, 0, 0, 0, 0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;
    0, 0, 0, 0, 0, 0, 0, 0, 0, 0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;
    0, 0, 0, 0, 0, 0, 0, 0, 0, 0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;
    0, 0, 0, 0, 0, 0, 0, 0, 0, 0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;
    0, 0, 0, 0, 0, 0, 0, 0, 0, 0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;
    0, 0, 0, 0, 0, 0, 0, 0, 0, 0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]
U*K_gl*transpose(U) = [
    1.21918e10, 18287640, 6.09588e9, 0, 0, 0, 0, 0, 0, 0, 0, 0, 0, 0, 0;
    18287640, 73150.6, 0, -36575.3, -18287640, 0, 0, 0, 0, 0, 0, 0, 0, 0, 0;
    6.09588e9, 0, 24383520000, 18287640, 6.09588e9, 0, 0, 0, 0, 0, 0, 0, 0, 0, 0;
    0, -36575.3, 18287640, 73150.6, 0, -36575.3, -18287640, 0, 0, 0, 0, 0, 0, 0, 0;
    0, -18287640, 6.09588e9, 0, 24383520000, 18287640, 6.09588e9, 0, 0, 0, 0, 0, 0, 0, 0;
    0, 0, 0, -36575.3, 18287640, 73150.6, 0, -36575.3, -18287640, 0, 0, 0, 0, 0, 0;
    0, 0, 0, -18287640, 6.09588e9, 0, 24383520000, 18287640, 6.09588e9, 0, 0, 0, 0, 0, 0;
    0, 0, 0, 0, 0, -36575.3, 18287640, 73150.6, 0, -36575.3, -18287640, 0, 0, 0, 0;
    0, 0, 0, 0, 0, -18287640, 6.09588e9, 0, 24383520000, 18287640, 6.09588e9, 0, 0, 0, 0;
    0, 0, 0, 0, 0, 0, 0, -36575.3, 18287640, 73150.6, 0, -36575.3, -18287640, 0, 0;
    0, 0, 0, 0, 0, 0, 0, -18287640, 6.09588e9, 0, 24383520000, 18287640, 6.09588e9, 0, 0;
    0, 0, 0, 0, 0, 0, 0, 0, 0, -36575.3, 18287640, 73150.6, 0, -36575.3, -18287640;
    0, 0, 0, 0, 0, 0, 0, 0, 0, -18287640, 6.09588e9, 0, 24383520000, 18287640, 6.09588e9;
    0, 0, 0, 0, 0, 0, 0, 0, 0, 0, 0, -36575.3, 18287640, 73150.6, 0;
    0, 0, 0, 0, 0, 0, 0, 0, 0, 0, 0, -18287640, 6.09588e9, 0, 24383520000
]
U*F_gl = [-333333; 4000; 0; 4000; 0; 29000; 0; 4000; 0; 4000; 0; 4000; 0; 4000; 0]
V := (U*K_gl*transpose(U))^-1*U*F_gl
Υ := transpose(U)*V
ddϕ(i, h_e, x)
σ_MC :=
    h ← 150
    N_el ← max(EL[:, 1])
    for i_el ∈ 1 .. N_el
        for j ∈ 1 .. 4
            ue[j] ← Υ[(i_el - 1)*2 + j]
        for i ∈ 1 .. 6
            R[(i_el - 1)*6 + i, 1] ← (i_el - 1)*h_e + (i - 1)/5*h_e
            SUM ← 0
            for j ∈ 1 .. 4
                x ← (i - 1)/5*h_e
                SUM ← SUM + ue[j]*ddϕ(j, h_e, x)
            R[(i_el - 1)*6 + i, 2] ← -E*SUM*h/2
        1
    return R
V = [-0.0332226; 31.9869; -0.0295704; 56.9976; -0.0194887; 69.2586; -0.0042899; 65.6762; 0.0106125; 49.9369; 0.0198051; 28.4067; 0.0219754; 8.76419; 0.0158112]
Υ = [0; -0.0332226; 31.9869; -0.0295704; 56.9976; -0.0194887; 69.2586; -0.0042899; 65.6762; 0.0106125; 49.9369; 0.0198051; 28.4067; 0.0219754; 8.76419; 0.0158112; 0; 0]
σ_MC = [
    0, 1.72247;
    200, 24.0423;
    400, 46.3622;
    600, 68.682;
    800, 91.0018;
    1000, 113.322;
    1000, 113.322;
    1200, 131.508;
    1400, 149.693;
    1600, 167.879
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]
U_MC :=
    N_solm ← max(EL[:, 2], EL[:, 3])
    for i ∈ 1 .. N_solm
        R[i] ← Υ[2*i - 1]
    return R
X :=
    N_solm ← max(EL[:, 2], EL[:, 3])
    for i ∈ 1 .. N_solm
        R[i] ← h_e*(i - 1)
    return R
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T_MC :=
    h ← 150
    N_el ← max(EL[:, 1])
    for i_el ∈ 1 .. N_el
        for i ∈ 1 .. 4
            ue[i] ← Υ[(i_el - 1)*2 + i]
        for i ∈ 1 .. 6
            R[(i_el - 1)*2 + i, 1] ← (i_el - 1)*h_e + (i - 1)/5*h_e
            SUM ← 0
            for j ∈ 1 .. 4
                x ← (i - 1)/5*h_e
                SUM ← SUM + ue[j]*dddϕ(x, h_e, j)
            R[(i_el - 1)*6 + i, 2] ← -E*SUM*h/2
        1
    return R
Q_MC :=
    h ← 150
    N_el ← max(EL[:, 1])
    for i_el ∈ 1 .. N_el
        for i ∈ 1 .. 4
            ue[i] ← Υ[(i_el - 1)*2 + i]
        for i ∈ 1 .. 6
            R[(i_el - 1)*2 + i, 1] ← (i_el - 1)*h_e + (i - 1)/5*h_e
            SUM ← 0
            for j ∈ 1 .. 4
                x ← (i - 1)/5*h_e
                SUM ← SUM + ue[j]*ddϕ(x, h_e, j)
            R[(i_el - 1)*6 + i, 2] ← -E*SUM*h/2
        1
    return R
T_MC = [
    0, 0;
    200, 0;
    1000, 0;
    1200, 0;
    2000, 0;
    2200, 0;
    3000, 0;
    3200, 0;
    4000, 0;
    4200, 0
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]
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