# Worksheet setting: ORIGIN = 1
# KODUTÖÖ 2
# Lähteülesandeks on leida sõrestiku sõlmede siirded ja sisejõud varrastes.
# Ülesannet kirjeldav joonis on toodud allpool. Tegemist on kraana konstruktsiooniga.
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# Defineerin ülesande lahendamiseks tarvilikud lähteandmed, mis on meie jaoks teada.
E := 12000  # MPa
A := 7500  # mm^2  # ehk valima vabalt ristlõike 150x50mm
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# Loen sisse maatriksi, mis sisaldab informatsiooni iga sõrestikus paikneva elemendi kohta.
# Esimeses veerus on elemendi numbrid, mis ülemisel joonisel on tähistatud roheliste numbritega, veergudes 2 ja 3 on tähistatud sõlmpunktid, millega antud element on seotud. 4 veerg on elemendi pikkus. 5 veerg on elemendi siirdevektori nurk elemendi ja globaalse koordinaattelje vahel. 6 veerg on ristlõikepindala. 7 veerg on elastsusmoodul. Nurk θ on positiivne juhul kui keeratakse x-teljelt y-teljele vastupäeva.
EL := READPRN("abomination.txt")
EL = [
    1, 1, 3, 3000, 0, 7500, 12000;
    2, 1, 2, 3088.69, 60.9454, 7500, 12000;
    3, 2, 3, 3088.69, -60.9454, 7500, 12000;
    4, 2, 4, 3000, 0, 7500, 12000;
    5, 3, 4, 3088.69, 60.9454, 7500, 12000;
    6, 3, 5, 3000, 0, 7500, 12000;
    7, 4, 5, 3088.69, -60.9454, 7500, 12000;
    8, 4, 6, 3000, 0, 7500, 12000;
    9, 5, 6, 3088.69, 60.9454, 7500, 12000;
    10, 5, 7, 3000, 0, 7500, 12000;
    11, 6, 7, 3088.69, -60.9454, 7500, 12000;
    12, 6, 8, 3000, 0, 7500, 12000;
    13, 7, 8, 3088.69, 60.9454, 7500, 12000;
    14, 7, 9, 3000, 0, 7500, 12000;
    15, 8, 9, 3088.69, -60.9454, 7500, 12000;
    16, 8, 10, 3000, 0, 7500, 12000;
    17, 9, 10, 3088.69, 60.9454, 7500, 12000;
    18, 9, 11, 3000, 0, 7500, 12000;
    19, 10, 11, 3088.69, -60.9454, 7500, 12000;
    20, 10, 12, 3000, 0, 7500, 12000;
    21, 11, 12, 3088.69, 60.9454, 7500, 12000;
    22, 11, 13, 3000, 0, 7500, 12000;
    23, 12, 13, 3088.69, -60.9454, 7500, 12000
]
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# Polaarkoordinaadid ja elemendi pikkused on leitavad ülaltoodud teooria alusel.
# Võtame kasutusele kaalufunktsioonid, mis kirjeldavad talale mõjuvate jõudude osakaalu.
# W ise on kuuppolünoomi "kaalu" maatriks. Oluline aproksimeerimisel.
N(i, h_e, x) :=
    R ← 1 - x/h_e if i == 1
    R ← x/h_e if i == 2
    return R
dN(i, h_e, x) :=
    R ← -1/h_e if i == 1
    R ← 1/h_e if i == 2
    return R
W := [-sqrt(3/5), 5/9; 0, 8/9; sqrt(3/5), 5/9]
# Määrame maatriksi maksimaalsed vabadusastmete dimensioonid.
2*max(EL[:, 2], EL[:, 3]) = 26
dim := 2*max(EL[:, 2], EL[:, 3])
dim = 26
rows(EL) = 23
# Võtame kasutusele abistava maatriksi BU, mis aitab lõppvastuse saada õigetes dimensioonides ja kujus.
BU := [1, 0, 0, 0; 0, 0, 1, 0]
# Siinkohal monteerime kokku elementide kaupa iga elemendi jäikusmaatriksi.
K_el(el) :=
    for i ∈ 1 .. 2
        for j ∈ 1 .. 2
            R[i, j] ← 0
    for i ∈ 1 .. 2
        for j ∈ 1 .. 2
            x_a ← 0
            h_e ← EL[el, 4]
            E ← EL[el, 7]
            A ← EL[el, 6]
            x_b ← h_e
            for i_int ∈ 1 .. rows(W)
                ξ ← W[i_int, 1]
                kaal ← W[i_int, 2]
                x ← 1/2*(x_a + x_b + ξ*(x_b - x_a))
                R[i, j] ← R[i, j] + kaal*E*A*dN(i, h_e, x)*dN(j, h_e, x)*(x_b - x_a)/2
    return transpose(BU)*R*BU
# Elemendi jäikusmaatriksite väljaarvutamise tulemusel väljastatakse iga elemendi kohta iseseisev jäikusmaatriks.
# Siinkohal moodustatakse kõikidest eelnevalt koostatud elemendi jäikusmaatriksitest globaalne jäikusmaatriks, mis kajastab informatsiooni kõikide elementide jäikuse kohta.
# Defineerin teisendusmaatriksi, et oleks elemendipõhised suurused viia globaalsesse tasandisse.
T(θ) := [cos(θ), sin(θ), 0, 0; -sin(θ), cos(θ), 0, 0; 0, 0, cos(θ), sin(θ); 0, 0, -sin(θ), cos(θ)]
K_gl :=
    dim ← 2*max(EL[:, 2], EL[:, 3])
    for i ∈ 1 .. dim
        for j ∈ 1 .. dim
            R[i, j] ← 0
    for el_n ∈ 1 .. rows(EL)
        θ ← EL[el_n, 4]*π/180
        T_el(el_n) ← T(θ)
        K ← transpose(T_el(el_n))*K_el(el_n)*T_el(el_n)
        n1 ← EL[el_n, 1]
        n2 ← EL[el_n, 2]
        for i ∈ 1 .. 2
            for j ∈ 1 .. 2
                for i2 ∈ 1 .. 2
                    for j2 ∈ 1 .. 2
                        Ι ← (2*(EL[el_n, i + 1] - 1) + i2)
                        Γ ← (2*(EL[el_n, j + 1] - 1) + j2)
                        R[Ι, Γ] ← R[Ι, Γ] + K[2*(i - 1) + i2, 2*(j - 1) + j2]
    return R
# Kuvan globaalse jäikusmaatriksi Kgl
K_gl =  # no stored result
# Loon globaalse jõuvektori Fgl, mis kirjeldab erinevates punktides rakendatud jõude - lihtsustusena omakaalu arvesse võetud ei ole.
F_gl :=
    Dim ← 2*max(EL[:, 2], EL[:, 3])
    el_max ← rows(EL)
    for i ∈ 1 .. Dim
        R[i, 1] ← 0
    R[22, 1] ← -5000
    R[26, 1] ← -20000
    return R
F_gl = [0; 0; 0; 0; 0; 0; 0; 0; 0; 0; 0; 0; 0; 0; 0; 0; 0; 0; 0; 0; 0; -5000; 0; 0; 0; -20000]
n := [2; 9; 10]  # Defineerin kinnised vabadusastmed sõlmedes.
BOUND(n) :=
    dim ← 2*max(EL[:, 2], EL[:, 3])
    dim_red ← rows(n)
    for j ∈ 1 .. dim
        for i ∈ 1 .. dim - dim_red
            R[i, j] ← 0
    ind ← 1
    s ← 0
    for k ∈ 1 .. dim
        if k ≠ n[ind]
            1
            R[k - s, k] ← 1
        if k == n[ind]
            ind ← ind + 1 if ind ≠ rows(n)
            s ← s + 1
        S[k] ← s
    return R
# Kuna süsteemis on kolm vabadusastet, mis tuleb ära kaotada, siis seda saame teha kasutades U maatriksit.
# Kasutades BOUND funktsiooni piiran vastavate vabadusastmete kasutuse.
U := BOUND(n)
U = [
    1, 0, 0, 0, 0, 0, 0, 0, 0, 0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;
    0, 0, 1, 0, 0, 0, 0, 0, 0, 0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;
    0, 0, 0, 1, 0, 0, 0, 0, 0, 0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;
    0, 0, 0, 0, 1, 0, 0, 0, 0, 0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;
    0, 0, 0, 0, 0, 1, 0, 0, 0, 0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;
    0, 0, 0, 0, 0, 0, 1, 0, 0, 0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;
    0, 0, 0, 0, 0, 0, 0, 1, 0, 0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;
    0, 0, 0, 0, 0, 0, 0, 0, 0, 0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;
    0, 0, 0, 0, 0, 0, 0, 0, 0, 0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;
    0, 0, 0, 0, 0, 0, 0, 0, 0, 0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;
    0, 0, 0, 0, 0, 0, 0, 0, 0, 0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;
    0, 0, 0, 0, 0, 0, 0, 0, 0, 0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;
    0, 0, 0, 0, 0, 0, 0, 0, 0, 0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;
    0, 0, 0, 0, 0, 0, 0, 0, 0, 0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;
    0, 0, 0, 0, 0, 0, 0, 0, 0, 0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;
    0, 0, 0, 0, 0, 0, 0, 0, 0, 0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;
    0, 0, 0, 0, 0, 0, 0, 0, 0, 0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;
    0, 0, 0, 0, 0, 0, 0, 0, 0, 0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;
    0, 0, 0, 0, 0, 0, 0, 0, 0, 0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;
    0, 0, 0, 0, 0, 0, 0, 0, 0, 0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;
    0, 0, 0, 0, 0, 0, 0, 0, 0, 0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;
    0, 0, 0, 0, 0, 0, 0, 0, 0, 0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;
    0, 0, 0, 0, 0, 0, 0, 0, 0, 0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]
# Sellest tulenevalt U maatriksi mõõtmed on 23x26.
U*F_gl = [0; 0; 0; 0; 0; 0; 0; 0; 0; 0; 0; 0; 0; 0; 0; 0; 0; 0; -5000; 0; 0; 0; -20000]
U*K_gl*transpose(U) = [
    29923.5, -22423.5, -12270.9, -7500, 12990.4, 0, 0, 0, 0, 0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;
    -22423.5, 52347, 11551.5, -22423.5, -12270.9, -7500, 12990.4, 0, 0, 0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;
    -12270.9, 11551.5, 35930.2, -12270.9, -6715.09, 12990.4, -22500, 0, 0, 0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;
    -7500, -22423.5, -12270.9, 59847, -1438.91, -22423.5, -12270.9, 0, 0, 0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;
    12990.4, -12270.9, -6715.09, -1438.91, 58430.2, -12270.9, -6715.09, 0, 0, 0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;
    0, -7500, 12990.4, -22423.5, -12270.9, 59847, -1438.91, -7500, 12990.4, 0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;
    0, 12990.4, -22500, -12270.9, -6715.09, -1438.91, 58430.2, 12990.4, -22500, 0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;
    0, 0, 0, 0, 0, -7500, 12990.4, 59847, -1438.91, -22423.5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;
    0, 0, 0, 0, 0, 12990.4, -22500, -1438.91, 58430.2, -12270.9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;
    0, 0, 0, 0, 0, 0, 0, -22423.5, -12270.9, 59847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;
    0, 0, 0, 0, 0, 0, 0, -12270.9, -6715.09, -1438.91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;
    0, 0, 0, 0, 0, 0, 0, -7500, 12990.4, -22423.5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;
    0, 0, 0, 0, 0, 0, 0, 12990.4, -22500, -12270.9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;
    0, 0, 0, 0, 0, 0, 0, 0, 0, -7500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;
    0, 0, 0, 0, 0, 0, 0, 0, 0, 12990.4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;
    0, 0, 0, 0, 0, 0, 0, 0, 0, 0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;
    0, 0, 0, 0, 0, 0, 0, 0, 0, 0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;
    0, 0, 0, 0, 0, 0, 0, 0, 0, 0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;
    0, 0, 0, 0, 0, 0, 0, 0, 0, 0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;
    0, 0, 0, 0, 0, 0, 0, 0, 0, 0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;
    0, 0, 0, 0, 0, 0, 0, 0, 0, 0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;
    0, 0, 0, 0, 0, 0, 0, 0, 0, 0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;
    0, 0, 0, 0, 0, 0, 0, 0, 0, 0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]
# Peale U*K_gl*transpose(U) jääb meile sümmeetriline maatriks 23x23, mis on tehtud globaalse maatriksi alusel
# Seejärel on meil võimalik leida lahendustevektor V.
V := (U*K_gl*transpose(U))^-1*U*F_gl
# Kui korrutame lahenduste vektori V omakorda transponeeritud U maatriksiga, siis saame laiendatud lahenduste vektori γ, kus on näha välja jäetud vabadusastmetega elemendid..
Υ := transpose(U)*V
V = [0; -0.485839; 0.894251; 0; 0; -0.485839; 0.894251; -0.86535; 0.687826; -0.392293; -1.07083; -1.61007; 0.255901; -0.784585; -2.14167; -2.35478; -0.15695; -1.17688; -3.2125; -3.02993; -0.55306; -1.49071; -4.06917]
Υ = [0; 0; -0.485839; 0.894251; 0; 0; -0.485839; 0.894251; 0; 0; -0.86535; 0.687826; -0.392293; -1.07083; -1.61007; 0.255901; -0.784585; -2.14167; -2.35478; -0.15695; -1.17688; -3.2125; -3.02993; -0.55306; -1.49071; -4.06917]
# Kontrollin osaliselt vahetulemusi.
# Koostame koodi, mis võtab vastavale sõlmele õiged siirded.
W(el_n) :=
    for i ∈ 1 .. 2
        for i_v ∈ 1 .. 2
            u_el_g[(i - 1)*2 + i_v] ← Υ[(EL[el_n, 1 + i] - 1)*2 + i_v]
    return u_el_g
Υ = [0; 0; -0.485839; 0.894251; 0; 0; -0.485839; 0.894251; 0; 0; -0.86535; 0.687826; -0.392293; -1.07083; -1.61007; 0.255901; -0.784585; -2.14167; -2.35478; -0.15695; -1.17688; -3.2125; -3.02993; -0.55306; -1.49071; -4.06917]
W(1) = [3.8182e-17; 0; 1.2493e-16; 2.51617e-17]
W(2) = [0; 0; -0.485839; 0.894251]
W(3) = [-0.485839; 0.894251; 0; 0]
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σ_a := 20*10^6  # Pa  # Vastus, millest pinged ei tohi üheski talas üle minna.
N := σ_a*A*10^-6
N = 150000  # Vastus, millest sisejõud ei tohi üheski talas üle minna.
# Arvutan sisejõud talades.
N :=
    for i ∈ 1 .. rows(EL)
        for j ∈ 1
            R[i, j] ← 0
    for el_n ∈ 1 .. rows(EL)
        for i ∈ 1 .. 2
            for i_v ∈ 1 .. 2
                u_el_g[(i - 1)*2 + i_v] ← Υ[(EL[el_n, 1 + i] - 1)*2 + i_v]
        E ← 12000
        A ← 7500
        θ ← EL[el_n, 5]*π/180
        Te ← T(θ)
        h_e ← EL[el_n, 4]
        x ← h_e/2
        dϕ1_dϕ2 ← [dN(1, h_e, x), dN(2, h_e, x)]
        R[el_n, 1] ← el_n
        R[el_n, 2] ← E*A*dϕ1_dϕ2*BU*Te*u_el_g
        R[el_n, 3] ← R[el_n, 2]/A
    return R
N = [
    1, 0, 0;
    2, 15903, 2.1204;
    3, 29653.2, 3.95376;
    4, 0, 0;
    5, 15903, 2.1204;
    6, 0, 0;
    7, 29653.2, 3.95376;
    8, -11385.3, -1.51804;
    9, 5274.58, 0.703277;
    10, -11768.8, -1.56917;
    11, 51490.3, 6.86537;
    12, -22341.5, -2.97886;
    13, 16561.6, 2.20821;
    14, -11768.8, -1.56917;
    15, 72751.5, 9.7002;
    16, -22341.5, -2.97886;
    17, 28334.4, 3.77792;
    18, -11768.8, -1.56917;
    19, 94498.6, 12.5998;
    20, -20254.3, -2.70057;
    21, 41518.1, 5.53575;
    22, -9415.02, -1.25534;
    23, 111343, 14.8457
]
# Alumise vöö siirete graafik
X := [
    0, Υ[4*0 + 2];
    3000, Υ[4*1 + 2];
    6000, Υ[4*2 + 2];
    9000, Υ[4*3 + 2];
    12000, Υ[4*4 + 2];
    15000, Υ[4*5 + 2];
    18000, Υ[4*6 + 2]
]
X[:, 1] = [0; 3000; 6000; 9000; 12000; 15000; 18000]
X[:, 2] = [0; 0; 0; -1.07083; -2.14167; -3.2125; -4.06917]
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# Ülemise vöö siirete graafik
Y := [
    1500, Υ[4*0 + 4];
    4500, Υ[4*1 + 4];
    7500, Υ[4*2 + 4];
    10500, Υ[4*3 + 4];
    13500, Υ[4*4 + 4];
    16500, Υ[4*5 + 4]
]
Y[:, 1] = [1500; 4500; 7500; 10500; 13500; 16500]
Y[:, 2] = [0.894251; 0.894251; 0.687826; 0.255901; -0.15695; -0.55306]
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