# Worksheet setting: ORIGIN = 1
# KODUTÖÖ 2
# Siim Erik Pugal
# 179411YAFB
# ÜL: Leia sõrestiku sõlmede siirded ja sisejõud varrastes.
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EL := READPRN("abomination.txt")
E := 12000  # MPa
A := 7500  # mm^2
# Maatriks EL kuvab algsed ääretingimused, mis antud süsteemi puhul kehtivad. Esimene veerg näitab mitmenda tala elemendiga tegemist on. Teine ja kolmas veerg näitavad, milliste sõlmedega iga element omavahel seotud on. Neljas veerg kirjeldab tala pikkust. Viies tähistab polaarkoordinaatsüsteemis, mis nurga all iga element paikneb. Kuues veerg on tala ristlõike pindala A=150x50 mm^2 ja seitsmes veerg on elastsusmoodul E=12 000 MPa.
EL = [
    1, 1, 3, 3000, 0, 7500, 12000;
    2, 1, 2, 3088.69, 60.9454, 7500, 12000;
    3, 2, 3, 3088.69, -60.9454, 7500, 12000;
    4, 2, 4, 3000, 0, 7500, 12000;
    5, 3, 4, 3088.69, 60.9454, 7500, 12000;
    6, 3, 5, 3000, 0, 7500, 12000;
    7, 4, 5, 3088.69, -60.9454, 7500, 12000;
    8, 4, 6, 3000, 0, 7500, 12000;
    9, 5, 6, 3088.69, 60.9454, 7500, 12000;
    10, 5, 7, 3000, 0, 7500, 12000;
    11, 6, 7, 3088.69, -60.9454, 7500, 12000;
    12, 6, 8, 3000, 0, 7500, 12000;
    13, 7, 8, 3088.69, 60.9454, 7500, 12000;
    14, 7, 9, 3000, 0, 7500, 12000;
    15, 8, 9, 3088.69, -60.9454, 7500, 12000;
    16, 8, 10, 3000, 0, 7500, 12000;
    17, 9, 10, 3088.69, 60.9454, 7500, 12000;
    18, 9, 11, 3000, 0, 7500, 12000;
    19, 10, 11, 3088.69, -60.9454, 7500, 12000;
    20, 10, 12, 3000, 0, 7500, 12000;
    21, 11, 12, 3088.69, 60.9454, 7500, 12000;
    22, 11, 13, 3000, 0, 7500, 12000;
    23, 12, 13, 3088.69, -60.9454, 7500, 12000
]
# Järgnevaks on ära defineeritud kujufunktsioonid: ϕ ja selle esimene tuletis dϕ, mis on tähtsad siirdete kirjeldamisel igas elemendis. Lisaks on ka ette antud kaalufunktsioon W, mis kirjeldab kolmanda astme polünoomi ning omab olulist osa siirete aproksimeerimisel.
ϕ(i, h_e, x) :=
    R ← 1 - x/h_e if i == 1
    R ← x/h_e if i == 2
    return R
dϕ(i, h_e, x) :=
    R ← -1/h_e if i == 1
    R ← 1/h_e if i == 2
    return R
W := [-sqrt(3/5), 5/9; 0, 8/9; sqrt(3/5), 5/9]
# Siin on välja toodud teisendusmaatriks T(θ), mis aitab lokaalse koordinaatsüsteemi teisendada globaalsesse koordinaatsüsteemi.
# Siin on sisse toodud abimaatriks ABI, mis aitab kuvada elemendi jäikusmaatriksis K_el(el) vastused adekvaatsel kujul ning hiljem mängib rolli ka sisejõudude ja pingete arvutamsel.
T(θ) := [cos(θ), sin(θ), 0, 0; -sin(θ), cos(θ), 0, 0; 0, 0, cos(θ), sin(θ); 0, 0, -sin(θ), cos(θ)]
ABI := [1, 0, 0, 0; 0, 0, 1, 0]
# Järgnevalt on ära toodud kood, mis arvutab igast elemendist sõltuvalt välja jäikusmaatriksi, võttes arvesse talade pikkused, elastusmooduli, ristlõikepindala, kaalu- ja kujufunktsioonid ning eelnevalt defineeritud abimaatriksi.
# Siin on kood, mis arvutab välja globaalse jäikusmaatriksi. Antud kood kuvab 26x26 maatriksi, mis kirjeldab vabadusastmeid globaalses süsteemis.
K_el(el) :=
    for i ∈ 1 .. 2
        for j ∈ 1 .. 2
            R[i, j] ← 0
    for i ∈ 1 .. 2
        for j ∈ 1 .. 2
            x_a ← 0
            h_e ← EL[el, 4]
            E ← EL[el, 7]
            A ← EL[el, 6]
            x_b ← h_e
            for i_int ∈ 1 .. rows(W)
                ξ ← W[i_int, 1]
                kaal ← W[i_int, 2]
                x ← 1/2*(x_a + x_b + ξ*(x_b - x_a))
                R[i, j] ← R[i, j] + kaal*E*A*dϕ(i, h_e, x)*dϕ(j, h_e, x)*(x_b - x_a)/2
    return transpose(ABI)*R*ABI
K_gl :=
    dim ← 2*max(EL[:, 2], EL[:, 3])
    for i ∈ 1 .. dim
        for j ∈ 1 .. dim
            R[i, j] ← 0
    for el_n ∈ 1 .. rows(EL)
        θ ← EL[el_n, 5]*π/180
        T_el(el_n) ← T(θ)
        K ← transpose(T_el(el_n))*K_el(el_n)*T_el(el_n)
        for i ∈ 1 .. 2
            for j ∈ 1 .. 2
                for i2 ∈ 1 .. 2
                    for j2 ∈ 1 .. 2
                        Ι ← (2*(EL[el_n, i + 1] - 1) + i2)
                        Γ ← (2*(EL[el_n, j + 1] - 1) + j2)
                        R[Ι, Γ] ← R[Ι, Γ] + K[2*(i - 1) + i2, 2*(j - 1) + j2]
    return R
# Järgmiseks on välja toodud kood globaalse jõuvektori jaoks, mis kirjeldab, millistesse kraana sõlmedesse vastavad jõud rakendatud on ning mis suunas nad mõjuvad.
F_gl :=
    Dim ← 2*max(EL[:, 2], EL[:, 3])
    el_max ← rows(EL)
    for i ∈ 1 .. Dim
        R[i] ← 0
    R[22] ← -5000
    R[26] ← -20000
    return R
K_gl =  # no stored result  # Tabel F_gl väärtuste jaoks on kuvatud all. Paaritud komponendid kirjeldavad x-telje sihilist suunda, paaris aga y-telje sihilist.
F_gl = [0; 0; 0; 0; 0; 0; 0; 0; 0; 0; 0; 0; 0; 0; 0; 0; 0; 0; 0; 0; 0; -5000; 0; 0; 0; -20000]
# Ülal on välja toodud osa globaalse jäikusmaatriksi väärtustest.
#
# Allpool on kood BOUND(n) ühikmaatriksi jaoks. BOUND(n)
# võtab arvesse n maatriksi väärtused, mis kirjeldavad iga sõlme
# kinnitussuundasi. Nende kinnituse põhjal koostab BOUND(n)
# ühikmaatriksi, kust on välja jäetud, vastavalt kinnituspunktidele,
# vajalikud read ja veerud.
BOUND(n) :=
    dim ← 2*max(EL[:, 2], EL[:, 3])
    dim_red ← rows(n)
    for j ∈ 1 .. dim
        for i ∈ 1 .. dim - dim_red
            R[i, j] ← 0
    ind ← 1
    s ← 0
    for k ∈ 1 .. dim
        if k ≠ n[ind]
            1
            R[k - s, k] ← 1
        if k == n[ind]
            ind ← ind + 1 if ind ≠ rows(n)
            s ← s + 1
        S[k] ← s
    return R
# Ääretingimused, mis kirjeldavad kinniseid vabadusastmeid.
n := [2; 9; 10]
# Tekib 23x26 ühikmaatriks U:
U := BOUND(n)
# Ühikmaatriks U, mis on genereeritud BOUND(n) koodi tulemusena.
# Eraldi esile toodud arvutused U, U^T, K_gl ja  F_gl vahel, mis on olulised lahenduste vektori V arvutamiseks.
U = [
    1, 0, 0, 0, 0, 0, 0, 0, 0, 0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;
    0, 0, 1, 0, 0, 0, 0, 0, 0, 0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;
    0, 0, 0, 1, 0, 0, 0, 0, 0, 0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;
    0, 0, 0, 0, 1, 0, 0, 0, 0, 0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;
    0, 0, 0, 0, 0, 1, 0, 0, 0, 0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;
    0, 0, 0, 0, 0, 0, 1, 0, 0, 0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;
    0, 0, 0, 0, 0, 0, 0, 1, 0, 0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;
    0, 0, 0, 0, 0, 0, 0, 0, 0, 0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;
    0, 0, 0, 0, 0, 0, 0, 0, 0, 0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;
    0, 0, 0, 0, 0, 0, 0, 0, 0, 0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;
    0, 0, 0, 0, 0, 0, 0, 0, 0, 0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;
    0, 0, 0, 0, 0, 0, 0, 0, 0, 0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;
    0, 0, 0, 0, 0, 0, 0, 0, 0, 0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;
    0, 0, 0, 0, 0, 0, 0, 0, 0, 0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;
    0, 0, 0, 0, 0, 0, 0, 0, 0, 0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;
    0, 0, 0, 0, 0, 0, 0, 0, 0, 0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;
    0, 0, 0, 0, 0, 0, 0, 0, 0, 0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;
    0, 0, 0, 0, 0, 0, 0, 0, 0, 0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;
    0, 0, 0, 0, 0, 0, 0, 0, 0, 0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;
    0, 0, 0, 0, 0, 0, 0, 0, 0, 0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;
    0, 0, 0, 0, 0, 0, 0, 0, 0, 0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;
    0, 0, 0, 0, 0, 0, 0, 0, 0, 0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;
    0, 0, 0, 0, 0, 0, 0, 0, 0, 0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]
U*K_gl*transpose(U) = [
    36872.3, -6872.31, -12370.2, -30000, 0, 0, 0, 0, 0, 0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;
    -6872.31, 43744.6, 0, -6872.31, 12370.2, -30000, 0, 0, 0, 0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;
    -12370.2, 0, 44532.5, 12370.2, -22266.3, 0, 0, 0, 0, 0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;
    -30000, -6872.31, 12370.2, 73744.6, 0, -6872.31, -12370.2, 0, 0, 0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;
    0, 12370.2, -22266.3, 0, 44532.5, -12370.2, -22266.3, 0, 0, 0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;
    0, -30000, 0, -6872.31, -12370.2, 73744.6, 0, -30000, 0, 0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;
    0, 0, 0, -12370.2, -22266.3, 0, 44532.5, 0, 0, 0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;
    0, 0, 0, 0, 0, -30000, 0, 73744.6, 0, -6872.31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;
    0, 0, 0, 0, 0, 0, 0, 0, 44532.5, 12370.2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;
    0, 0, 0, 0, 0, 0, 0, -6872.31, 12370.2, 73744.6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;
    0, 0, 0, 0, 0, 0, 0, 12370.2, -22266.3, 0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;
    0, 0, 0, 0, 0, 0, 0, -30000, 0, -6872.31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;
    0, 0, 0, 0, 0, 0, 0, 0, 0, -12370.2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;
    0, 0, 0, 0, 0, 0, 0, 0, 0, -30000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;
    0, 0, 0, 0, 0, 0, 0, 0, 0, 0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;
    0, 0, 0, 0, 0, 0, 0, 0, 0, 0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;
    0, 0, 0, 0, 0, 0, 0, 0, 0, 0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;
    0, 0, 0, 0, 0, 0, 0, 0, 0, 0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;
    0, 0, 0, 0, 0, 0, 0, 0, 0, 0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;
    0, 0, 0, 0, 0, 0, 0, 0, 0, 0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;
    0, 0, 0, 0, 0, 0, 0, 0, 0, 0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;
    0, 0, 0, 0, 0, 0, 0, 0, 0, 0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;
    0, 0, 0, 0, 0, 0, 0, 0, 0, 0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]
U*F_gl = [0; 0; 0; 0; 0; 0; 0; 0; 0; 0; 0; 0; 0; 0; 0; 0; 0; 0; -5000; 0; 0; 0; -20000]
# Viimased sammud siirete vektori kuvamisel.
#
# Lahenduste vektor V on kirjas järgneva valemiga:
# Alumise vöö siirete graafik.
# Siirete vektor u ja tema väärtused:
V := (U*K_gl*transpose(U))^-1*U*F_gl
u := transpose(U)*V
X := [
    0, u[4*0 + 2];
    3000, u[4*1 + 2];
    6000, u[4*2 + 2];
    9000, u[4*3 + 2];
    12000, u[4*4 + 2];
    15000, u[4*5 + 2];
    18000, u[4*6 + 2]
]
X[:, 1] = [0; 3000; 6000; 9000; 12000; 15000; 18000]
X[:, 2] = [0; 1.95473; 0; -15.5399; -36.8411; -61.8459; -88.0993]
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V = [3.51852; 5.15933; 1.22171; 2.63889; 1.95473; 6.91859; 1.71039; 10.4371; -6.92117; -3.05556; -15.5399; 13.0297; -25.5989; -5.18519; -36.8411; 14.6964; -49.0091; -6.38889; -61.8459; 15.4371; -74.8697; -6.75926; -88.0993]
u = [3.51852; 0; 5.15933; 1.22171; 2.63889; 1.95473; 6.91859; 1.71039; 0; 0; 10.4371; -6.92117; -3.05556; -15.5399; 13.0297; -25.5989; -5.18519; -36.8411; 14.6964; -49.0091; -6.38889; -61.8459; 15.4371; -74.8697; -6.75926; -88.0993]
# Ülemise vöö siirete graafik.
Y := [
    1500, u[4*0 + 4];
    4500, u[4*1 + 4];
    7500, u[4*2 + 4];
    10500, u[4*3 + 4];
    13500, u[4*4 + 4];
    16500, u[4*5 + 4]
]
Y[:, 1] = [1500; 4500; 7500; 10500; 13500; 16500]
Y[:, 2] = [1.22171; 1.71039; -6.92117; -25.5989; -49.0091; -74.8697]
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# Valem, millega hakatakse arvutama sisejõude igas talas.
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σ_a := 20*10^6  # Pa  # Pingekoefitsient.
N_x := σ_a*A*10^-6  # Valem arvutamiseks.
N_x = 150000  # Vastus, millest sisejõud ei tohi üheski talas üle minna.
# Kood, mis automaatselt arvutab välja sisejõud ja pinged igas talas.
# 1. Tulp: Elemendi number
# 2. Tulp: Sisejõud [MPa]
# 3. Tulp: Pinge [MPa]
N :=
    for i ∈ 1 .. rows(EL)
        for j ∈ 1
            R[i, j] ← 0
    for el_n ∈ 1 .. rows(EL)
        for i ∈ 1 .. 2
            for i_v ∈ 1 .. 2
                u_el_g[(i - 1)*2 + i_v] ← u[(EL[el_n, 1 + i] - 1)*2 + i_v]
        E ← 12000
        A ← 7500
        θ ← EL[el_n, 5]*π/180
        Te ← T(θ)
        h_e ← EL[el_n, 4]
        x ← h_e/2
        dϕ1_dϕ2 ← [dϕ(1, h_e, x), dϕ(2, h_e, x)]
        R[el_n, 1] ← el_n
        R[el_n, 2] ← E*A*dϕ1_dϕ2*ABI*Te*u_el_g
        R[el_n, 3] ← R[el_n, 2]/A
    return R
N = [
    1, -26388.9, -3.51852;
    2, 54338, 7.24507;
    3, -54338, -7.24507;
    4, 52777.8, 7.03704;
    5, 54338, 7.24507;
    6, -79166.7, -10.5556;
    7, -54338, -7.24507;
    8, 105556, 14.0741;
    9, -28599, -3.8132;
    10, -91666.7, -12.2222;
    11, 28599, 3.8132;
    12, 77777.8, 10.3704;
    13, -28599, -3.8132;
    14, -63888.9, -8.51852;
    15, 28599, 3.8132;
    16, 50000, 6.66667;
    17, -28599, -3.8132;
    18, -36111.1, -4.81481;
    19, 28599, 3.8132;
    20, 22222.2, 2.96296;
    21, -22879.2, -3.05056;
    22, -11111.1, -1.48148;
    23, 22879.2, 3.05056
]
# Kood, mis elemendi kaupa valib välja iga elemendi ja temale vastavad siirded ning
# koostab seejärel elemendile vastava siirete vektori.
#
# Antud kood on sisejõudude koodi N kvintessents.
W(el_n) :=
    for i ∈ 1 .. 2
        for i_v ∈ 1 .. 2
            u_el_g[(i - 1)*2 + i_v] ← u[(EL[el_n, 1 + i] - 1)*2 + i_v]
    return u_el_g
# Mõningad näited kontrolliks:
u = [3.51852; 0; 5.15933; 1.22171; 2.63889; 1.95473; 6.91859; 1.71039; 0; 0; 10.4371; -6.92117; -3.05556; -15.5399; 13.0297; -25.5989; -5.18519; -36.8411; 14.6964; -49.0091; -6.38889; -61.8459; 15.4371; -74.8697; -6.75926; -88.0993]
W(1) = [3.51852; 0; 2.63889; 1.95473]
W(2) = [3.51852; 0; 5.15933; 1.22171]
W(22) = [-6.38889; -61.8459; -6.75926; -88.0993]
W(23) = [15.4371; -74.8697; -6.75926; -88.0993]
# Klapivad :)
