# Worksheet setting: ORIGIN = 1
NÄIDE
# Leia sõrestiku sõlmede siirded ja sisejõud varrastes.
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EL := READPRN("naide_sorestiku_siirded.txt")
E := 3500
A := 1000
EL = [
    1, 2, 4, 26.5651, 3354.1, 1000, 3500;
    2, 1, 4, -26.5651, 3354.1, 1000, 3500;
    3, 1, 3, 0, 3000, 1000, 3500;
    4, 3, 4, -90, 1500, 1000, 3500
]
W := [-sqrt(3/5), 5/9; 0, 8/9; sqrt(3/5), 5/9]
Nϕ(i, h_e, x) :=
    R ← 1 - x/h_e if i == 1
    R ← x/h_e if i == 2
    return R
dϕ(i, h_e, x) :=
    R ← -1/h_e if i == 1
    R ← 1/h_e if i == 2
    return R
BU := [1, 0, 0, 0; 0, 0, 1, 0]
K_el(el) :=
    for i ∈ 1 .. 2
        for j ∈ 1 .. 2
            R[i, j] ← 0
    for i ∈ 1 .. 2
        for j ∈ 1 .. 2
            x_a ← 0
            h_e ← EL[el, 5]
            E ← EL[el, 7]
            A ← EL[el, 6]
            x_b ← h_e
            for i_int ∈ 1 .. rows(W)
                ξ ← W[i_int, 1]
                kaal ← W[i_int, 2]
                x ← 1/2*(x_a + x_b + ξ*(x_b - x_a))
                R[i, j] ← R[i, j] + kaal*E*A*dϕ(i, h_e, x)*dϕ(j, h_e, x)*(x_b - x_a)/2
    return transpose(BU)*R*BU
max(EL[:, 2], EL[:, 3]) = 4
T(θ) := [cos(θ), sin(θ), 0, 0; -sin(θ), cos(θ), 0, 0; 0, 0, cos(θ), sin(θ); 0, 0, -sin(θ), cos(θ)]
rows(EL) = 4
E*A/3354 = 1043.53
K_el(1) = [1043.5, 0, -1043.5, 0; 0, 0, 0, 0; -1043.5, 0, 1043.5, 0; 0, 0, 0, 0]
dim := 2*max(EL[:, 2], EL[:, 3])
dim = 8
K_g :=
    Dim ← 2*max(EL[:, 2], EL[:, 3])
    el_max ← rows(EL)
    for i ∈ 1 .. Dim
        for j ∈ 1 .. Dim
            R[i, j] ← 0
    for el_n ∈ 1 .. el_max
        θ ← EL[el_n, 4]*π/180
        Te ← T(θ)
        K ← transpose(Te)*K_el(el_n)*Te
        for i ∈ 1 .. 2
            for j ∈ 1 .. 2
                for i2 ∈ 1 .. 2
                    for j2 ∈ 1 .. 2
                        R[2*(EL[el_n, i + 1] - 1) + i2, 2*(EL[el_n, j + 1] - 1) + j2] ← R[2*(EL[el_n, i + 1] - 1) + i2, 2*(EL[el_n, j + 1] - 1) + j2] + K[2*(i - 1) + i2, 2*(j - 1) + j2]
    return R
F_gl :=
    Dim ← 2*max(EL[:, 2], EL[:, 3])
    el_max ← rows(EL)
    for i ∈ 1 .. Dim
        R[i, 1] ← 0
    R[8, 1] ← -2500
    return R
F_gl = [0; 0; 0; 0; 0; 0; 0; -2500]
K_gl :=
    for i ∈ 1 .. 8
        for j ∈ 1 .. 8
            R[i, j] ← 0
    for el_n ∈ 1 .. rows(EL)
        θ ← EL[el_n, 4]*π/180
        T_el(el_n) ← T(θ)
        K ← transpose(T_el(el_n))*K_el(el_n)*T_el(el_n)
        n1 ← EL[el_n, 1]
        n2 ← EL[el_n, 2]
        for i ∈ 1 .. 2
            for j ∈ 1 .. 2
                for i2 ∈ 1 .. 2
                    for j2 ∈ 1 .. 2
                        Ι ← (2*(EL[el_n, i + 1] - 1) + i2)
                        Γ ← (2*(EL[el_n, j + 1] - 1) + j2)
                        R[Ι, Γ] ← R[Ι, Γ] + K[2*(i - 1) + i2, 2*(j - 1) + j2]
    return R
K_gl = [
    2001.47, -417.399, 0, 0, -1166.67, 0, -834.799, 417.399;
    -417.399, 208.7, 0, 0, 0, 0, 417.399, -208.7;
    0, 0, 834.799, 417.399, 0, 0, -834.799, -417.399;
    0, 0, 417.399, 208.7, 0, 0, -417.399, -208.7;
    -1166.67, 0, 0, 0, 1166.67, 0, 0, 0;
    0, 0, 0, 0, 0, 2333.33, 0, -2333.33;
    -834.799, 417.399, -834.799, -417.399, 0, 0, 1669.6, 0;
    417.399, -208.7, -417.399, -208.7, 0, -2333.33, 0, 2750.73
]
n := [1; 2; 3; 4]
BOUND(n) :=
    dim ← 2*max(EL[:, 2], EL[:, 3])
    dim_red ← rows(n)
    for j ∈ 1 .. dim
        for i ∈ 1 .. dim - dim_red
            R[i, j] ← 0
    ind ← 1
    s ← 0
    for k ∈ 1 .. dim
        if k ≠ n[ind]
            1
            R[k - s, k] ← 1
        if k == n[ind]
            ind ← ind + 1 if ind ≠ rows(n)
            s ← s + 1
        S[k] ← s
    return R
U := BOUND(n)
U = [0, 0, 0, 0, 1, 0, 0, 0; 0, 0, 0, 0, 0, 1, 0, 0; 0, 0, 0, 0, 0, 0, 1, 0; 0, 0, 0, 0, 0, 0, 0, 1]
el_n := rows(EL)
el_n = 4
EL[el_n, 4] = -90
EL[:, 4] = [26.5651; -26.5651; 0; -90]
pi := π
cos(30*pi/180) = 0.866025
U*K_gl*transpose(U) = [1166.67, 0, 0, 0; 0, 2333.33, 0, -2333.33; 0, 0, 1669.6, 0; 0, -2333.33, 0, 2750.73]
V := transpose(U)*(U*K_g*transpose(U))^-1*(U*F_gl) = [0; 0; 0; 0; 0; -5.98947; 0; -5.98947]
U*F_gl = [0; 0; 0; -2500]
v := (U*K_g*transpose(U))^-1*U*F_gl = [0; -5.98947; 0; -5.98947]
V := transpose(U)*v = [0; 0; 0; 0; 0; -5.98947; 0; -5.98947]
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ABI := [0, 0, 0, 0; 0, 0, 0, 0; 0, 0, 0, 0; 0, 0, 0, 1]
max(EL[:, 2], EL[:, 3]) = 4
rows(EL) = 4
L := 3354.10196625
dϕ1_dϕ2 := 1/L*[-1, 1]
N :=
    for i ∈ 1 .. rows(EL)
        for j ∈ 1
            R[i, j] ← 0
    for el_n ∈ 1 .. rows(EL)
        for i ∈ 1 .. 2
            for i_v ∈ 1 .. 2
                u_el_g[(i - 1)*2 + i_v] ← V[(EL[el_n, 1 + i] - 1)*2 + i_v]
        E ← 3500
        A ← 1000
        θ ← EL[el_n, 4]*π/180
        Te ← T(θ)
        h_e ← EL[el_n, 5]
        x ← h_e/2
        dϕ1_dϕ2 ← [dϕ(1, h_e, x), dϕ(2, h_e, x)]
        R[el_n, 2] ← E*A*dϕ1_dϕ2*BU*Te*u_el_g
        R[el_n, 1] ← el_n
    return R
EL = [
    1, 2, 4, 26.5651, 3354.1, 1000, 3500;
    2, 1, 4, -26.5651, 3354.1, 1000, 3500;
    3, 1, 3, 0, 3000, 1000, 3500;
    4, 3, 4, -90, 1500, 1000, 3500
]
θ_1 := 26.5650511771
# =>
T1 := T(θ_1*π/180) = [
    0.894427, 0.447214, 0, 0;
    -0.447214, 0.894427, 0, 0;
    0, 0, 0.894427, 0.447214;
    0, 0, -0.447214, 0.894427
]
θ_2 := -26.5650511771  # =>
T2 := T(θ_2*π/180) = [
    0.894427, -0.447214, 0, 0;
    0.447214, 0.894427, 0, 0;
    0, 0, 0.894427, -0.447214;
    0, 0, 0.447214, 0.894427
]
Ξ := [1, 0, 0, 0; 0, 0, 1, 0]
ABI := [0, 0, 0, 0; 0, 0, 0, 0; 0, 0, 0, 0; 0, 0, 0, 1]
[u_1; v_1; u_2; v_2] := ABI*v = [0; 0; 0; -5.98947]
N = [1, -2795.08; 2, 2795.08; 3, 0; 4, 0]
N_x_1 := E*A*dϕ1_dϕ2*Ξ*T1*[u_1; v_1; u_2; v_2] = -2795.08
N_x_2 := E*A*dϕ1_dϕ2*Ξ*T2*[u_1; v_1; u_2; v_2] = 2795.08
W(el_n) :=
    for i ∈ 1 .. 2
        for i_v ∈ 1 .. 2
            u_el_g[(i - 1)*2 + i_v] ← V[(EL[el_n, 1 + i] - 1)*2 + i_v]
        1
    return u_el_g
V = [0; 0; 0; 0; 0; -5.98947; 0; -5.98947]
EL[1, 2] = 2
W(4) = [0; -5.98947; 0; -5.98947]
W(1) = [0; 0; 0; -5.98947]
V = [0; 0; 0; 0; 0; -5.98947; 0; -5.98947]
EL = [
    1, 2, 4, 26.5651, 3354.1, 1000, 3500;
    2, 1, 4, -26.5651, 3354.1, 1000, 3500;
    3, 1, 3, 0, 3000, 1000, 3500;
    4, 3, 4, -90, 1500, 1000, 3500
]
V[3] = 0
for i ∈ 1 .. 2
    for i_v ∈ 1 .. 2
        u_el_g[(i - 1)*2 + i_v] ← V[(EL[el_n, 1 + i] - 1)*2 + i_v]
    1
E ← 3500
A ← 1000
θ ← EL[el_n, 4]*π/180
Te ← T(θ)
h_e ← EL[el_n, 5]
x ← h_e/2
dϕ1_dϕ2 ← [dN(1, h_e, x), dN(2, h_e, x)]
R[el_n, 2] ← E*A*dϕ1_dϕ2*BU*Te*u_el_g
E := 3500
θ := EL[el_n, 4]*π/180
A := 1000
θ = -1.5708
π/2 = 1.5708
Te := T(θ) = [0, -1, 0, 0; 1, 0, 0, 0; 0, 0, 0, -1; 0, 0, 1, 0]
h_e := EL[el_n, 5]
h_e = 1500
x := h_e/2
dϕ1_dϕ2 := [dϕ(1, h_e, x), dϕ(2, h_e, x)]
dϕ1_dϕ2*BU*Te*W(4) = 0
