# Worksheet setting: ORIGIN = 1
# KODUTÖÖ 3
# Norman Seeba
# 164717YAFB
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# Maatriks EL sisaldab endas süsteemi kohta käivat infot.
EL := READPRN("kohutav_idee.txt")
L := 11500
E := 210*10^3
E_f := 70
h_c := 150
ν_f := 0.01
b := 600
dim := max(EL[:, 2], EL[:, 3])
p := 0.01*10^3
h_e := L/23
t_p := 1.2
A_shear := h_c*b
q := p*b
F := 5
q = 6000
G_f := E_f/(2*(1 + ν_f))
I := 2*(t_p^3*b/12 + 2*t_p*b*(h_c/2 + t_p/2)^2 + E_f/E*h_c^3*b/12) = 16572910
b_t := 600
S_t := 1.2*600*(75 + 0.6) + 75*600*37.5
S_t = 1741932
s := 0, 50 .. h_e
# Järgnevaks on ära defineeritud kujufunktsioonid: ϕ , selle esimene tuletis dϕ ja teine tuleits ddϕ. Lisaks on ka ette antud kaalufunktsioon W.
ddϕ(x, h_e, i) :=
    R ← 12*x/h_e^3 - 6/h_e^2 if i == 1
    R ← 4/h_e - 6*x/h_e^2 if i == 2
    R ← 6/h_e^2 - 12*x/h_e^3 if i == 3
    R ← 2/h_e - 6*x/h_e^2 if i == 4
    return R
ϕ(x, h_e, i) :=
    R ← 2*x^3/h_e^3 - 3*x^2/h_e^2 + 1 if i == 1
    R ← 2*x^2/h_e - x^3/h_e^2 - x if i == 2
    R ← 3*x^2/h_e^2 - 2*x^3/h_e^3 if i == 3
    R ← x^2/h_e - x^3/h_e^2 if i == 4
    return R
dddϕ(x, h_e, i) :=
    R ← 12/h_e^3 if i == 1
    R ← -6/h_e^2 if i == 2
    R ← -12/h_e^3 if i == 3
    R ← -6/h_e^2 if i == 4
    return R
W := [-1/sqrt(3), 1; 1/sqrt(3), 1]
W := [-sqrt(3/5), 5/9; 0, 8/9; sqrt(3/5), 5/9]
# Kood, mis arvutab ääretingimuste maatriksi.
BOUND(n) :=
    dim ← 2*max(EL[:, 2], EL[:, 3])
    dim_red ← rows(n)
    for j ∈ 1 .. dim
        for i ∈ 1 .. dim - dim_red
            R[i, j] ← 0
    ind ← 1
    s ← 0
    for k ∈ 1 .. dim
        if k ≠ n[ind]
            1
            R[k - s, k] ← 1
        if k == n[ind]
            ind ← ind + 1 if ind ≠ rows(n)
            s ← s + 1
        S[k] ← s
    return R
# Kood, mis arvutab igast elemendist sõltuvalt välja jäikusmaatriksi.
# Kood, mis arvutab igast elemendist sõltuvalt välja jõuvektori.
K_el(E, I, h_e) :=
    for i ∈ 1 .. 4
        for j ∈ 1 .. 4
            R[i, j] ← 0
    for inte ∈ 1 .. rows(W)
        x_a ← 0
        x_b ← h_e
        x ← 1/2*(x_a + x_b + W[inte, 1]*(x_b - x_a))
        for i ∈ 1 .. 4
            for j ∈ 1 .. 4
                R[i, j] ← R[i, j] + E*I*W[inte, 2]*ddϕ(x, h_e, i)*ddϕ(x, h_e, j)*(x_b - x_a)/2
    return R
F_el(h_e) :=
    for i ∈ 1 .. 4
        R[i] ← 0
    for inte ∈ 1 .. rows(W)
        x_a ← 0
        x_b ← h_e
        x ← 1/2*(x_a + x_b + W[inte, 1]*(x_b - x_a))
        for i ∈ 1 .. 4
            R[i] ← R[i] + W[inte, 2]*ϕ(x, h_e, i)*q*(x_b - x_a)/2
    return R
# Kood, mis arvutab globaalse jäikusmaatriksi. | Kood, mis arvutab globaalse jõuvektori.
# Kood, mis lisab sõlme rakendatud jõu.
K_gl :=
    dim ← 2*max(EL[:, 2], EL[:, 3])
    for i ∈ 1 .. dim
        for j ∈ 1 .. dim
            R[i, j] ← 0
    for el ∈ 1 .. rows(EL)
        Kel ← K_el(E, I, h_e)
        for i ∈ 1 .. 2
            for j ∈ 1 .. 2
                1
                for i_v ∈ 1 .. 2
                    for j_v ∈ 1 .. 2
                        R[(EL[el, i + 1] - 1)*2 + i_v, (EL[el, j + 1] - 1)*2 + j_v] ← R[(EL[el, i + 1] - 1)*2 + i_v, (EL[el, j + 1] - 1)*2 + j_v] + Kel[(i - 1)*2 + i_v, (j - 1)*2 + j_v]
    return R
F1_gl :=
    dim ← 2*max(EL[:, 2], EL[:, 3])
    for i ∈ 1 .. dim
        R[i] ← 0
    for el ∈ 1 .. rows(EL)
        Fel ← F_el(h_e)
        for i ∈ 1 .. 2
            1
            for i_v ∈ 1 .. 2
                R[(EL[el, i + 1] - 1)*2 + i_v] ← R[(EL[el, i + 1] - 1)*2 + i_v] + Fel[(i - 1)*2 + i_v]
    return R
F2_gl :=
    dim ← 2*max(EL[:, 2], EL[:, 3])
    for i ∈ 1 .. dim
        R[i] ← 0
    R[16] ← -5*10^3
    return R
F_gl := F1_gl + F2_gl
K_gl =  # no stored result
F_gl = [
    1500000; -125000000; 3000000; 0; 3000000; 0; 3000000; 0; 3000000; 0
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]
n := [1; 13; 31; 43]
U := BOUND(n)
u := transpose(U)*(U*K_gl*transpose(U))^-1*U*F_gl
U_MC :=
    N_solm ← max(EL[:, 2], EL[:, 3])
    for i ∈ 1 .. N_solm
        R[i] ← u[2*i - 1]
    return R
w_f(x) := q*L^2/(G_f*A_shear*2)*(x^2/L^2 - x/L)
X :=
    N_solm ← max(EL[:, 2], EL[:, 3])
    for i ∈ 1 .. N_solm
        R[i] ← h_e*(i - 1)
    return R
u = [
    0; -0.605644; 271.962; -0.429466; 394.685; -0.0445992; 317.696; 0.33346; 98.2763; 0.489212
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]
w_f(X) = [0; -5290.48; -10100; -14428.6; -18276.2; -21642.9; -24528.6; -26933.3; -28857.1; -30300; -31261.9; -31742.9; -31742.9; -31261.9; -30300; -28857.1; -26933.3; -24528.6; -21642.9; -18276.2; -14428.6; -10100; -5290.48; 0]
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S_MC :=
    h ← 150
    N_el ← max(EL[:, 1])
    for i_el ∈ 1 .. N_el
        for i ∈ 1 .. 4
            ue[i] ← u[(i_el - 1)*2 + i]
        for i ∈ 1 .. 6
            R[(i_el - 1)*6 + i, 1] ← (i_el - 1)*h_e + (i - 1)/5*h_e
            SUM ← 0
            for j ∈ 1 .. 4
                x ← (i - 1)/5*h_e
                SUM ← SUM + ue[j]*ddϕ(x, h_e, j)
            R[(i_el - 1)*6 + i, 2] ← -E*SUM*h/2
        1
    return R
S_MC = [
    0, 565.682;
    100, 2559.25;
    200, 4552.81;
    300, 6546.37;
    400, 8539.94;
    500, 10533.5;
    500, 10533.5;
    600, 11169.4;
    700, 11805.4;
    800, 12441.3
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]
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T_MC :=
    N_el ← max(EL[:, 1])
    for i_el ∈ 1 .. N_el
        for i ∈ 1 .. 4
            ue[i] ← u[(i_el - 1)*2 + i]
        for i ∈ 1 .. 6
            R[(i_el - 1)*6 + i, 1] ← (i_el - 1)*h_e + (i - 1)/5*h_e
            SUM ← 0
            for j ∈ 1 .. 4
                x ← (i - 1)/5*h_e
                SUM ← SUM + ue[j]*dddϕ(x, h_e, j)
            R[(i_el - 1)*6 + i, 2] ← -E*SUM*S_t/b_t
        1
    return R
T_MC = [
    0, 771.7;
    100, 771.7;
    200, 771.7;
    300, 771.7;
    400, 771.7;
    500, 771.7;
    500, 246.164;
    600, 246.164;
    700, 246.164;
    800, 246.164
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]
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ψ(i, h_e, x) :=
    R ← 2*x^2/h_e^2 - 3*x/h_e + 1 if i == 1
    R ← 4*x/h_e - 4*x^2/h_e^2 if i == 2
    R ← x/h_e - 2*x^2/h_e^2 if i == 3
# *******************************************Timoshenko tala********************************************
F_tim_el(h_e) :=
    for i ∈ 1 .. 3
        R[i] ← 0
    for inte ∈ 1 .. rows(W)
        x_a ← 0
        x_b ← h_e
        x ← 1/2*(x_a + x_b + W[inte, 1]*(x_b - x_a))
        for i ∈ 1 .. 3
            R[i] ← R[i] + W[inte, 2]*ψ(i, h_e, x)*q*(x_b - x_a)/2
    R1 ← [R[1] + 1/2*R[2]; -1/8*R[2]*h_e; R[3] + 1/2*R[2]; 1/8*R[2]*h_e]
    return R1
K_tim_el(E, I, A_shear, h_e) :=
    λ_e ← E*I/(G_f*A_shear)
    μ_0 ← 12*λ_e
    R ← 2*E*I/(μ_0*h_e)*[
        6, -3*h_e, -6, -3*h_e;
        -3*h_e, h_e^2*(1.5 + 6*λ_e), 3*h_e, h_e^2*(1.5 - 6*λ_e);
        -6, 3*h_e, 6, 3*h_e;
        -3*h_e, h_e^2*(1.5 - 6*λ_e), 3*h_e, h_e^2*(1.5 + 6*λ_e)
    ]
    return R
K_tim_gl :=
    dim ← 2*max(EL[:, 2], EL[:, 3])
    for i ∈ 1 .. dim
        for j ∈ 1 .. dim
            R[i, j] ← 0
    for el ∈ 1 .. rows(EL)
        Kel ← K_tim_el(E, I, A_shear, h_e)
        for i ∈ 1 .. 2
            for j ∈ 1 .. 2
                1
                for i_v ∈ 1 .. 2
                    for j_v ∈ 1 .. 2
                        R[(EL[el, i + 1] - 1)*2 + i_v, (EL[el, j + 1] - 1)*2 + j_v] ← R[(EL[el, i + 1] - 1)*2 + i_v, (EL[el, j + 1] - 1)*2 + j_v] + Kel[(i - 1)*2 + i_v, (j - 1)*2 + j_v]
    return R
F_tim_gl :=
    dim ← 2*max(EL[:, 2], EL[:, 3])
    for i ∈ 1 .. dim
        R[i] ← 0
    for el ∈ 1 .. rows(EL)
        Fel ← F_tim_el(h_e)
        for i ∈ 1 .. 2
            1
            for i_v ∈ 1 .. 2
                R[(EL[el, i + 1] - 1)*2 + i_v] ← R[(EL[el, i + 1] - 1)*2 + i_v] + Fel[(i - 1)*2 + i_v]
    return R
u_tim := transpose(U)*(U*K_tim_gl*transpose(U))^-1*U*F_tim_gl
U_tim_MC :=
    N_solm ← max(EL[:, 2], EL[:, 3])
    for i ∈ 1 .. N_solm
        R[i] ← u_tim[2*i - 1]
    return R
X :=
    N_solm ← max(EL[:, 2], EL[:, 3])
    for i ∈ 1 .. N_solm
        R[i] ← h_e*(i - 1)
    return R
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