# Worksheet setting: ORIGIN = 1
# KODUTÖÖ 3
# Norman Seeba
# 164717YAFB
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# Probleem tala osadeks jaotamisel: 11500 ei saa jagada täpselt nii, et ääretingimused ja 5kn oleks mingis sõlmepunktis?
# Mina jagasin praegu 10ks aga idk
# Maatriks EL sisaldab endas süsteemi kohta käivat infot.
EL := READPRN("EL.txt")
L := 11500
E := 210*10^3
E_f := 70
h_c := 150
ν_f := 0.01
b := 600
dim := max(EL[:, 2], EL[:, 3])
p := 0.01*10^3
h_e := L/10
t_p := 1.2
A_shear := h_c*b
F := 5
q := p*b
G_f := E_f/(2*(1 + ν_f))
I := 2*(t_p^3*b/12 + 2*t_p*b*(h_c/2 + t_p/2)^2 + E_f/E*h_c^3*b/12)
# Ei tea, kust need tulevad või mis nad peaksid olema selles töös. (sain eelmisest tööst need)
b_t := 8
S_t := 80*20*65 + 55^2*8/2
s := 0, 50 .. h_e
# Järgnevaks on ära defineeritud kujufunktsioonid: ϕ , selle esimene tuletis dϕ ja teine tuleits ddϕ. Lisaks on ka ette antud kaalufunktsioon W.
ddϕ(x, h_e, i) :=
    R ← 12*x/h_e^3 - 6/h_e^2 if i == 1
    R ← 4/h_e - 6*x/h_e^2 if i == 2
    R ← 6/h_e^2 - 12*x/h_e^3 if i == 3
    R ← 2/h_e - 6*x/h_e^2 if i == 4
    return R
ϕ(x, h_e, i) :=
    R ← 2*x^3/h_e^3 - 3*x^2/h_e^2 + 1 if i == 1
    R ← 2*x^2/h_e - x^3/h_e^2 - x if i == 2
    R ← 3*x^2/h_e^2 - 2*x^3/h_e^3 if i == 3
    R ← x^2/h_e - x^3/h_e^2 if i == 4
    return R
dddϕ(x, h_e, i) :=
    R ← 12/h_e^3 if i == 1
    R ← -6/h_e^2 if i == 2
    R ← -12/h_e^3 if i == 3
    R ← -6/h_e^2 if i == 4
    return R
W := [-1/sqrt(3), 1; 1/sqrt(3), 1]
W := [-sqrt(3/5), 5/9; 0, 8/9; sqrt(3/5), 5/9]
# Kood, mis arvutab ääretingimuste maatriksi.
# Kood, mis arvutab igast elemendist sõltuvalt välja jõuvektori.
# Kood, mis arvutab igast elemendist sõltuvalt välja jäikusmaatriksi.
F_el(h_e) :=
    for i ∈ 1 .. 4
        R[i] ← 0
    for inte ∈ 1 .. rows(W)
        x_a ← 0
        x_b ← h_e
        x ← 1/2*(x_a + x_b + W[inte, 1]*(x_b - x_a))
        for i ∈ 1 .. 4
            R[i] ← R[i] + W[inte, 2]*ϕ(x, h_e, i)*q*(x_b - x_a)/2
    return R
BOUND(n) :=
    dim ← 2*max(EL[:, 2], EL[:, 3])
    dim_red ← rows(n)
    for j ∈ 1 .. dim
        for i ∈ 1 .. dim - dim_red
            R[i, j] ← 0
    ind ← 1
    s ← 0
    for k ∈ 1 .. dim
        if k ≠ n[ind]
            1
            R[k - s, k] ← 1
        if k == n[ind]
            ind ← ind + 1 if ind ≠ rows(n)
            s ← s + 1
        S[k] ← s
    return R
K_el(E, I, h_e) :=
    for i ∈ 1 .. 4
        for j ∈ 1 .. 4
            R[i, j] ← 0
    for inte ∈ 1 .. rows(W)
        x_a ← 0
        x_b ← h_e
        x ← 1/2*(x_a + x_b + W[inte, 1]*(x_b - x_a))
        for i ∈ 1 .. 4
            for j ∈ 1 .. 4
                R[i, j] ← R[i, j] + E*I*W[inte, 2]*ddϕ(x, h_e, i)*ddϕ(x, h_e, j)*(x_b - x_a)/2
    return R
# Kood, mis arvutab globaalse jäikusmaatriksi. | Kood, mis arvutab globaalse jõuvektori.
# Kood, mis lisab sõlme rakendatud jõu.
K_gl :=
    dim ← 2*max(EL[:, 2], EL[:, 3])
    for i ∈ 1 .. dim
        for j ∈ 1 .. dim
            R[i, j] ← 0
    for el ∈ 1 .. rows(EL)
        Kel ← K_el(E, I, h_e)
        for i ∈ 1 .. 2
            for j ∈ 1 .. 2
                1
                for i_v ∈ 1 .. 2
                    for j_v ∈ 1 .. 2
                        R[(EL[el, i + 1] - 1)*2 + i_v, (EL[el, j + 1] - 1)*2 + j_v] ← R[(EL[el, i + 1] - 1)*2 + i_v, (EL[el, j + 1] - 1)*2 + j_v] + Kel[(i - 1)*2 + i_v, (j - 1)*2 + j_v]
    return R
F1_gl :=
    dim ← 2*max(EL[:, 2], EL[:, 3])
    for i ∈ 1 .. dim
        R[i] ← 0
    for el ∈ 1 .. rows(EL)
        Fel ← F_el(h_e)
        for i ∈ 1 .. 2
            1
            for i_v ∈ 1 .. 2
                R[(EL[el, i + 1] - 1)*2 + i_v] ← R[(EL[el, i + 1] - 1)*2 + i_v] + Fel[(i - 1)*2 + i_v]
    return R
F2_gl :=
    dim ← 2*max(EL[:, 2], EL[:, 3])
    for i ∈ 1 .. dim
        R[i] ← 0
    R[7] ← -25*10^3
    return R
# Siin peab õige punkti panema, kuhu on rakendatud jõud. POOLELI
# F.gl peaks vist olema f1gl + f2gl.
F_gl := F1_gl
K_gl = [
    27460.3, -15789691, -27460.3, -15789691, 0, 0, 0, 0, 0, 0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;
    -15789691, 1.21054e10, 15789691, 6.05271e9, 0, 0, 0, 0, 0, 0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;
    -27460.3, 15789691, 54920.7, 0, -27460.3, -15789691, 0, 0, 0, 0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;
    -15789691, 6.05271e9, 0, 2.42109e10, 15789691, 6.05271e9, 0, 0, 0, 0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;
    0, 0, -27460.3, 15789691, 54920.7, 0, -27460.3, -15789691, 0, 0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;
    0, 0, -15789691, 6.05271e9, 0, 2.42109e10, 15789691, 6.05271e9, 0, 0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;
    0, 0, 0, 0, -27460.3, 15789691, 54920.7, 0, -27460.3, -15789691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;
    0, 0, 0, 0, -15789691, 6.05271e9, 0, 2.42109e10, 15789691, 6.05271e9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;
    0, 0, 0, 0, 0, 0, -27460.3, 15789691, 54920.7, 0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;
    0, 0, 0, 0, 0, 0, -15789691, 6.05271e9, 0, 2.42109e10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;
    0, 0, 0, 0, 0, 0, 0, 0, -27460.3, 15789691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;
    0, 0, 0, 0, 0, 0, 0, 0, -15789691, 6.05271e9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;
    0, 0, 0, 0, 0, 0, 0, 0, 0, 0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;
    0, 0, 0, 0, 0, 0, 0, 0, 0, 0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;
    0, 0, 0, 0, 0, 0, 0, 0, 0, 0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;
    0, 0, 0, 0, 0, 0, 0, 0, 0, 0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;
    0, 0, 0, 0, 0, 0, 0, 0, 0, 0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;
    0, 0, 0, 0, 0, 0, 0, 0, 0, 0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;
    0, 0, 0, 0, 0, 0, 0, 0, 0, 0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;
    0, 0, 0, 0, 0, 0, 0, 0, 0, 0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;
    0, 0, 0, 0, 0, 0, 0, 0, 0, 0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;
    0, 0, 0, 0, 0, 0, 0, 0, 0, 0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]
F_gl = [3450000; -661250000; 6900000; 0; 6900000; 0; 6900000; 0; 6900000; 0; 6900000; 0; 6900000; 0; 6900000; 0; 6900000; 0; 6900000; 0; 3450000; 661250000]
n := [1; 21]  # Tuleb muuta vastavalt eelnevale infole
U := BOUND(n) = [
    0, 1, 0, 0, 0, 0, 0, 0, 0, 0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;
    0, 0, 1, 0, 0, 0, 0, 0, 0, 0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;
    0, 0, 0, 1, 0, 0, 0, 0, 0, 0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;
    0, 0, 0, 0, 1, 0, 0, 0, 0, 0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;
    0, 0, 0, 0, 0, 1, 0, 0, 0, 0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;
    0, 0, 0, 0, 0, 0, 1, 0, 0, 0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;
    0, 0, 0, 0, 0, 0, 0, 1, 0, 0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;
    0, 0, 0, 0, 0, 0, 0, 0, 1, 0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;
    0, 0, 0, 0, 0, 0, 0, 0, 0, 1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;
    0, 0, 0, 0, 0, 0, 0, 0, 0, 0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;
    0, 0, 0, 0, 0, 0, 0, 0, 0, 0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;
    0, 0, 0, 0, 0, 0, 0, 0, 0, 0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;
    0, 0, 0, 0, 0, 0, 0, 0, 0, 0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;
    0, 0, 0, 0, 0, 0, 0, 0, 0, 0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;
    0, 0, 0, 0, 0, 0, 0, 0, 0, 0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;
    0, 0, 0, 0, 0, 0, 0, 0, 0, 0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;
    0, 0, 0, 0, 0, 0, 0, 0, 0, 0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;
    0, 0, 0, 0, 0, 0, 0, 0, 0, 0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;
    0, 0, 0, 0, 0, 0, 0, 0, 0, 0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;
    0, 0, 0, 0, 0, 0, 0, 0, 0, 0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]
u := transpose(U)*(U*K_gl*transpose(U))^-1*U*F_gl
u = [0; -109.248; 123249; -103.131; 233180; -86.5248; 319240; -62.0531; 373892; -32.3376; 392612; 0; 373892; 32.3376; 319240; 62.0531; 233180; 86.5248; 123249; 103.131; 0; 109.248]
X :=
    N_solm ← max(EL[:, 2], EL[:, 3])
    for i ∈ 1 .. N_solm
        R[i] ← h_e*(i - 1)
    return R
U_MC :=
    N_solm ← max(EL[:, 2], EL[:, 3])
    for i ∈ 1 .. N_solm
        R[i] ← u[2*i - 1]
    return R
w_f(x) := q*L^2/(G_f*A_shear*2)*(x^2/L^2 - x/L)
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w_f(X) = [0; -11449.1; -20353.9; -26714.5; -30530.9; -31803; -30530.9; -26714.5; -20353.9; -11449.1; 0]
S_MC :=
    h ← 150
    N_el ← max(EL[:, 1])
    for i_el ∈ 1 .. N_el
        for i ∈ 1 .. 4
            ue[i] ← u[(i_el - 1)*2 + i]
        for i ∈ 1 .. 6
            R[(i_el - 1)*6 + i, 1] ← (i_el - 1)*h_e + (i - 1)/5*h_e
            SUM ← 0
            for j ∈ 1 .. 4
                x ← (i - 1)/5*h_e
                SUM ← SUM + ue[j]*ddϕ(x, h_e, j)
            R[(i_el - 1)*6 + i, 2] ← -E*SUM*h/2
        1
    return R
T_MC :=
    N_el ← max(EL[:, 1])
    for i_el ∈ 1 .. N_el
        for i ∈ 1 .. 4
            ue[i] ← u[(i_el - 1)*2 + i]
        for i ∈ 1 .. 6
            R[(i_el - 1)*6 + i, 1] ← (i_el - 1)*h_e + (i - 1)/5*h_e
            SUM ← 0
            for j ∈ 1 .. 4
                x ← (i - 1)/5*h_e
                SUM ← SUM + ue[j]*dddϕ(x, h_e, j)
            R[(i_el - 1)*6 + i, 2] ← -E*SUM*S_t/b_t
        1
    return R
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S_MC = [
    0, 2992.46;
    230, 35311;
    460, 67629.6;
    690, 99948.1;
    920, 132267;
    1150, 164585;
    1150, 164585;
    1380, 189722;
    1610, 214859;
    1840, 239995
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]
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# *******************************************Timoshenko tala********************************************
ψ(i, h_e, x) :=
    R ← 2*x^2/h_e^2 - 3*x/h_e + 1 if i == 1
    R ← 4*x/h_e - 4*x^2/h_e^2 if i == 2
    R ← x/h_e - 2*x^2/h_e^2 if i == 3
K_tim_el(E, I, A_red, h_e) :=
    λ_e ← E*I/(G_f*A_shear)
    μ_0 ← 12*λ_e
    R ← 2*E*I/(μ_0*h_e)*[
        6, -3*h_e, -6, -3*h_e;
        -3*h_e, h_e^2*(1.5 + 6*λ_e), 3*h_e, h_e^2*(1.5 - 6*λ_e);
        -6, 3*h_e, 6, 3*h_e;
        -3*h_e, h_e^2*(1.5 - 6*λ_e), 3*h_e, h_e^2*(1.5 + 6*λ_e)
    ]
    return R
F_tim_el(h_e) :=
    for i ∈ 1 .. 3
        R[i] ← 0
    for inte ∈ 1 .. rows(W)
        x_a ← 0
        x_b ← h_e
        x ← 1/2*(x_a + x_b + W[inte, 1]*(x_b - x_a))
        for i ∈ 1 .. 3
            R[i] ← R[i] + W[inte, 2]*ψ(i, h_e, x)*q*(x_b - x_a)/2
    R1 ← [R_1 + 1/2*R_2; □; □; □]
    return R  # error: This placeholder is empty.
# Lõpetamata, tunnis ei jõundud järgi, moodlest ka ei leidnud haha
K_tim_gl :=
    dim ← 2*max(EL[:, 2], EL[:, 3])
    for i ∈ 1 .. dim
        for j ∈ 1 .. dim
            R[i, j] ← 0
    for el ∈ 1 .. rows(EL)
        Kel ← K_tim_el(E, I, A_shear, h_e)
        for i ∈ 1 .. 2
            for j ∈ 1 .. 2
                1
                for i_v ∈ 1 .. 2
                    for j_v ∈ 1 .. 2
                        R[(EL[el, i + 1] - 1)*2 + i_v, (EL[el, j + 1] - 1)*2 + j_v] ← R[(EL[el, i + 1] - 1)*2 + i_v, (EL[el, j + 1] - 1)*2 + j_v] + Kel[(i - 1)*2 + i_v, (j - 1)*2 + j_v]
    return R
F_tim_gl :=
    dim ← 2*max(EL[:, 2], EL[:, 3])
    for i ∈ 1 .. dim
        R[i] ← 0
    for el ∈ 1 .. rows(EL)
        Fel ← F_tim_el(h_e)
        for i ∈ 1 .. 2
            1
            for i_v ∈ 1 .. 2
                R[(EL[el, i + 1] - 1)*2 + i_v] ← R[(EL[el, i + 1] - 1)*2 + i_v] + Fel[(i - 1)*2 + i_v]
    return R  # error: This variable is undefined.
u_tim := transpose(U)*(U*K_tim_gl*transpose(U))^-1*U*F_gl
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