# Worksheet setting: ORIGIN = 1
# KODUTÖÖ 3
# Siim Erik Pugal
# 179411YAFB
# ***********************************************Euleri tala********************************************
# Jagasin tala 23-ks osaks
3 + 4.5 + 3 + 1 = 11.5
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11.5/23 = 0.5
0.5*23 = 11.5
# Tala elementide maatriksi EL väärtused. Esimene tulp näitab tala numbrit, teine ja kolmas sõlmede numbreid ning viimane tulp iga elemendi pikkust.
# Maatriks EL sisaldab endas süsteemi kohta käivat infot.
EL := READPRN("kohutav_idee.txt")
L := 11500
E := 210*10^3
E_f := 70
h_c := 150
ν_f := 0.01
b := 600
dim := max(EL[:, 2], EL[:, 3]) = 24
p := 0.01
h_e := L/23
t_p := 1.2
A_shear := h_c*b
q := p*b
EL = [
    1, 1, 2, 0.5;
    2, 2, 3, 0.5;
    3, 3, 4, 0.5;
    4, 4, 5, 0.5;
    5, 5, 6, 0.5;
    6, 6, 7, 0.5;
    7, 7, 8, 0.5;
    8, 8, 9, 0.5;
    9, 9, 10, 0.5;
    10, 10, 11, 0.5;
    11, 11, 12, 0.5;
    12, 12, 13, 0.5;
    13, 13, 14, 0.5;
    14, 14, 15, 0.5;
    15, 15, 16, 0.5;
    16, 16, 17, 0.5;
    17, 17, 18, 0.5;
    18, 18, 19, 0.5;
    19, 19, 20, 0.5;
    20, 20, 21, 0.5;
    21, 21, 22, 0.5;
    22, 22, 23, 0.5;
    23, 23, 24, 0.5
]
F := 5000
q = 6
G_f := E_f/(2*(1 + ν_f))
# Impulsimomendi ja staatilise momendi väärtused
I := 2*t_p^3*b/12 + 2*t_p*b*(h_c/2 + t_p/2)^2 + E_f/E*h_c^3*b/12 = 8286541
b_t := 600
S_t := 1.2*600*(75 + 0.6) + 75*600*37.5 = 1741932
# Järgnevaks on ära defineeritud kujufunktsioonid: ϕ , selle esimene tuletis dϕ ja teine tuletis ddϕ. Lisaks on ka ette antud kaalufunktsioon W.
# BOUND(n) on kood, mis arvutab ääretingimuste maatriksi.
BOUND(n) :=
    dim ← 2*max(EL[:, 2], EL[:, 3])
    dim_red ← rows(n)
    for j ∈ 1 .. dim
        for i ∈ 1 .. dim - dim_red
            R[i, j] ← 0
    ind ← 1
    s ← 0
    for k ∈ 1 .. dim
        if k ≠ n[ind]
            1
            R[k - s, k] ← 1
        if k == n[ind]
            ind ← ind + 1 if ind ≠ rows(n)
            s ← s + 1
        S[k] ← s
    return R
ϕ(x, h_e, i) :=
    R ← 2*x^3/h_e^3 - 3*x^2/h_e^2 + 1 if i == 1
    R ← 2*x^2/h_e - x^3/h_e^2 - x if i == 2
    R ← 3*x^2/h_e^2 - 2*x^3/h_e^3 if i == 3
    R ← x^2/h_e - x^3/h_e^2 if i == 4
    return R
ddϕ(x, h_e, i) :=
    R ← 12*x/h_e^3 - 6/h_e^2 if i == 1
    R ← 4/h_e - 6*x/h_e^2 if i == 2
    R ← 6/h_e^2 - 12*x/h_e^3 if i == 3
    R ← 2/h_e - 6*x/h_e^2 if i == 4
    return R
dddϕ(x, h_e, i) :=
    R ← 12/h_e^3 if i == 1
    R ← -6/h_e^2 if i == 2
    R ← -12/h_e^3 if i == 3
    R ← -6/h_e^2 if i == 4
    return R
s := 0, 50 .. h_e
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# Vaadades joonist ja võttes arvesse asjaolu, et siiret kirjeldavad paaritud komponendid, moodustub meil järgmine n maatriks:
# Kaalufunktsioon W on teise astme polünoom.
n := [1; 13; 43]
U := BOUND(n)
W := [-1/sqrt(3), 1; 1/sqrt(3), 1]
# Kood, mis arvutab igast elemendist sõltuvalt välja jäikusmaatriksi. Selle väärtuste kuvamiseks on vajalikud eelnevalt defineeritud kujufunktsioon ddϕ, kaalufunktsioon W, inertsimoment I ja elastusmoodul E.
# Kood, mis arvutab globaalse jäikusmaatriksi. Antud globaalse maatriksiga luuakse süsteem, kust lõppude lõpuks saab deformatsioone lugeda välja sellisel kujul, kus paaritud komponendid kirjeldavad siiret ja paariskomponendid pööret.
K_el(E, I, h_e) :=
    for i ∈ 1 .. 4
        for j ∈ 1 .. 4
            R[i, j] ← 0
    for inte ∈ 1 .. rows(W)
        x_a ← 0
        x_b ← h_e
        x ← 1/2*(x_a + x_b + W[inte, 1]*(x_b - x_a))
        for i ∈ 1 .. 4
            for j ∈ 1 .. 4
                R[i, j] ← R[i, j] + E*I*W[inte, 2]*ddϕ(x, h_e, i)*ddϕ(x, h_e, j)*(x_b - x_a)/2
    return R
K_gl :=
    dim ← 2*max(EL[:, 2], EL[:, 3])
    for i ∈ 1 .. dim
        for j ∈ 1 .. dim
            R[i, j] ← 0
    for el ∈ 1 .. rows(EL)
        Kel ← K_el(E, I, h_e)
        for i ∈ 1 .. 2
            for j ∈ 1 .. 2
                1
                for i_v ∈ 1 .. 2
                    for j_v ∈ 1 .. 2
                        Ξ ← (EL[el, i + 1] - 1)
                        Υ ← (EL[el, j + 1] - 1)
                        R[Ξ*2 + i_v, Υ*2 + j_v] ← R[Ξ*2 + i_v, Υ*2 + j_v] + Kel[(i - 1)*2 + i_v, (j - 1)*2 + j_v]
    return R
# Elemendi jäikusmaatriksi väärtused:
K_el(E, I, h_e) = [
    167057, -41764168, -167057, -41764168;
    -41764168, 1.39214e10, 41764168, 6.96069e9;
    -167057, 41764168, 167057, 41764168;
    -41764168, 6.96069e9, 41764168, 1.39214e10
]
# Kood, mis arvutab globaalse jõuvektori esimese osa, ehk see kood arvutab välja lauskoormuse p. Lauskoormus definitsiooni poolest koosneb kahest osast: äärtesse mõjuvatest lõikejõududest ja paindemomentidest.
# Kood, mis arvutab globaalse jõuvektori teise osa ehk lisab sõlme rakendatud jõu.
# Kood, mis arvutab igast elemendist sõltuvalt välja jõuvektori. Deformatsioonist tuleneva kuju kirjeldab peamiselt kaalufunktsioon W ja kujufunktsioon ϕ.
F_el(h_e) :=
    for i ∈ 1 .. 4
        R[i] ← 0
    for inte ∈ 1 .. rows(W)
        x_a ← 0
        x_b ← h_e
        x ← 1/2*(x_a + x_b + W[inte, 1]*(x_b - x_a))
        for i ∈ 1 .. 4
            R[i] ← R[i] + W[inte, 2]*ϕ(x, h_e, i)*q*(x_b - x_a)/2
    return R
# Jõuvektori väärtused:
F1_gl :=
    dim ← 2*max(EL[:, 2], EL[:, 3])
    for i ∈ 1 .. dim
        R[i] ← 0
    for el ∈ 1 .. rows(EL)
        Fel ← F_el(h_e)
        for i ∈ 1 .. 2
            for i_v ∈ 1 .. 2
                Ξ ← EL[el, i + 1] - 1
                R[Ξ*2 + i_v] ← R[Ξ*2 + i_v] + Fel[(i - 1)*2 + i_v]
    return R
F2_gl :=
    dim ← 2*max(EL[:, 2], EL[:, 3])
    for i ∈ 1 .. dim
        R[i] ← 0
    R[31] ← 5*10^3
    return R
F_el(h_e) = [1500; -125000; 1500; 125000]
# Osa globaalse jäikusmaatriksi K_gl (48 x 48) väärtustest.
K_gl =  # no stored result
F_gl := -(F1_gl + F2_gl)
# Globaalse jõuvektori (48 x 1) väärtused eraldi välja toodud.
F1_gl = [
    1500; -125000; 3000; 0; 3000; 0; 3000; 0; 3000; 0
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]
F2_gl = [
    0; 0; 0; 0; 0; 0; 0; 0; 0; 0
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]
F_gl = [
    -1500; 125000; -3000; 0; -3000; 0; -3000; 0; -3000; 0
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]
# Kood siirete vektori koostamise jaoks.
u := transpose(U)*(U*K_gl*transpose(U))^-1*U*F_gl
# Siirete vektori (48 x 1) väärtused:
u = [
    0; -0.00631864; 3.11646; -0.0060435; 5.9039; -0.00493075; 7.83577; -0.00254939; 8.17002; 0.00153156
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]
# Graafiku koostamiseks kantakse y-teljele talas toimuvad siirded ning x-teljele tala sõlmede kaugused, kus siirded täpselt toimuvad.
#
# Kood U_MC võtab siirete maatriksist u välja paaritud komponendid, ehk need väärtused mis kirjeldavad igas sõlmes toimuvad siiret.
#
# Kood X kirjutab välja iga sõlme kauguse, kui nullpunkt asub tala vasakus otsas.
U_MC :=
    N_solm ← max(EL[:, 2], EL[:, 3])
    for i ∈ 1 .. N_solm
        R[i] ← u[2*i - 1]
    return R
X :=
    N_solm ← max(EL[:, 2], EL[:, 3])
    for i ∈ 1 .. N_solm
        R[i] ← h_e*(i - 1)
    return R
# *************************************************Timoshenko tala************************************************
# Andmed: | EL maatriks jääb selliseks nagu ennegi.
A_red := h_c*b = 90000
E = 210000
I = 8286541
E_v := 70
L = 11500
ν_v := 0.01
q = 6
G_v := E_v/(2*(1 + ν_v))
h_e = 500
# Mis muudab Timošenko tala erinevaks Euleri omast on see, et Timošenko võtab arvesse lisaks eelnevatele tasakaaluvõrranditele veel kinemaatilised seosed, mis seovad sisejõud deformatsiooni kirjeldatavate suurustega. Selleks on oluline tuua sisse funktsioon ψ, mis kirjeldab tala ristlõike pinna pöördumist y-telje suhtes ning on tingitud ainult paindedeformatsioonist. Samas pole aga mainitud deformatsioon endam võrdeline läbipainde teise tuletisega.
EL = [
    1, 1, 2, 0.5;
    2, 2, 3, 0.5;
    3, 3, 4, 0.5;
    4, 4, 5, 0.5;
    5, 5, 6, 0.5;
    6, 6, 7, 0.5;
    7, 7, 8, 0.5;
    8, 8, 9, 0.5;
    9, 9, 10, 0.5;
    10, 10, 11, 0.5;
    11, 11, 12, 0.5;
    12, 12, 13, 0.5;
    13, 13, 14, 0.5;
    14, 14, 15, 0.5;
    15, 15, 16, 0.5;
    16, 16, 17, 0.5;
    17, 17, 18, 0.5;
    18, 18, 19, 0.5;
    19, 19, 20, 0.5;
    20, 20, 21, 0.5;
    21, 21, 22, 0.5;
    22, 22, 23, 0.5;
    23, 23, 24, 0.5
]
ψ(i, h_e, x) :=
    R ← (2*x^2/h_e^2 - 3*x/h_e + 1) if i == 1
    R ← (4*x/h_e - 4*x^2/h_e^2) if i == 2
    R ← -(x/h_e - 2*x^2/h_e^2) if i == 3
    return R
# Timošenko tala elementide jäikusmaatriksis on lisaks omapärastele valemitele veel juurde lisatud nihkeelastsusmaatriks G_v ja ristlõike pindala A_red.
K_tim_el(E, G_v, I, A_red, h_e) :=
    λ_e ← E*I/(G_v*A_red*h_e^2)
    μ_0 ← 12*λ_e
    R ← 2*E*I/(μ_0*h_e^3)*[
        6, -3*h_e, -6, -3*h_e;
        -3*h_e, h_e^2*(1.5 + 6*λ_e), 3*h_e, h_e^2*(1.5 - 6*λ_e);
        -6, 3*h_e, 6, 3*h_e;
        -3*h_e, h_e^2*(1.5 - 6*λ_e), 3*h_e, h_e^2*(1.5 + 6*λ_e)
    ]
    return R
# Elementide jäiksumaatriksi väärtused:
K_tim_el(E, G_v, I, A_red, h_e) = [
    6237.62, -1559406, -6237.62, -1559406;
    -1559406, 3.8702e9, 1559406, -3.0905e9;
    -6237.62, 1559406, 6237.62, 1559406;
    -1559406, -3.0905e9, 1559406, 3.8702e9
]
# Tala globaalne jäikusmaatriks ja jõuvektor kuvatakse praktiliselt samamoodi nagu Euleri tala puhulgi. Ainuksed erinevused seisnevad selles, et elementide jäikusmaatriks ja jõuvektor on arvutatud Timošenko tala valemitega.
K_tim_gl :=
    dim ← 2*max(EL[:, 2], EL[:, 3])
    for i ∈ 1 .. dim
        for j ∈ 1 .. dim
            R[i, j] ← 0
    for el ∈ 1 .. rows(EL)
        Kel ← K_tim_el(E, G_v, I, A_red, h_e)
        for i ∈ 1 .. 2
            for j ∈ 1 .. 2
                1
                for i_v ∈ 1 .. 2
                    for j_v ∈ 1 .. 2
                        Ξ ← (EL[el, i + 1] - 1)
                        Υ ← (EL[el, j + 1] - 1)
                        R[Ξ*2 + i_v, Υ*2 + j_v] ← R[Ξ*2 + i_v, Υ*2 + j_v] + Kel[(i - 1)*2 + i_v, (j - 1)*2 + j_v]
    return R
# Elementide kood on enamjaolt sarnane Euleri omaga, kuid nüüd on sisse toodud funktsioon ψ ning väärtused kuvatakse R1, R2, R3 ja R4 väärtuste kombinatsioonide kujul.
F_tim_el(h_e) :=
    for i ∈ 1 .. 3
        R[i] ← 0
    for inte ∈ 1 .. rows(W)
        x_a ← 0
        x_b ← h_e
        x ← 1/2*(x_a + x_b + W[inte, 1]*(x_b - x_a))
        for i ∈ 1 .. 3
            R[i] ← R[i] + W[inte, 2]*ψ(i, h_e, x)*q*(x_b - x_a)/2
    R1 ← [R[1] + 1/2*R[2]; -1/8*R[2]*h_e; R[3] + 1/2*R[2]; 1/8*R[2]*h_e]
    return R1
# Elementide jõuvektori väärtused:
F_tim_el(h_e) = [1500; -125000; 1500; 125000]
# Globaalne jõuvektor samamoodi nagu Euleri talaga:
F1_tim_gl :=
    dim ← 2*max(EL[:, 2], EL[:, 3])
    for i ∈ 1 .. dim
        R[i] ← 0
    for el ∈ 1 .. rows(EL)
        Fel ← F_tim_el(h_e)
        for i ∈ 1 .. 2
            for i_v ∈ 1 .. 2
                Ξ ← EL[el, i + 1] - 1
                R[Ξ*2 + i_v] ← R[Ξ*2 + i_v] + Fel[(i - 1)*2 + i_v]
    return R
F2_tim_gl :=
    dim ← 2*max(EL[:, 2], EL[:, 3])
    for i ∈ 1 .. dim
        R[i] ← 0
    R[31] ← 5*10^3
    return R
# Ka Timošenko tala puhul arvutatakse siire samade valemitega.
F_tim_gl := -(F1_tim_gl + F2_tim_gl)
# Globaalse jäikusmaatriksi (48 x 48) ja jõuvektori (48 x 1) arvulised väärtused:
u_tim := transpose(U)*(U*K_tim_gl*transpose(U))^-1*U*F_tim_gl
U_tim_MC :=
    N_solm ← max(EL[:, 2], EL[:, 3])
    for i ∈ 1 .. N_solm
        R[i] ← u_tim[2*i - 1]
    return R
u_tim = [
    0; -0.00224014; 1.63568; -0.00202042; 3.46076; -0.00107393; 5.00411; 0.00103032; 5.5791; 0.00472332
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]
X :=
    N_solm ← max(EL[:, 2], EL[:, 3])
    for i ∈ 1 .. N_solm
        R[i] ← h_e*(i - 1)
    return R
K_tim_gl =  # no stored result
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F_tim_gl = [
    -1500; 125000; -3000; 0; -3000; 0; -3000; 0; -3000; 0
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]
