# Worksheet setting: ORIGIN = 1
# KODUTÖÖ 3
# Siim Erik Pugal
# 179411YAFB
# ***********************************************Euleri tala********************************************
# Jagasin tala 23-ks osaks
3 + 4.5 + 3 + 1 = 11.5
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11.5/23 = 0.5
0.5*23 = 11.5
# Tala elementide maatriksi EL väärtused. Esimene tulp näitab tala numbrit, teine ja kolmas sõlmede numbreid ning viimane tulp iga elemendi pikkust.
# Maatriks EL sisaldab endas süsteemi kohta käivat infot.
EL := READPRN("kohutav_idee.txt")
L := 11500
E := 210*10^3
E_f := 70*10^3
h_c := 150
ν_f := 0.01
b := 600
dim := max(EL[:, 2], EL[:, 3]) = 24
p := 0.01*10^3
h_e := L/23
t_p := 1.2
A_shear := h_c*b
q := p*b
EL = [
    1, 1, 2, 0.5;
    2, 2, 3, 0.5;
    3, 3, 4, 0.5;
    4, 4, 5, 0.5;
    5, 5, 6, 0.5;
    6, 6, 7, 0.5;
    7, 7, 8, 0.5;
    8, 8, 9, 0.5;
    9, 9, 10, 0.5;
    10, 10, 11, 0.5;
    11, 11, 12, 0.5;
    12, 12, 13, 0.5;
    13, 13, 14, 0.5;
    14, 14, 15, 0.5;
    15, 15, 16, 0.5;
    16, 16, 17, 0.5;
    17, 17, 18, 0.5;
    18, 18, 19, 0.5;
    19, 19, 20, 0.5;
    20, 20, 21, 0.5;
    21, 21, 22, 0.5;
    22, 22, 23, 0.5;
    23, 23, 24, 0.5
]
F := 5
q = 6000
G_f := E_f/(2*(1 + ν_f))
# Impulsimomendi ja staatilise momendi väärtused
I := 2*(t_p^3*b/12 + 2*t_p*b*(h_c/2 + t_p/2)^2 + E_f/E*h_c^3*b/12) = 128960410
b_t := 600
S_t := 1.2*600*(75 + 0.6) + 75*600*37.5 = 1741932
# Järgnevaks on ära defineeritud kujufunktsioonid: ϕ , selle esimene tuletis dϕ ja teine tuletis ddϕ. Lisaks on ka ette antud kaalufunktsioon W.
# BOUND(n) on kood, mis arvutab ääretingimuste maatriksi.
BOUND(n) :=
    dim ← 2*max(EL[:, 2], EL[:, 3])
    dim_red ← rows(n)
    for j ∈ 1 .. dim
        for i ∈ 1 .. dim - dim_red
            R[i, j] ← 0
    ind ← 1
    s ← 0
    for k ∈ 1 .. dim
        if k ≠ n[ind]
            1
            R[k - s, k] ← 1
        if k == n[ind]
            ind ← ind + 1 if ind ≠ rows(n)
            s ← s + 1
        S[k] ← s
    return R
ϕ(x, h_e, i) :=
    R ← 2*x^3/h_e^3 - 3*x^2/h_e^2 + 1 if i == 1
    R ← 2*x^2/h_e - x^3/h_e^2 - x if i == 2
    R ← 3*x^2/h_e^2 - 2*x^3/h_e^3 if i == 3
    R ← x^2/h_e - x^3/h_e^2 if i == 4
    return R
ddϕ(x, h_e, i) :=
    R ← 12*x/h_e^3 - 6/h_e^2 if i == 1
    R ← 4/h_e - 6*x/h_e^2 if i == 2
    R ← 6/h_e^2 - 12*x/h_e^3 if i == 3
    R ← 2/h_e - 6*x/h_e^2 if i == 4
    return R
dddϕ(x, h_e, i) :=
    R ← 12/h_e^3 if i == 1
    R ← -6/h_e^2 if i == 2
    R ← -12/h_e^3 if i == 3
    R ← -6/h_e^2 if i == 4
    return R
s := 0, 50 .. h_e
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# Vaadades joonist ja võttes arvesse asjaolu, et siiret kirjeldavad paaritud komponendid, moodustub meil järgmine n maatriks:
# Kaalufunktsioon W on teise astme polünoom.
n := [1; 13; 21; 43]
U := BOUND(n)
W := [-1/sqrt(3), 1; 1/sqrt(3), 1]
# Kood, mis arvutab igast elemendist sõltuvalt välja jäikusmaatriksi. Selle väärtuste kuvamiseks on vajalikud eelnevalt defineeritud kujufunktsioon ddϕ, kaalufunktsioon W, inertsimoment I ja elastusmoodul E.
# Kood, mis arvutab globaalse jäikusmaatriksi. Antud globaalse maatriksiga luuakse süsteem, kust lõppude lõpuks saab deformatsioone lugeda välja sellisel kujul, kus paaritud komponendid kirjeldavad siiret ja paariskomponendid pööret.
K_el(E, I, h_e) :=
    for i ∈ 1 .. 4
        for j ∈ 1 .. 4
            R[i, j] ← 0
    for inte ∈ 1 .. rows(W)
        x_a ← 0
        x_b ← h_e
        x ← 1/2*(x_a + x_b + W[inte, 1]*(x_b - x_a))
        for i ∈ 1 .. 4
            for j ∈ 1 .. 4
                R[i, j] ← R[i, j] + E*I*W[inte, 2]*ddϕ(x, h_e, i)*ddϕ(x, h_e, j)*(x_b - x_a)/2
    return R
K_gl :=
    dim ← 2*max(EL[:, 2], EL[:, 3])
    for i ∈ 1 .. dim
        for j ∈ 1 .. dim
            R[i, j] ← 0
    for el ∈ 1 .. rows(EL)
        Kel ← K_el(E, I, h_e)
        for i ∈ 1 .. 2
            for j ∈ 1 .. 2
                1
                for i_v ∈ 1 .. 2
                    for j_v ∈ 1 .. 2
                        Ξ ← (EL[el, i + 1] - 1)
                        Υ ← (EL[el, j + 1] - 1)
                        R[Ξ*2 + i_v, Υ*2 + j_v] ← R[Ξ*2 + i_v, Υ*2 + j_v] + Kel[(i - 1)*2 + i_v, (j - 1)*2 + j_v]
    return R
# Elemendi jäikusmaatriksi väärtused:
K_el(E, I, h_e) = [
    2599842, -649960464, -2599842, -649960464;
    -649960464, 216653488128, 649960464, 1.08327e11;
    -2599842, 649960464, 2599842, 649960464;
    -649960464, 1.08327e11, 649960464, 2.16653e11
]
# Kood, mis arvutab globaalse jõuvektori esimese osa, ehk see kood arvutab välja lauskoormuse p. Lauskoormus definitsiooni poolest koosneb kahest osast: äärtesse mõjuvatest lõikejõududest ja paindemomentidest.
# Kood, mis arvutab globaalse jõuvektori teise osa ehk lisab sõlme rakendatud jõu.
# Kood, mis arvutab igast elemendist sõltuvalt välja jõuvektori. Deformatsioonist tuleneva kuju kirjeldab peamiselt kaalufunktsioon W ja kujufunktsioon ϕ.
F_el(h_e) :=
    for i ∈ 1 .. 4
        R[i] ← 0
    for inte ∈ 1 .. rows(W)
        x_a ← 0
        x_b ← h_e
        x ← 1/2*(x_a + x_b + W[inte, 1]*(x_b - x_a))
        for i ∈ 1 .. 4
            R[i] ← R[i] + W[inte, 2]*ϕ(x, h_e, i)*q*(x_b - x_a)/2
    return R
# Jõuvektori väärtused:
F1_gl :=
    dim ← 2*max(EL[:, 2], EL[:, 3])
    for i ∈ 1 .. dim
        R[i] ← 0
    for el ∈ 1 .. rows(EL)
        Fel ← F_el(h_e)
        for i ∈ 1 .. 2
            1
            for i_v ∈ 1 .. 2
                Ξ ← EL[el, i + 1] - 1
                R[Ξ*2 + i_v] ← R[Ξ*2 + i_v] + Fel[(i - 1)*2 + i_v]
    return R
F2_gl :=
    dim ← 2*max(EL[:, 2], EL[:, 3])
    for i ∈ 1 .. dim
        R[i] ← 0
    R[16] ← -5*10^3
    return R
F_el(h_e) = [1500000; -125000000; 1500000; 125000000]
# Osa globaalse jäikusmaatriksi K_gl (48 x 48) väärtustest.
K_gl =  # no stored result
F_gl := F1_gl + F2_gl
# Globaalse jõuvektori (48 x 1) väärtused eraldi välja toodud.
F1_gl = [
    1500000; -125000000; 3000000; 0; 3000000; 0; 3000000; 0; 3000000; 0
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]
F2_gl = [
    0; 0; 0; 0; 0; 0; 0; 0; 0; 0
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]
F_gl = [
    1500000; -125000000; 3000000; 0; 3000000; 0; 3000000; 0; 3000000; 0
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]
# Kood siirete vektori koostamise jaoks.
u := transpose(U)*(U*K_gl*transpose(U))^-1*U*F_gl
# Siirete vektori väärtused: | Tala läbipaine w väärtused:
# Tala läbipaine w tuleneb järgnevast analüütilisest lahendist, mis võtab arvesse koormuse q, tala pikkuse L, ristlõike A_sheer, nihkeelastusmooduli G_f ning sõlmede kaugused x.
w_f(x) := q*L^2/(G_f*A_shear*2)*(x^2/L^2 - x/L)
# Graafiku koostamiseks kantakse y-teljele talas toimuvad siirded ning x-teljele tala sõlmede kaugused, kus siirded täpselt toimuvad.
#
# Kood U_MC võtab siirete maatriksist u välja paaritud komponendid, ehk need väärtused mis kirjeldavad igas sõlmes toimuvad siiret.
#
# Kood X kirjutab välja iga sõlme kauguse, kui nullpunkt asub tala vasakus otsas.
U_MC :=
    N_solm ← max(EL[:, 2], EL[:, 3])
    for i ∈ 1 .. N_solm
        R[i] ← u[2*i - 1]
    return R
X :=
    N_solm ← max(EL[:, 2], EL[:, 3])
    for i ∈ 1 .. N_solm
        R[i] ← h_e*(i - 1)
    return R
u = [
    0; -0.211641; 99.9962; -0.177849; 169.663; -0.0949373; 191.362; 0.00940126; 161.306; 0.107472
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]
w_f(X) = [0; -5.29048; -10.1; -14.4286; -18.2762; -21.6429; -24.5286; -26.9333; -28.8571; -30.3; -31.2619; -31.7429; -31.7429; -31.2619; -30.3; -28.8571; -26.9333; -24.5286; -21.6429; -18.2762; -14.4286; -10.1; -5.29048; 0]
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# Kood, mis liigub mööda tala ning arvutab välja selles esinevad sisepinged.
# S_MC väärtused eraldi välja toodud. Esimene tulp näitab sõlme kaugust, teine aga sisepinged.
S_MC :=
    h ← 150
    N_el ← max(EL[:, 1])
    for i_el ∈ 1 .. N_el
        for i ∈ 1 .. 4
            ue[i] ← u[(i_el - 1)*2 + i]
        for i ∈ 1 .. 6
            R[(i_el - 1)*6 + i, 1] ← (i_el - 1)*h_e + (i - 1)/5*h_e
            SUM ← 0
            for j ∈ 1 .. 4
                x ← (i - 1)/5*h_e
                SUM ← SUM + ue[j]*ddϕ(x, h_e, j)
            R[(i_el - 1)*6 + i, 2] ← -E*SUM*h/2
    return R
S_MC = [
    0, 72.6967;
    100, 469.392;
    200, 866.087;
    300, 1262.78;
    400, 1659.48;
    500, 2056.17;
    500, 2056.17;
    600, 2278.4;
    700, 2500.62;
    800, 2722.84
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]
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# Kood, mis liigub mööda tala ning arvutab välja selles esinevad sisejõud.
# T_MC väärtused eraldi välja toodud. Esimene tulp näitab sõlme kaugust, teine aga väändemomenti.
T_MC :=
    N_el ← max(EL[:, 1])
    for i_el ∈ 1 .. N_el
        for i ∈ 1 .. 4
            ue[i] ← u[(i_el - 1)*2 + i]
        for i ∈ 1 .. 6
            R[(i_el - 1)*6 + i, 1] ← (i_el - 1)*h_e + (i - 1)/5*h_e
            SUM ← 0
            for j ∈ 1 .. 4
                x ← (i - 1)/5*h_e
                SUM ← SUM + ue[j]*dddϕ(x, h_e, j)
            R[(i_el - 1)*6 + i, 2] ← -E*SUM*S_t/b_t
    return R
T_MC = [
    0, 153.559;
    100, 153.559;
    200, 153.559;
    300, 153.559;
    400, 153.559;
    500, 153.559;
    500, 86.0216;
    600, 86.0216;
    700, 86.0216;
    800, 86.0216
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]
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# *************************************************Timoshenko tala************************************************
# EL maatriks jääb selliseks nagu ennegi.
A_red := h_c*b = 90000
E_v := 70*10^3
# Andmed:
h_e = 500
ν_v := 0.01
E = 210000
G_v := E_v/(2*(1 + ν_v))
I = 128960410
L = 11500
q = 6000
# Mis muudab Timošenko tala erinevaks Euleri omast on see, et Timošenko võtab arvesse lisaks eelnevatele tasakaaluvõrranditele veel kinemaatilised seosed, mis seovad sisejõud deformatsiooni kirjeldatavate suurustega. Selleks on oluline tuua sisse funktsioon ψ, mis kirjeldab tala ristlõike pinna pöördumist y-telje suhtes ning on tingitud ainult paindedeformatsioonist. Samas pole aga mainitud deformatsioon endam võrdeline läbipainde teise tuletisega.
EL = [
    1, 1, 2, 0.5;
    2, 2, 3, 0.5;
    3, 3, 4, 0.5;
    4, 4, 5, 0.5;
    5, 5, 6, 0.5;
    6, 6, 7, 0.5;
    7, 7, 8, 0.5;
    8, 8, 9, 0.5;
    9, 9, 10, 0.5;
    10, 10, 11, 0.5;
    11, 11, 12, 0.5;
    12, 12, 13, 0.5;
    13, 13, 14, 0.5;
    14, 14, 15, 0.5;
    15, 15, 16, 0.5;
    16, 16, 17, 0.5;
    17, 17, 18, 0.5;
    18, 18, 19, 0.5;
    19, 19, 20, 0.5;
    20, 20, 21, 0.5;
    21, 21, 22, 0.5;
    22, 22, 23, 0.5;
    23, 23, 24, 0.5
]
ψ(i, h_e, x) :=
    R ← (2*x^2/h_e^2 - 3*x/h_e + 1) if i == 1
    R ← (4*x/h_e - 4*x^2/h_e^2) if i == 2
    R ← -(x/h_e - 2*x^2/h_e^2) if i == 3
    return R
# Timošenko tala elementide jäikusmaatriksis on lisaks omapärastele valemitele veel juurde lisatud nihkeelastsusmaatriks G_v ja ristlõike pindala A_red.
K_tim_el(E, G_v, I, A_red, h_e) :=
    λ_e ← E*I/(G_v*A_red*h_e^2)
    μ_0 ← 12*λ_e
    R ← 2*E*I/(μ_0*h_e^3)*[
        6, -3*h_e, -6, -3*h_e;
        -3*h_e, h_e^2*(1.5 + 6*λ_e), 3*h_e, h_e^2*(1.5 - 6*λ_e);
        -6, 3*h_e, 6, 3*h_e;
        -3*h_e, h_e^2*(1.5 - 6*λ_e), 3*h_e, h_e^2*(1.5 + 6*λ_e)
    ]
    return R
dψ(i, h_e, x) :=
    R ← (4*x/h_e^2 - 3/h_e) if i == 1
    R ← (4/h_e - 8*x/h_e^2) if i == 2
    R ← -(1/h_e - 4*x/h_e^2) if i == 3
    return R
ddψ(i, h_e, x) :=
    R ← 4/h_e^2 if i == 1
    R ← -8/h_e^2 if i == 2
    R ← 4/h_e^2 if i == 3
    return R
# Elementide jäiksumaatriksi väärtused:
# Tala globaalne jäikusmaatriks ja jõuvektor kuvatakse praktiliselt samamoodi nagu Euleri tala puhulgi. Ainuksed erinevused seisnevad selles, et elementide jäikusmaatriks ja jõuvektor on arvutatud Timošenko tala valemitega.
K_tim_gl :=
    dim ← 2*max(EL[:, 2], EL[:, 3])
    for i ∈ 1 .. dim
        for j ∈ 1 .. dim
            R[i, j] ← 0
    for el ∈ 1 .. rows(EL)
        Kel ← K_tim_el(E, G_v, I, A_red, h_e)
        for i ∈ 1 .. 2
            for j ∈ 1 .. 2
                1
                for i_v ∈ 1 .. 2
                    for j_v ∈ 1 .. 2
                        Ξ ← (EL[el, i + 1] - 1)
                        Υ ← (EL[el, j + 1] - 1)
                        R[Ξ*2 + i_v, Υ*2 + j_v] ← R[Ξ*2 + i_v, Υ*2 + j_v] + Kel[(i - 1)*2 + i_v, (j - 1)*2 + j_v]
    return R
K_tim_el(E, G_v, I, A_red, h_e) = [
    6237624, -1.55941e9, -6237624, -1.55941e9;
    -1.55941e9, 4.44015e11, 1.55941e9, 3.35688e11;
    -6237624, 1.55941e9, 6237624, 1.55941e9;
    -1.55941e9, 3.35688e11, 1.55941e9, 4.44015e11
]
# Elementide jõuvektori kood on enamjaolt sarnane Euleri omaga, kuid nüüd on sisse toodud funktsioon ψ ning väärtused kuvatakse R1, R2, R3 ja R4 väärtuste omapäraste kombinatsioonide kujul.
F_tim_el(h_e) :=
    for i ∈ 1 .. 3
        R[i] ← 0
    for inte ∈ 1 .. rows(W)
        x_a ← 0
        x_b ← h_e
        x ← 1/2*(x_a + x_b + W[inte, 1]*(x_b - x_a))
        for i ∈ 1 .. 3
            R[i] ← R[i] + W[inte, 2]*ψ(i, h_e, x)*q*(x_b - x_a)/2
    R1 ← [R[1] + 1/2*R[2]; -1/8*R[2]*h_e; R[3] + 1/2*R[2]; 1/8*R[2]*h_e]
    return R1
F1_tim_gl :=
    dim ← 2*max(EL[:, 2], EL[:, 3])
    for i ∈ 1 .. dim
        R[i] ← 0
    for el ∈ 1 .. rows(EL)
        Fel ← F_tim_el(h_e)
        for i ∈ 1 .. 2
            for i_v ∈ 1 .. 2
                Ξ ← EL[el, i + 1] - 1
                R[Ξ*2 + i_v] ← R[Ξ*2 + i_v] + Fel[(i - 1)*2 + i_v]
    return R
F2_tim_gl :=
    dim ← 2*max(EL[:, 2], EL[:, 3])
    for i ∈ 1 .. dim
        R[i] ← 0
    R[16] ← -5*10^3
    return R
# Elementide jõuvektori väärtused:
F_tim_el(h_e) = [1500000; -125000000; 1500000; 125000000]
# Ka Timošenko tala puhul arvutatakse siire ja läbipaine samade valemitega.
F_tim_gl := F1_tim_gl + F2_tim_gl
u_tim := transpose(U)*(U*K_tim_gl*transpose(U))^-1*U*F_tim_gl  # Globaalse jäikusmaatriksi (48 x 48) ja jõuvektori (48 x 1) arvulised väärtused:
U_tim_MC :=
    N_solm ← max(EL[:, 2], EL[:, 3])
    for i ∈ 1 .. N_solm
        R[i] ← u_tim[2*i - 1]
    return R
K_tim_gl =  # no stored result
u_tim = [
    0; -0.212406; 98.8294; -0.178526; 167.914; -0.0953484; 189.527; 0.00943208; 159.793; 0.108122
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]
X :=
    N_solm ← max(EL[:, 2], EL[:, 3])
    for i ∈ 1 .. N_solm
        R[i] ← h_e*(i - 1)
    return R
w_q(x) := q*L^2/(G_v*A_red*2)*(x^2/L^2 - x/L)
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F_tim_gl = [
    1500000; -125000000; 3000000; 0; 3000000; 0; 3000000; 0; 3000000; 0
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]
# Timošenko tala jaoks arvutatud sisepinged. Nagu väärtustest ja graafikust näha on siis mingil põhjusel tulevad Timošenko tala väärtused kõvasti suuremad Euleri omadest.
# Sarnane probleem tekib ka väändepingete arvutamisel.
S_MC_tim :=
    h ← 150
    N_el ← max(EL[:, 1])
    for i_el ∈ 1 .. N_el
        for i ∈ 1 .. 4
            ue[i] ← u_tim[(i_el - 1)*2 + i]
        for i ∈ 1 .. 6
            R[(i_el - 1)*6 + i, 1] ← (i_el - 1)*h_e + (i - 1)/5*h_e
            SUM ← 0
            for j ∈ 1 .. 4
                x ← (i - 1)/5*h_e
                SUM ← SUM + ue[j]*dψ(j, h_e, x)
            R[(i_el - 1)*6 + i, 2] ← -E*SUM*h/2
    return R
T_MC_tim :=
    N_el ← max(EL[:, 1])
    for i_el ∈ 1 .. N_el
        for i ∈ 1 .. 4
            ue[i] ← u_tim[(i_el - 1)*2 + i]
        for i ∈ 1 .. 6
            R[(i_el - 1)*6 + i, 1] ← (i_el - 1)*h_e + (i - 1)/5*h_e
            SUM ← 0
            for j ∈ 1 .. 4
                x ← (i - 1)/5*h_e
                SUM ← SUM + ue[j]*ddψ(j, h_e, x)
            R[(i_el - 1)*6 + i, 2] ← -E*SUM*S_t/b_t
    return R
S_MC_tim = [
    0, 3139890;
    100, 638683;
    200, -1862524;
    300, -4363731;
    400, -6864937;
    500, -9366144;
    500, 14651154;
    600, 7920232;
    700, 1189310;
    800, -5541613
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]
T_MC_tim = [
    0, -968207;
    100, -968207;
    200, -968207;
    300, -968207;
    400, -968207;
    500, -968207;
    500, -2605513;
    600, -2605513;
    700, -2605513;
    800, -2605513
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]
# Timošenko tala sise- ja väändepingete graafikud:
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