# Worksheet setting: ORIGIN = 1
# Kristofer Kõss 179515EARB
# KODUTÖÖ 2
# Lähteülesandeks on leida sõrestiku sõlmede siirded ja sisejõud varrastes.
# Ülesannet kirjeldav joonis on toodud allpool. Tegemist on kraana konstruktsiooniga.
# Defineerin ülesande lahendamiseks tarvilikud lähteandmed, mis on meie jaoks teada.
E := 12000  # MPa
A_1 := 6500  # mm^2  # ehk valime vabalt ristlõiked vöönditele.
A_2 := 5000
A_3 := 6500
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# 1 vöönd
# 2 vöönd
# 3 vöönd
# Loen sisse maatriksi, mis sisaldab informatsiooni iga sõrestikus paikneva elemendi kohta.
# Esimeses veerus on elemendi numbrid, mis ülemisel joonisel on tähistatud roheliste numbritega, veergudes 2 ja 3 on tähistatud sõlmpunktid, millega antud element on seotud. 4 veerg on elemendi pikkus. 5 veerg on elemendi siirdevektori nurk elemendi ja globaalse koordinaattelje vahel. 6 veerg on ristlõikepindala. 7 veerg on elastsusmoodul, 8 veerg on switchid, mida kasutatakse ristlõike pindala üle kirjutamisel ehk 1 on ülemine vöö, 2 diagonaalid ning 3 alumine vöö. Nurk θ on positiivne juhul kui keeratakse x-teljelt y-teljele vastupäeva. Nurk ja elemendi pikkused on arvutatud analüütiliselt.
EL1 := READPRN("s6restik.txt")
EL1 = [
    1, 1, 3, 3000, 0, 0, 12000, 3;
    2, 1, 2, 3088.69, 60.9454, 0, 12000, 2;
    3, 2, 3, 3088.69, -60.9454, 0, 12000, 2;
    4, 2, 4, 3000, 0, 0, 12000, 1;
    5, 3, 4, 3088.69, 60.9454, 0, 12000, 2;
    6, 3, 5, 3000, 0, 0, 12000, 3;
    7, 4, 5, 3088.69, -60.9454, 0, 12000, 2;
    8, 4, 6, 3000, 0, 0, 12000, 1;
    9, 5, 6, 3088.69, 60.9454, 0, 12000, 2;
    10, 5, 7, 3000, 0, 0, 12000, 3;
    11, 6, 7, 3088.69, -60.9454, 0, 12000, 2;
    12, 6, 8, 3000, 0, 0, 12000, 1;
    13, 7, 8, 3088.69, 60.9454, 0, 12000, 2;
    14, 7, 9, 3000, 0, 0, 12000, 3;
    15, 8, 9, 3088.69, -60.9454, 0, 12000, 2;
    16, 8, 10, 3000, 0, 0, 12000, 1;
    17, 9, 10, 3088.69, 60.9454, 0, 12000, 2;
    18, 9, 11, 3000, 0, 0, 12000, 3;
    19, 10, 11, 3088.69, -60.9454, 0, 12000, 2;
    20, 10, 12, 3000, 0, 0, 12000, 1;
    21, 11, 12, 3088.69, 60.9454, 0, 12000, 2;
    22, 11, 13, 3000, 0, 0, 12000, 3;
    23, 12, 13, 3088.69, -60.9454, 0, 12000, 2
]
# Järgnevalt loen maatriksisse erinevate vööndite jaoks määratud ristlõiked kasutades selleks switche ning ülal defineeritud ristlõikeväärtusi vastavatele vöödele.
EL :=
    R ← EL1
    for i ∈ 1 .. rows(EL1)
        sw ← R[i, 8]
        R[i, 6] ← A_1 if sw == 1
        R[i, 6] ← A_2 if sw == 2
        R[i, 6] ← A_3 if sw == 3
    return R
EL = [
    1, 1, 3, 3000, 0, 6500, 12000, 3;
    2, 1, 2, 3088.69, 60.9454, 5000, 12000, 2;
    3, 2, 3, 3088.69, -60.9454, 5000, 12000, 2;
    4, 2, 4, 3000, 0, 6500, 12000, 1;
    5, 3, 4, 3088.69, 60.9454, 5000, 12000, 2;
    6, 3, 5, 3000, 0, 6500, 12000, 3;
    7, 4, 5, 3088.69, -60.9454, 5000, 12000, 2;
    8, 4, 6, 3000, 0, 6500, 12000, 1;
    9, 5, 6, 3088.69, 60.9454, 5000, 12000, 2;
    10, 5, 7, 3000, 0, 6500, 12000, 3;
    11, 6, 7, 3088.69, -60.9454, 5000, 12000, 2;
    12, 6, 8, 3000, 0, 6500, 12000, 1;
    13, 7, 8, 3088.69, 60.9454, 5000, 12000, 2;
    14, 7, 9, 3000, 0, 6500, 12000, 3;
    15, 8, 9, 3088.69, -60.9454, 5000, 12000, 2;
    16, 8, 10, 3000, 0, 6500, 12000, 1;
    17, 9, 10, 3088.69, 60.9454, 5000, 12000, 2;
    18, 9, 11, 3000, 0, 6500, 12000, 3;
    19, 10, 11, 3088.69, -60.9454, 5000, 12000, 2;
    20, 10, 12, 3000, 0, 6500, 12000, 1;
    21, 11, 12, 3088.69, 60.9454, 5000, 12000, 2;
    22, 11, 13, 3000, 0, 6500, 12000, 3;
    23, 12, 13, 3088.69, -60.9454, 5000, 12000, 2
]
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# Polaarkoordinaadid ja elemendi pikkused on leitavad ülaltoodud teooria alusel.
# Võtame kasutusele kujufunktsiooni N, mis kirjeldavad talale mõjuvate jõudude osakaalu.
# W ise on Gaussi integreerimise skeem kuuppolünoomi jaoks. Oluline aproksimeerimisel, et oleks võimalik integraal leida lihtsamal moel.
N(i, h_e, x) :=
    R ← 1 - x/h_e if i == 1
    R ← x/h_e if i == 2
    return R
W := [-sqrt(3/5), 5/9; 0, 8/9; sqrt(3/5), 5/9]
dN(i, h_e, x) :=
    R ← -1/h_e if i == 1
    R ← 1/h_e if i == 2
    return R
# Määrame maatriksi maksimaalsed vabadusastmete dimensioonid.
2*max(EL[:, 2], EL[:, 3]) = 26
dim := 2*max(EL[:, 2], EL[:, 3])
dim = 26
rows(EL) = 23
# Võtame kasutusele abistava maatriksi BU, mis aitab lõppvastuse saada õigetes dimensioonides ja kujus ehk valib välja õiged pikisiirdelised elemendid siirete maatriksist.
BU := [1, 0, 0, 0; 0, 0, 1, 0]
# Siinkohal monteerime kokku elementide kaupa iga elemendi jäikusmaatriksi. Iga element elemendi jäikusmaatriksis arvutatakse välja sama eeskirja alusel. Elemendi kohane jäikusmaatriks moodustatakse esialgsest lähteandmete maatriksist võetud konkreetse elemendi andmete põhjal - tulemusena väljastatakse elemendipõhine jäikusmaatriksi "osake" millest hiljem pannakse kokku globaalne maatriks.
K_el(el) :=
    for i ∈ 1 .. 2
        for j ∈ 1 .. 2
            R[i, j] ← 0
    for i ∈ 1 .. 2
        for j ∈ 1 .. 2
            x_a ← 0
            h_e ← EL[el, 4]
            E ← EL[el, 7]
            A ← EL[el, 6]
            x_b ← h_e
            for i_int ∈ 1 .. rows(W)
                ξ ← W[i_int, 1]
                kaal ← W[i_int, 2]
                x ← 1/2*(x_a + x_b + ξ*(x_b - x_a))
                R[i, j] ← R[i, j] + kaal*E*A*dN(i, h_e, x)*dN(j, h_e, x)*(x_b - x_a)/2
    return transpose(BU)*R*BU
# Elemendi jäikusmaatriksite väljaarvutamise tulemusel väljastatakse iga elemendi kohta iseseisev jäikusmaatriks.
# Järgneva sammuna kombineeritakse elemendipõhisest jäikusmaatriksite osadst globaalne jäikusmaatriks, kui mõnes sõlmes paiknevad siirded mõjutavad ka teisi sõlmpunkte või elemente, siis elementide jäikus antud positsioonidel maatriksis summeeritakse. See tagab selle, et absoluutselt kõik seotud sõlmede liituvad siirded on globaalses jäiksumaatriksis kajastatud.
# Defineerin teisendusmaatriksi, et oleks elemendipõhised suurused viia globaalsesse tasandisse, et selle abil moodustada elemendipõhisest süsteemist globaalne süsteem jäikusmaatriksile.
T(θ) := [cos(θ), sin(θ), 0, 0; -sin(θ), cos(θ), 0, 0; 0, 0, cos(θ), sin(θ); 0, 0, -sin(θ), cos(θ)]
K_gl :=
    dim ← 2*max(EL[:, 2], EL[:, 3])
    for i ∈ 1 .. dim
        for j ∈ 1 .. dim
            R[i, j] ← 0
    for el_n ∈ 1 .. rows(EL)
        θ ← EL[el_n, 5]*π/180
        T_el(el_n) ← T(θ)
        K ← transpose(T_el(el_n))*K_el(el_n)*T_el(el_n)
        n1 ← EL[el_n, 1]
        n2 ← EL[el_n, 2]
        for i ∈ 1 .. 2
            for j ∈ 1 .. 2
                for i2 ∈ 1 .. 2
                    for j2 ∈ 1 .. 2
                        Ι ← (2*(EL[el_n, i + 1] - 1) + i2)
                        Γ ← (2*(EL[el_n, j + 1] - 1) + j2)
                        R[Ι, Γ] ← R[Ι, Γ] + K[2*(i - 1) + i2, 2*(j - 1) + j2]
    return R
K_gl =  # no stored result
# Globaalse maatriksi kombineerimise tulemusel väljastatakse väärtus globaalsele maatriksile.
# Kuvan globaalse jäikusmaatriksi Kgl
K_gl =  # no stored result
# Loon globaalse jõuvektori Fgl, mis kirjeldab erinevates punktides rakendatud jõude - lihtsustusena omakaalu arvesse võetud ei ole. Lisan jõud meile antud elementide võrgu õigetesse punktidesse vastavasihiliste siirde elementide juurde.
F_gl :=
    Dim ← 2*max(EL[:, 2], EL[:, 3])
    el_max ← rows(EL)
    for i ∈ 1 .. Dim
        R[i, 1] ← 0
    R[22, 1] ← -5000
    R[26, 1] ← -20000
    return R
F_gl = [0; 0; 0; 0; 0; 0; 0; 0; 0; 0; 0; 0; 0; 0; 0; 0; 0; 0; 0; 0; 0; -5000; 0; 0; 0; -20000]
# Kontrollin, kas paigutasin jõud õigetesse kohtadesse.
n := 11
P := 2*(n - 1) + 2
P = 22
n := 13
P := 2*(n - 1) + 2
P = 26
# Defineerin kinnised vabadusastmed sõlmedes.
n := [2; 9; 10]
# Defineerin BOUND funktsiooni, mille eesmärk on eemaldada kinniste vabadusastmetega liikmed globaalsest jäikusmaatriksist,
# teisisõnu eemaldame andmed, mida meil ei ole vaja lahenduse saamiseks, et vähendada vajalike võrrandite arvu.
BOUND(n) :=
    dim ← 2*max(EL[:, 2], EL[:, 3])
    dim_red ← rows(n)
    for j ∈ 1 .. dim
        for i ∈ 1 .. dim - dim_red
            R[i, j] ← 0
    ind ← 1
    s ← 0
    for k ∈ 1 .. dim
        if k ≠ n[ind]
            1
            R[k - s, k] ← 1
        if k == n[ind]
            ind ← ind + 1 if ind ≠ rows(n)
            s ← s + 1
        S[k] ← s
    return R
# Kuna süsteemis on kolm vabadusastet, mis tuleb ära kaotada, siis seda saame teha kasutades U maatriksit.
# Kasutades BOUND funktsiooni piiran vastavate vabadusastmete kasutuse ehk teisisõnu U maatriksiga läbikorrutamine võtab meie jaoks lahenduste maatriksist välja ebavajalikud read ning veerud - kogu eesmärk on vabaneda ebaolulistest andmetest ja saavutada maatriksile viisakas kuju ning optimeerida vajaminevate võrrandite arve.
# Koostame ühikmaatriksi U kasutades BOUND funktsiooni, et eemaldada ühikmaatriksist kõik ebavajalikud read ja veerud.
U := BOUND(n)
U = [
    1, 0, 0, 0, 0, 0, 0, 0, 0, 0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;
    0, 0, 1, 0, 0, 0, 0, 0, 0, 0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;
    0, 0, 0, 1, 0, 0, 0, 0, 0, 0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;
    0, 0, 0, 0, 1, 0, 0, 0, 0, 0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;
    0, 0, 0, 0, 0, 1, 0, 0, 0, 0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;
    0, 0, 0, 0, 0, 0, 1, 0, 0, 0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;
    0, 0, 0, 0, 0, 0, 0, 1, 0, 0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;
    0, 0, 0, 0, 0, 0, 0, 0, 0, 0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;
    0, 0, 0, 0, 0, 0, 0, 0, 0, 0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;
    0, 0, 0, 0, 0, 0, 0, 0, 0, 0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;
    0, 0, 0, 0, 0, 0, 0, 0, 0, 0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;
    0, 0, 0, 0, 0, 0, 0, 0, 0, 0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;
    0, 0, 0, 0, 0, 0, 0, 0, 0, 0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;
    0, 0, 0, 0, 0, 0, 0, 0, 0, 0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;
    0, 0, 0, 0, 0, 0, 0, 0, 0, 0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;
    0, 0, 0, 0, 0, 0, 0, 0, 0, 0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;
    0, 0, 0, 0, 0, 0, 0, 0, 0, 0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;
    0, 0, 0, 0, 0, 0, 0, 0, 0, 0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;
    0, 0, 0, 0, 0, 0, 0, 0, 0, 0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;
    0, 0, 0, 0, 0, 0, 0, 0, 0, 0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;
    0, 0, 0, 0, 0, 0, 0, 0, 0, 0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;
    0, 0, 0, 0, 0, 0, 0, 0, 0, 0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;
    0, 0, 0, 0, 0, 0, 0, 0, 0, 0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]
# Sellest tulenevalt U maatriksi mõõtmed on 23x26. Seejärel korrutame U maatriksi läbi globaalse jäikusmaatriksiga, et eemaldada meile kõik ebavajalikud read ning veerud ja korrutame läbu ka transponeeritud U maatriksiga, et peale maatriksite korrutamist globaalne jäikusmaatriks keerata õigetpidi.
U*K_gl*transpose(U) = [
    30581.5, -4581.54, -8246.77, -26000, 0, 0, 0, 0, 0, 0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;
    -4581.54, 35163.1, 0, -4581.54, 8246.77, -26000, 0, 0, 0, 0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;
    -8246.77, 0, 29688.4, 8246.77, -14844.2, 0, 0, 0, 0, 0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;
    -26000, -4581.54, 8246.77, 61163.1, 0, -4581.54, -8246.77, 0, 0, 0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;
    0, 8246.77, -14844.2, 0, 29688.4, -8246.77, -14844.2, 0, 0, 0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;
    0, -26000, 0, -4581.54, -8246.77, 61163.1, 0, -26000, 0, 0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;
    0, 0, 0, -8246.77, -14844.2, 0, 29688.4, 0, 0, 0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;
    0, 0, 0, 0, 0, -26000, 0, 61163.1, 0, -4581.54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;
    0, 0, 0, 0, 0, 0, 0, 0, 29688.4, 8246.77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;
    0, 0, 0, 0, 0, 0, 0, -4581.54, 8246.77, 61163.1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;
    0, 0, 0, 0, 0, 0, 0, 8246.77, -14844.2, 0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;
    0, 0, 0, 0, 0, 0, 0, -26000, 0, -4581.54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;
    0, 0, 0, 0, 0, 0, 0, 0, 0, -8246.77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;
    0, 0, 0, 0, 0, 0, 0, 0, 0, -26000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;
    0, 0, 0, 0, 0, 0, 0, 0, 0, 0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;
    0, 0, 0, 0, 0, 0, 0, 0, 0, 0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;
    0, 0, 0, 0, 0, 0, 0, 0, 0, 0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;
    0, 0, 0, 0, 0, 0, 0, 0, 0, 0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;
    0, 0, 0, 0, 0, 0, 0, 0, 0, 0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;
    0, 0, 0, 0, 0, 0, 0, 0, 0, 0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;
    0, 0, 0, 0, 0, 0, 0, 0, 0, 0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;
    0, 0, 0, 0, 0, 0, 0, 0, 0, 0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;
    0, 0, 0, 0, 0, 0, 0, 0, 0, 0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]
# Peale U*K_gl*transpose(U) jääb meile sümmeetriline maatriks 23x23, mis on tehtud globaalse maatriksi alusel ehk eemaldatud on kõik ebavajalikud andmed globaalsest jäikusmaatriksist ning saame asuda lahendivektori välja arvutamise juurde.
# Seejärel on meil võimalik leida lahendustevektor V. Selleks tuleb meil  globaalne maatriks uuestu pöörata ning siirete saamiseks läbi korrutada uuesti U maatriksi ja globaalse jõuvektoriga.
V := (U*K_gl*transpose(U))^-1*U*F_gl
# Kui korrutame lahenduste vektori V omakorda transponeeritud U maatriksiga, siis saame laiendatud lahenduste vektori γ, kus on näha välja jäetud vabadusastmetega elemendid..ehk tühjad andmeread on tagasi pandud.
Υ := transpose(U)*V
V = [4.05983; 7.28227; 1.40966; 3.04487; 2.25546; 9.31218; 1.97353; 13.372; -9.11306; -3.52564; -20.1848; 16.3635; -32.9185; -5.98291; -47.0173; 18.2865; -62.1845; -7.37179; -78.1233; 19.1412; -94.2001; -7.79915; -110.514]
Υ = [4.05983; 0; 7.28227; 1.40966; 3.04487; 2.25546; 9.31218; 1.97353; 0; 0; 13.372; -9.11306; -3.52564; -20.1848; 16.3635; -32.9185; -5.98291; -47.0173; 18.2865; -62.1845; -7.37179; -78.1233; 19.1412; -94.2001; -7.79915; -110.514]
# Arvutan välja sisejõud etteantud võrrandi põhjal.
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σ_a := 20*10^6  # Pa  # Vastus, millest pinged ei tohi üheski talas üle minna.
N := σ_a*A*10^-6
N = 20 A  # Vastus, millest sisejõud ei tohi üheski talas üle minna.
# Arvutan sisejõud talades lähtuvalt eelnevalt tehtud tingimustest. Juhul kui sisejõu arvutuste käigus saadud tulemused vastavad ülal esitatud tingimustele, siis kuvatakse neljandasse veergu "OK" ning kui sisejõud ületavad lubatud väärtusi, siis kirjutatakse neljadasse veergu tulemuse järele "NOK"..
N :=
    for i ∈ 1 .. rows(EL)
        for j ∈ 1
            R[i, j] ← 0
    for el_n ∈ 1 .. rows(EL)
        for i ∈ 1 .. 2
            for i_v ∈ 1 .. 2
                u_el_g[(i - 1)*2 + i_v] ← Υ[(EL[el_n, 1 + i] - 1)*2 + i_v]
        E ← 12000
        A ← EL[el_n, 6]
        θ ← EL[el_n, 5]*π/180
        Te ← T(θ)
        h_e ← EL[el_n, 4]
        x ← h_e/2
        dϕ1_dϕ2 ← [dN(1, h_e, x), dN(2, h_e, x)]
        R[el_n, 1] ← el_n
        R[el_n, 2] ← E*A*dϕ1_dϕ2*BU*Te*u_el_g
        R[el_n, 3] ← R[el_n, 2]/A
        R[el_n, 4] ← "NOK" if |R[el_n, 3]| > 20
        R[el_n, 4] ← "OK" if |R[el_n, 3]| ≤ 20
    return R
N = [
    1, -26388.9, -4.05983, "OK";
    2, 54338, 10.8676, "OK";
    3, -54338, -10.8676, "OK";
    4, 52777.8, 8.11966, "OK";
    5, 54338, 10.8676, "OK";
    6, -79166.7, -12.1795, "OK";
    7, -54338, -10.8676, "OK";
    8, 105556, 16.2393, "OK";
    9, -28599, -5.71979, "OK";
    10, -91666.7, -14.1026, "OK";
    11, 28599, 5.71979, "OK";
    12, 77777.8, 11.9658, "OK";
    13, -28599, -5.71979, "OK";
    14, -63888.9, -9.82906, "OK";
    15, 28599, 5.71979, "OK";
    16, 50000, 7.69231, "OK";
    17, -28599, -5.71979, "OK";
    18, -36111.1, -5.55556, "OK";
    19, 28599, 5.71979, "OK";
    20, 22222.2, 3.4188, "OK";
    21, -22879.2, -4.57584, "OK";
    22, -11111.1, -1.7094, "OK";
    23, 22879.2, 4.57584, "OK"
]
# Alumise vöö siirete graafik
X := [
    0, Υ[2*(1 - 1) + 2];
    3000, Υ[2*(3 - 1) + 2];
    6000, Υ[2*(5 - 1) + 2];
    9000, Υ[2*(7 - 1) + 2];
    12000, Υ[2*(9 - 1) + 2];
    15000, Υ[2*(11 - 1) + 2];
    18000, Υ[2*(13 - 1) + 2]
]
X[:, 1] = [0; 3000; 6000; 9000; 12000; 15000; 18000]
X[:, 2] = [0; 2.25546; 0; -20.1848; -47.0173; -78.1233; -110.514]
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# Ülemise vöö siirete graafik
Y := [
    1500, Υ[2*(2 - 1) + 2];
    4500, Υ[2*(4 - 1) + 2];
    7500, Υ[2*(6 - 1) + 2];
    10500, Υ[2*(8 - 1) + 2];
    13500, Υ[2*(10 - 1) + 2];
    16500, Υ[2*(12 - 1) + 2]
]
Y[:, 1] = [1500; 4500; 7500; 10500; 13500; 16500]
Y[:, 2] = [1.40966; 1.97353; -9.11306; -32.9185; -62.1845; -94.2001]
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