# Worksheet setting: ORIGIN = 1
# KODUTÖÖ 3
# Kristofer Kõss
# 179515EARB
# Euleri tala
# Lähteülesande joonis:
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# Elementide ja sõlmede süsteem on tehtud nii, et elemendid hakkavad jooksma vasakult paremale 1..2..3 ja samamoodi ka vabadusastmed, mida on igas sõlmes 2.
# Maatriks EL sisaldab endas süsteemi kohta käivat infot.
EL := READPRN("seksikas.txt")
# Tala elementide maatriksi EL väärtused. 1. tulp näitab tala numbrit, 2. ja 3. sõlmede numbreid ning 4. tulp iga elemendi pikkust.
# Tala on jagatud 23ks osaks ehk seksikate pikkustega elementideks:
3 + 4.5 + 3 + 1 = 11.5
EL = [
    1, 1, 2, 0.5;
    2, 2, 3, 0.5;
    3, 3, 4, 0.5;
    4, 4, 5, 0.5;
    5, 5, 6, 0.5;
    6, 6, 7, 0.5;
    7, 7, 8, 0.5;
    8, 8, 9, 0.5;
    9, 9, 10, 0.5;
    10, 10, 11, 0.5;
    11, 11, 12, 0.5;
    12, 12, 13, 0.5;
    13, 13, 14, 0.5;
    14, 14, 15, 0.5;
    15, 15, 16, 0.5;
    16, 16, 17, 0.5;
    17, 17, 18, 0.5;
    18, 18, 19, 0.5;
    19, 19, 20, 0.5;
    20, 20, 21, 0.5;
    21, 21, 22, 0.5;
    22, 22, 23, 0.5;
    23, 23, 24, 0.5
]
11.5/23 = 0.5
L := 11500
# Defineerime algandmed:
h_e := L/23
h_c := 150
dim := max(EL[:, 2], EL[:, 3]) = 24
F := 5
b := 600
E := 210*10^3
E_f := 70
A_shear := h_c*b
p := 0.01
ν_f := 0.01
q := p*b
G_f := E_f/(2*(1 + ν_f))
t_p := 1.2
q = 6
# Impulsimomendi ja staatilise momendi väärtuste leidmine:
I := (2*t_p^3*b/12 + 2*t_p*b*(h_c/2 + t_p/2)^2 + E_f/E*h_c^3*b/12) = 8286541
b_t := 600
S_t := 1.2*600*(75 + 0.6) + 75*600*37.5 = 1741932
# Järgnevaks on ära defineeritud kujufunktsioonid: ϕ , selle esimene tuletis dϕ ja teine tuletis ddϕ. Lisaks on ka ette antud kaalufunktsioon W, mis on tuntud Gaussi integreerimise maatriksina.
ϕ(x, h_e, i) :=
    R ← 2*x^3/h_e^3 - 3*x^2/h_e^2 + 1 if i == 1
    R ← 2*x^2/h_e - x^3/h_e^2 - x if i == 2
    R ← 3*x^2/h_e^2 - 2*x^3/h_e^3 if i == 3
    R ← x^2/h_e - x^3/h_e^2 if i == 4
    return R
ddϕ(x, h_e, i) :=
    R ← 12*x/h_e^3 - 6/h_e^2 if i == 1
    R ← 4/h_e - 6*x/h_e^2 if i == 2
    R ← 6/h_e^2 - 12*x/h_e^3 if i == 3
    R ← 2/h_e - 6*x/h_e^2 if i == 4
    return R
s := 0, 50 .. h_e
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dddϕ(x, h_e, i) :=
    R ← 12/h_e^3 if i == 1
    R ← -6/h_e^2 if i == 2
    R ← -12/h_e^3 if i == 3
    R ← -6/h_e^2 if i == 4
    return R
# Kolmandat tuletist on vaja juhul, kui soovime kirjeldada lõikepingeid.
# Kaalufunktsioon W on teise astme polünoom.
W := [-1/sqrt(3), 1; 1/sqrt(3), 1]
# Selles etapis arvutame välja jäikusmaatriksi elemendi kohta. Selle väärtuste kuvamiseks on vajalikud eelnevalt defineeritud kujufunktsioon ddϕ, kaalufunktsioon W, inertsimoment I ja elastusmoodul E.
K_el(E, I, h_e) :=
    for i ∈ 1 .. 4
        for j ∈ 1 .. 4
            R[i, j] ← 0
    for inte ∈ 1 .. rows(W)
        x_a ← 0
        x_b ← h_e
        x ← 1/2*(x_a + x_b + W[inte, 1]*(x_b - x_a))
        for i ∈ 1 .. 4
            for j ∈ 1 .. 4
                R[i, j] ← R[i, j] + E*I*W[inte, 2]*ddϕ(x, h_e, i)*ddϕ(x, h_e, j)*(x_b - x_a)/2
    return R
# Kuvan elemendi jäikusmaatriksi:
K_el(E, I, h_e) = [
    167057, -41764168, -167057, -41764168;
    -41764168, 1.39214e10, 41764168, 6.96069e9;
    -167057, 41764168, 167057, 41764168;
    -41764168, 6.96069e9, 41764168, 1.39214e10
]
# Kombineerime elemendipõhistest jäikusmaatriksitest globaalse ja summeeritud jäikusmaatriksi:
K_gl :=
    dim ← 2*max(EL[:, 2], EL[:, 3])
    for i ∈ 1 .. dim
        for j ∈ 1 .. dim
            R[i, j] ← 0
    for el ∈ 1 .. rows(EL)
        Kel ← K_el(E, I, h_e)
        for i ∈ 1 .. 2
            for j ∈ 1 .. 2
                1
                for i_v ∈ 1 .. 2
                    for j_v ∈ 1 .. 2
                        Ξ ← (EL[el, i + 1] - 1)
                        Υ ← (EL[el, j + 1] - 1)
                        R[Ξ*2 + i_v, Υ*2 + j_v] ← R[Ξ*2 + i_v, Υ*2 + j_v] + Kel[(i - 1)*2 + i_v, (j - 1)*2 + j_v]
    return R
# Siin etapis arvutame välja elemendipõhise jõumaatriksi. Deformatsioonist tuleneva kuju kirjeldab peamiselt kaalufunktsioon W ja kujufunktsioon ϕ.
F_el(h_e) :=
    for i ∈ 1 .. 4
        R[i] ← 0
    for inte ∈ 1 .. rows(W)
        x_a ← 0
        x_b ← h_e
        x ← 1/2*(x_a + x_b + W[inte, 1]*(x_b - x_a))
        for i ∈ 1 .. 4
            R[i] ← R[i] + W[inte, 2]*ϕ(x, h_e, i)*q*(x_b - x_a)/2
    return R  # Jõuvektori väärtused:
F_el(h_e) = [1500; -125000; 1500; 125000]
# Globaalse jõuvektori esimene osa koosneb lauskoormusest. Lauskoormus koosneb äärtesse mõjuvatest lõikejõududest ja paindemomentidest.
# Globaalse jõuvektori teine osa hõlmab infot mingisse kindlasse punkti rakendatud jõu kohta.
F1_gl :=
    dim ← 2*max(EL[:, 2], EL[:, 3])
    for i ∈ 1 .. dim
        R[i] ← 0
    for el ∈ 1 .. rows(EL)
        Fel ← F_el(h_e)
        for i ∈ 1 .. 2
            1
            for i_v ∈ 1 .. 2
                Ξ ← EL[el, i + 1] - 1
                R[Ξ*2 + i_v] ← R[Ξ*2 + i_v] + Fel[(i - 1)*2 + i_v]
    return R
F2_gl :=
    dim ← 2*max(EL[:, 2], EL[:, 3])
    for i ∈ 1 .. dim
        R[i] ← 0
    R[16] ← -5*10^3
    return R
# Globaalse jäikusmaatriksi K_gl (48 x 48) väärtused:
K_gl =  # no stored result
F_gl := F1_gl + F2_gl
# Globaalse jõuvektori (48 x 1) väärtused:
F1_gl = [
    1500; -125000; 3000; 0; 3000; 0; 3000; 0; 3000; 0
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]
F2_gl = [
    0; 0; 0; 0; 0; 0; 0; 0; 0; 0
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]
F_gl = [
    1500; -125000; 3000; 0; 3000; 0; 3000; 0; 3000; 0
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]
# BOUND(n) on kood, mis arvutab ääretingimuste maatriksi.
BOUND(n) :=
    dim ← 2*max(EL[:, 2], EL[:, 3])
    dim_red ← rows(n)
    for j ∈ 1 .. dim
        for i ∈ 1 .. dim - dim_red
            R[i, j] ← 0
    ind ← 1
    s ← 0
    for k ∈ 1 .. dim
        if k ≠ n[ind]
            1
            R[k - s, k] ← 1
        if k == n[ind]
            ind ← ind + 1 if ind ≠ rows(n)
            s ← s + 1
        S[k] ← s
    return R
n := [1; 13; 43]
# Boundi koodi eesmärk on likvideerida globaalsetest maatriksitest kinniste vabadusastmetega read ning veerud. Oluline mõista, et igas maatriksis on info kahe vabadusastme kohta, kinnised tuleb eemaldada.
U := BOUND(n)
# Arvutame välja siirete vektori:
u := transpose(U)*(U*K_gl*transpose(U))^-1*U*F_gl
# Kood U_MC filtreerib välja siirde elemendid maatriksist ning X kirjutab iga elemendipikkuse välja, kui nullpunkt elemendi vasakus servas.
U_MC :=
    N_solm ← max(EL[:, 2], EL[:, 3])
    for i ∈ 1 .. N_solm
        R[i] ← u[2*i - 1]
    return R
X :=
    N_solm ← max(EL[:, 2], EL[:, 3])
    for i ∈ 1 .. N_solm
        R[i] ← h_e*(i - 1)
    return R
# Timoshenko tala
# Andmed:
h_e = 500
A_red := h_c*b = 90000
E = 210000
E_v := 70
I = 8286541
ν_v := 0.01
L = 11500
G_v := E_v/(2*(1 + ν_v))
q = 6
# Timoshenko ja Euleri tala erinevus seisneb selles, et esimene nimetatutest võtab lisaks paindepingetele arvesse ka lõikepingeid, mis üldises plaanis suuri muutusi matemaatilisse poolde peale mõne argumendi ei too, ent oluline on mõista, et lõikedeformatsioon tõlgendatakse ristlõike pöördumiseks.
ψ(i, h_e, x) :=
    R ← (2*x^2/h_e^2 - 3*x/h_e + 1) if i == 1
    R ← (4*x/h_e - 4*x^2/h_e^2) if i == 2
    R ← -(x/h_e - 2*x^2/h_e^2) if i == 3
    return R
# Timoshenko tala elementide jäikusmaatriksis leidmiseks on veel vaja nihkeelastsusmaatriks G_v ja ristlõike redutseeritud pindala A_red. Nagu Euleri tala puhul kõige pealt arvutatakse välja elemendi jäikusmaatriks
K_tim_el(E, G_v, I, A_red, h_e) :=
    λ_e ← E*I/(G_v*A_red*h_e^2)
    μ_0 ← 12*λ_e
    R ← 2*E*I/(μ_0*h_e^3)*[
        6, -3*h_e, -6, -3*h_e;
        -3*h_e, h_e^2*(1.5 + 6*λ_e), 3*h_e, h_e^2*(1.5 - 6*λ_e);
        -6, 3*h_e, 6, 3*h_e;
        -3*h_e, h_e^2*(1.5 - 6*λ_e), 3*h_e, h_e^2*(1.5 + 6*λ_e)
    ]
    return R
dψ(i, h_e, x) :=
    R ← (4*x/h_e^2 - 3/h_e) if i == 1
    R ← (4/h_e - 8*x/h_e^2) if i == 2
    R ← -(1/h_e - 4*x/h_e^2) if i == 3
    return R
ddψ(i, h_e, x) :=
    R ← 4/h_e^2 if i == 1
    R ← -8/h_e^2 if i == 2
    R ← 4/h_e^2 if i == 3
    return R
# Elementide jäikusmaatriks:
K_tim_el(E, G_v, I, A_red, h_e) = [
    6237.62, -1559406, -6237.62, -1559406;
    -1559406, 3.8702e9, 1559406, -3.0905e9;
    -6237.62, 1559406, 6237.62, 1559406;
    -1559406, -3.0905e9, 1559406, 3.8702e9
]
# Tala globaalse jäikusmaatriksi ja jõumaatriksi eripära on täienenud argumendi reas, ehk arvutused toimuvad lisandunud argumentidega Timoshenko tala teooriale vastavalt.
K_tim_gl :=
    dim ← 2*max(EL[:, 2], EL[:, 3])
    for i ∈ 1 .. dim
        for j ∈ 1 .. dim
            R[i, j] ← 0
    for el ∈ 1 .. rows(EL)
        Kel ← K_tim_el(E, G_v, I, A_red, h_e)
        for i ∈ 1 .. 2
            for j ∈ 1 .. 2
                1
                for i_v ∈ 1 .. 2
                    for j_v ∈ 1 .. 2
                        Ξ ← (EL[el, i + 1] - 1)
                        Υ ← (EL[el, j + 1] - 1)
                        R[Ξ*2 + i_v, Υ*2 + j_v] ← R[Ξ*2 + i_v, Υ*2 + j_v] + Kel[(i - 1)*2 + i_v, (j - 1)*2 + j_v]
    return R
# Elemendipõhise jõumaatriksi arvutamine. Erineb Euleri teooriast lõppvastuse arvutusloogika poolest, sest siin kasutatakse vastuse saamiseks kombinatoorikat.
F_tim_el(h_e) :=
    for i ∈ 1 .. 3
        R[i] ← 0
    for inte ∈ 1 .. rows(W)
        x_a ← 0
        x_b ← h_e
        x ← 1/2*(x_a + x_b + W[inte, 1]*(x_b - x_a))
        for i ∈ 1 .. 3
            R[i] ← R[i] + W[inte, 2]*ψ(i, h_e, x)*q*(x_b - x_a)/2
    R1 ← [R[1] + 1/2*R[2]; -1/8*R[2]*h_e; R[3] + 1/2*R[2]; 1/8*R[2]*h_e]
    return R1  # Elementide jõuvektori väärtused:
F_tim_el(h_e) = [1500; -125000; 1500; 125000]
F2_tim_gl :=
    dim ← 2*max(EL[:, 2], EL[:, 3])
    for i ∈ 1 .. dim
        R[i] ← 0
    R[16] ← -5*10^3
    return R
# Sarnaselt Eulerile jõuvektori osad.
F1_tim_gl :=
    dim ← 2*max(EL[:, 2], EL[:, 3])
    for i ∈ 1 .. dim
        R[i] ← 0
    for el ∈ 1 .. rows(EL)
        Fel ← F_tim_el(h_e)
        for i ∈ 1 .. 2
            for i_v ∈ 1 .. 2
                Ξ ← EL[el, i + 1] - 1
                R[Ξ*2 + i_v] ← R[Ξ*2 + i_v] + Fel[(i - 1)*2 + i_v]
    return R
F_tim_gl := F1_tim_gl + F2_tim_gl
F_tim_gl = [
    1500; -125000; 3000; 0; 3000; 0; 3000; 0; 3000; 0
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]
# Ka Timošenko tala puhul arvutatakse siire ja läbipaine samade valemitega.
u_tim := transpose(U)*(U*K_tim_gl*transpose(U))^-1*U*F_tim_gl
U_tim_MC :=
    N_solm ← max(EL[:, 2], EL[:, 3])
    for i ∈ 1 .. N_solm
        R[i] ← u_tim[2*i - 1]
    return R
X :=
    N_solm ← max(EL[:, 2], EL[:, 3])
    for i ∈ 1 .. N_solm
        R[i] ← h_e*(i - 1)
    return R
u_tim = [
    0; 0.00146614; -1.04955; 0.0013469; -2.38897; 0.000701855; -3.64763; -0.000899995; -4.23936; -0.00388964
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]
# Kodutöö lõpptulemuseks on siirete graafik, kus on võrreldud Euleri tala ja Timoshenko tala erinevust. Erinevus tulebki sellest, et Timoshenko tala võtab arvesse lõikepingeid, mis tõttu vabade vabadusastmete kohas Timoshenko teooria amplituud graafikul on ka suurem, kuna vaht sandwichi paneeli vahel annab omajagu maad lõikepingetele tegutsemiseks. Sandwichi paneel on üks olukordadest, kus kahe teooria vahel on näha silmaga eristatav erisus, enamasti jäigemates olukordades vahed väiksemad.
# Graafikul on Y teljel kujutatud siirde väärtus ning X teljel elemendi pikkus.
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