MinuPytt(R, L, l, H) :=
    Vs ← π*R^2*L/2 + R^2*asin((H - R)/R) + (H - R)*sqrt(2*H*R - H^2)
    if H ≤ R
        d ← R - H
        Vk ← integral(l/R*(r^2*acos(d/r) - d*sqrt(r^2 - d^2)), r = d .. R)
        return (Vs + 2*Vk)
    if H > R
        d ← H - R
        Vk ← integral(l/R*(r^2*acos(d/r) - d*sqrt(r^2 - d^2)), r = d .. R)
        Vkoon ← π*R^2*l/3
        return (Vs + 2*(Vkoon - Vk))
BritiPytt(R, L, l, H) :=
    Vs ← π*R^2*L/2 + R^2*asin((H - R)/R) + (H - R)*sqrt(2*H*R - H^2)
    if H ≤ R
        d ← R - H
        if d == 0
            Vk ← l/3*(-2*d*sqrt(R^2 - d^2) + d^3/R*ln(sqrt(R^2 - d^2) + R) + R^2*acos(d/R) - 0)
            return (Vs + 2*Vk)
        if d > 0
            Vk ← l/3*(-2*d*sqrt(R^2 - d^2) + d^3/R*ln(sqrt(R^2 - d^2) + R) + R^2*acos(d/R) - d^3/R*ln(d))
            return (Vs + 2*Vk)
    if H > R
        d ← H - R
        Vk ← l/3*(-2*d*sqrt(R^2 - d^2) + d^3/R*ln(sqrt(R^2 - d^2) + R) + R^2*acos(d/R) - d^3/R*ln(d))
        Vkoon ← π*R^2*l/3
        return (Vs + 2*(Vkoon - Vk))
MinuPytt(4, 5, 6, 8) = 351.858
H := 0, 0.001 .. 8
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Vk1(R, l, H) :=
    if H ≤ R
        d ← R - H
        Vk ← integral(l/R*(r^2*acos(d/r) - d*sqrt(r^2 - d^2)), r = d .. R)
        return (2*Vk)
    if H > R
        d ← H - R
        Vk ← integral(l/R*(r^2*acos(d/r) - d*sqrt(r^2 - d^2)), r = d .. R)
        Vkoon ← π*R^2*l/3
        return 2*(Vkoon - Vk)
h := 6
BritiPytt(4, 5, 6, 8) = 351.858
d := 4
R := 4
V := integral(2*h/R*(r^2*acos(d/r) - d*sqrt(r^2 - d^2)), r = d .. R) = 0
Vs1(R, L, H) :=
    V1 ← π*R^2*L - integral(L*sqrt(R^2 - (y + H - R)^2), y = 0 .. 2*R - H)
    return V1
Vs1(4, 5, 8) = 251.327
Vs(R, L, H) :=
    M ← 2*R - H
    V ← π*R^2*L - L*(R^2*asin(1) - R^2*asin((H - R)/R) - (H - R)*sqrt(2*H*R - H^2))
    return V
# Kontroll:
Vk1(4, 6, 8) = 201.062
251.327 + 201.062 = 452.389
Vk2(R, l, H) :=
    if H ≤ R
        d ← R - H
        Vk ← integral(H/(3*R)*(R^3 - 3*R*d^2*sec(θ)^2 + 2*d^3*sec(θ)^3), θ = 0 .. acos(d/R))
        return (2*Vk)
    if H > R
        d ← H - R
        Vk ← integral(H/(3*R)*(R^3 - 3*R*d^2*sec(θ)^2 + 2*d^3*sec(θ)^3), θ = 0 .. acos(d/R))
        Vkoon ← π*R^2*l/3
        return 2*(Vkoon - Vk)
Vs(4, 5, 8) = 251.327
Vk ← integral(H/(3*R)*(R^3 - 3*R*d^2*sec(θ)^2 + 2*d^3*sec(θ)^3), θ = 0 .. acos(d/R))
integral(integral(2*H/R*(R - r)*r, r = d*sec(θ) .. R), θ = 0 .. acos(d/R))
Vk2(8, 10, 6) = 221.756
4.232/0.705 = 6.00284
Vk1(8, 10, 6) = 369.593
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