# Worksheet setting: ORIGIN = 1
EL := READPRN("EL.txt")
L := 6000
h_e := 1000
E := 210*10^3
dim := max(EL[:, 2], EL[:, 3])
A := 6*150
N(x, h_e, i) :=
    R ← 1 - x/h_e if i == 1
    R ← x/h_e if i == 2
    return R
dN(x, h_e, i) :=
    R ← -1/h_e if i == 1
    R ← 1/h_e if i == 2
    return R
EL = [1, 1, 2, 1; 2, 2, 3, 1; 3, 3, 4, 1; 4, 4, 5, 1; 5, 5, 6, 1; 6, 6, 7, 1]
ρ := 7.8*10^-9
s := 0, 50 .. h_e
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W := [1, -1/sqrt(3); 1, 1/sqrt(3)]
K_el(E, A, h_e) :=
    for i ∈ 1 .. 2
        for j ∈ 1 .. 2
            R[i, j] ← 0
    for inte ∈ 1 .. rows(W)
        x_a ← 0
        x_b ← h_e
        x ← 1/2*(x_a + x_b + W[inte, 2]*(x_b - x_a))
        for i ∈ 1 .. 2
            for j ∈ 1 .. 2
                R[i, j] ← R[i, j] + E*A*W[inte, 1]*dN(x, h_e, i)*dN(x, h_e, j)*(x_b - x_a)/2
    return R
BOUND(n) :=
    dim ← max(EL[:, 2], EL[:, 3])
    dim_red ← rows(n)
    for j ∈ 1 .. dim
        for i ∈ 1 .. dim - dim_red
            R[i, j] ← 0
    ind ← 1
    s ← 0
    for k ∈ 1 .. dim
        if k ≠ n[ind]
            1
            R[k - s, k] ← 1
        if k == n[ind]
            ind ← ind + 1 if ind ≠ rows(n)
            s ← s + 1
        S[k] ← s
    return R
M_el(ρ, A, h_e) :=
    for i ∈ 1 .. 2
        for j ∈ 1 .. 2
            R[i, j] ← 0
    for inte ∈ 1 .. rows(W)
        x_a ← 0
        x_b ← h_e
        x ← 1/2*(x_a + x_b + W[inte, 2]*(x_b - x_a))
        for i ∈ 1 .. 2
            for j ∈ 1 .. 2
                R[i, j] ← R[i, j] + ρ*A*W[inte, 1]*N(x, h_e, i)*N(x, h_e, j)*(x_b - x_a)/2
    return R
n := [1]
U := BOUND(n) = [
    0, 1, 0, 0, 0, 0, 0;
    0, 0, 1, 0, 0, 0, 0;
    0, 0, 0, 1, 0, 0, 0;
    0, 0, 0, 0, 1, 0, 0;
    0, 0, 0, 0, 0, 1, 0;
    0, 0, 0, 0, 0, 0, 1
]
M := U*M_el*transpose(U)  # error: This value must be a scalar.
F_el(h_e, 1) =  # error: This variable is undefined.
K_gl :=
    dim ← max(EL[:, 2], EL[:, 3])
    for i ∈ 1 .. dim
        for j ∈ 1 .. dim
            R[i, j] ← 0
    for el ∈ 1 .. 6
        Kel ← K_el(E, A, h_e)
        for i ∈ 1 .. 2
            for j ∈ 1 .. 2
                R[EL[el, i + 1], EL[el, j + 1]] ← R[EL[el, i + 1], EL[el, j + 1]] + Kel[i, j]
    return R
M_gl :=
    dim ← max(EL[:, 2], EL[:, 3])
    for i ∈ 1 .. dim
        for j ∈ 1 .. dim
            R[i, j] ← 0
    for el ∈ 1 .. 6
        Mel ← M_el(ρ, A, h_e)
        for i ∈ 1 .. 2
            for j ∈ 1 .. 2
                R[EL[el, i + 1], EL[el, j + 1]] ← R[EL[el, i + 1], EL[el, j + 1]] + Mel[i, j]
    return R
K1 := BO*K_gl*transpose(BO)
K := U*K_gl*transpose(U) = [
    378000, -189000, 0, 0, 0, 0;
    -189000, 378000, -189000, 0, 0, 0;
    0, -189000, 378000, -189000, 0, 0;
    0, 0, -189000, 378000, -189000, 0;
    0, 0, 0, -189000, 378000, -189000;
    0, 0, 0, 0, -189000, 189000
]
BO*F_gl =  # error
M := U*M_gl*transpose(U)
OMAVÄÄRTUS := genvals(K, M) = [307108176; 213291708; 116787225; 53005234; 1855842; 17477523]
[1.154*10^-3; 0.595; 1.087; 1.375; 1.359; 0.935; 2.307*10^-3]
Sagedus :=
    for i ∈ 1 .. rows(OMAVÄÄRTUS)
        R[i] ← 1/(2*π)*sqrt(OMAVÄÄRTUS[i])
    return R
k := 1, 2 .. 4
(2*k - 1)/(2*2*π)*π/L*(E/ρ)^0.5 = [216.198; 648.593; 1080.99; 1513.38]
Sagedus = [2789.11; 2324.38; 1719.96; 1158.72; 216.816; 665.365]
u := transpose(U)*(U*K_gl*transpose(U))^-1*U*F_gl
EL = [1, 1, 2, 1; 2, 2, 3, 1; 3, 3, 4, 1; 4, 4, 5, 1; 5, 5, 6, 1; 6, 6, 7, 1]
u =  # error
U(el, x) :=
    u_1 ← u[EL[el, 2]]
    u_2 ← u[EL[el, 3]]
    R ← u_1*N(x, h_e, 1) + u_2*N(x, h_e, 2)
    return R
σ(el, x) :=
    u_1 ← u[EL[el, 2]]
    u_2 ← u[EL[el, 3]]
    R ← E*u_1*dN(x, h_e, 1) + E*u_2*dN(x, h_e, 2)
    return R
L := 6*h_e
s := 0, 0.1 .. h_e
C := A*ρ*4*π^2*8.33^2
s1 := 0, 500 .. L
u_a(x) := 1/(E*A)*(-C*x^3/6 + C*L^2/2*x)
σ_a(x) := 1/A*(-C*x^2/2 + C*L^2/2)
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14/12 = 1.16667
