# Worksheet setting: ORIGIN = 1
EL := READPRN("EL.txt")
t := 10
E := 210*10^3
NO := READPRN("NO.txt")
ν := 0.3
dim := 2*max(EL[:, 2], EL[:, 3], EL[:, 4], EL[:, 5])
dim = 18
400*10^3*700/(10*400*E) = 0.333333
C := [E/(1 - ν^2), ν*E/(1 - ν^2), 0; ν*E/(1 - ν^2), E/(1 - ν^2), 0; 0, 0, E/(2*(1 + ν))]
N(ξ, η, i) :=
    R ← 1/4*(1 - ξ)*(1 - η) if i == 1
    R ← 1/4*(1 + ξ)*(1 - η) if i == 2
    R ← 1/4*(1 + ξ)*(1 + η) if i == 3
    R ← 1/4*(1 - ξ)*(1 + η) if i == 4
    return R
dN(ξ, η, i) :=
    R ← [-1/4*(1 - η), -1/4*(1 - ξ)] if i == 1
    R ← [1/4*(1 - η), -1/4*(1 + ξ)] if i == 2
    R ← [1/4*(1 + η), 1/4*(1 + ξ)] if i == 3
    R ← [-1/4*(1 + η), 1/4*(1 - ξ)] if i == 4
    return transpose(R)
EL = [1, 1, 2, 5, 6; 2, 2, 3, 4, 5; 3, 5, 4, 9, 8; 4, 6, 5, 8, 7]
NO = [
    1, 0, 0;
    2, 400, 0;
    3, 700, 0;
    4, 700, 100;
    5, 400, 100;
    6, 0, 300;
    7, 0, 400;
    8, 300, 400;
    9, 700, 400
]
1/4*(1 + ξ)*(1 + η)
J(el, ξ, η) :=
    for i ∈ 1 .. 4
        M[1, i] ← dN(ξ, η, i)[1]
        M[2, i] ← dN(ξ, η, i)[2]
    for i ∈ 1 .. 4
        COR[i, 1] ← NO[EL[el, i + 1], 2]
        COR[i, 2] ← NO[EL[el, i + 1], 3]
    R ← M*COR
    return R
dN(0.2, 0.3, 1) = [-0.175; -0.2]
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NO = [
    1, 0, 0;
    2, 400, 0;
    3, 700, 0;
    4, 700, 100;
    5, 400, 100;
    6, 0, 300;
    7, 0, 400;
    8, 300, 400;
    9, 700, 400
]
EL = [1, 1, 2, 5, 6; 2, 2, 3, 4, 5; 3, 5, 4, 9, 8; 4, 6, 5, 8, 7]
B(el, ξ, η) :=
    for i ∈ 1 .. 3
        for j ∈ 1 .. 8
            R[i, j] ← 0
    for i ∈ 1 .. 4
        Vdψxy ← J(el, ξ, η)^-1*[dN(ξ, η, i)[1]; dN(ξ, η, i)[2]]
        R[1, 2*i - 1] ← Vdψxy[1]
        R[2, 2*i] ← Vdψxy[2]
        R[3, 2*i - 1] ← Vdψxy[2]
        R[3, 2*i] ← Vdψxy[1]
    return R
ξ := 0.25
Wx := [-1/sqrt(3), 1; 1/sqrt(3), 1]
Wy := [-1/sqrt(3), 1; 1/sqrt(3), 1]
η := 0.1
el := 1
i := 1
J(1, ξ, η) = [200, -55; 0, 87.5]
B(1, ξ, η) = [
    -0.00171429, 0, 0.000142857, 0, 0.00235714, 0, -0.000785714, 0;
    0, -0.00214286, 0, -0.00357143, 0, 0.00357143, 0, 0.00214286;
    -0.00214286, -0.00171429, -0.00357143, 0.000142857, 0.00357143, 0.00235714, 0.00214286, -0.000785714
]
K_el(el) :=
    for i ∈ 1 .. 8
        for j ∈ 1 .. 8
            R[i, j] ← 0
    for i ∈ 1 .. rows(Wx)
        for j ∈ 1 .. rows(Wy)
            R ← R + Wx[i, 2]*Wy[j, 2]*t*transpose(B(el, Wx[i, 1], Wy[j, 1]))*C*B(el, Wx[i, 1], Wy[j, 1])*|J(el, Wx[i, 1], Wy[j, 1])|
    return R
C*B(el, 0.2, 0.2) = [
    -384.615, -153.846, 0, -230.769, 576.923, 230.769, -192.308, 153.846;
    -115.385, -512.821, 0, -769.231, 173.077, 769.231, -57.6923, 512.821;
    -179.487, -134.615, -269.231, 0, 269.231, 201.923, 179.487, -67.3077
]
K_el(1) = [
    1122378, 579545, -20979, 107517, -844406, -511364, -256993, -175699;
    579545, 1497378, 165210, 729021, -511364, -1031906, -233392, -1194493;
    -20979, 165210, 1101399, -34090.9, -812937, -369755, -267483, 238636;
    107517, 729021, -34090.9, 2226399, -312063, -2125437, 238636, -829983;
    -844406, -511364, -812937, -312063, 1678322, 715909, -20979, 107517;
    -511364, -1031906, -369755, -2125437, 715909, 2428322, 165210, 729021;
    -256993, -233392, -267483, 238636, -20979, 165210, 545455, -170455;
    -175699, -1194493, 238636, -829983, 107517, 729021, -170455, 1295455
]
BOUND(n) :=
    dim ← 2*max(EL[:, 2], EL[:, 3], EL[:, 4], EL[:, 5])
    dim_red ← rows(n)
    for j ∈ 1 .. dim
        for i ∈ 1 .. dim - dim_red
            R[i, j] ← 0
    ind ← 1
    s ← 0
    for k ∈ 1 .. dim
        if k ≠ n[ind]
            1
            R[k - s, k] ← 1
        if k == n[ind]
            ind ← ind + 1 if ind ≠ rows(n)
            s ← s + 1
        S[k] ← s
    return R
n := [2*(1 - 1) + 1; 2*(1 - 1) + 2; 2*(6 - 1) + 1; 2*(6 - 1) + 2; 2*(7 - 1) + 1; 2*(7 - 1) + 2]
n = [1; 2; 11; 12; 13; 14]
BO := BOUND(n)
K_gl :=
    dim ← 2*max(EL[:, 2], EL[:, 3], EL[:, 4], EL[:, 5])
    el_max ← max(EL[:, 1])
    for j ∈ 1 .. dim
        for i ∈ 1 .. dim
            R[i, j] ← 0
    for el ∈ 1 .. el_max
        K ← K_el(el)
        for i_n ∈ 1 .. 4
            for j_n ∈ 1 .. 4
                1
                for i ∈ 1 .. 2
                    for j ∈ 1 .. 2
                        R[(EL[el, i_n + 1] - 1)*2 + i, (EL[el, j_n + 1] - 1)*2 + j] ← R[(EL[el, i_n + 1] - 1)*2 + i, (EL[el, j_n + 1] - 1)*2 + j] + K[(i_n - 1)*2 + i, (j_n - 1)*2 + j]
    return R
F_gl :=
    dim ← 2*max(EL[:, 2], EL[:, 3], EL[:, 4], EL[:, 5])
    el_max ← max(EL[:, 1])
    for i ∈ 1 .. dim
        R[i] ← 0
    R[2*(9 - 1) + 2] ← -20*10^3
    return R
U := BOUND(n)
K_gl = [
    1122378, 579545, -20979, 107517, 0, 0, 0, 0, -844406, -511364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;
    579545, 1497378, 165210, 729021, 0, 0, 0, 0, -511364, -1031906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;
    -20979, 165210, 2165501, 340909, 147436, -28846.2, -532051, -375000, -1492424, -340909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;
    107517, 729021, 340909, 4623834, 28846.2, 1064103, -375000, -1198718, -340909, -4388258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;
    0, 0, 147436, 28846.2, 1064103, -375000, -679487, -28846.2, -532051, 375000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;
    0, 0, -28846.2, 1064103, -375000, 2397436, 28846.2, -2262821, 375000, -1198718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;
    0, 0, -532051, -375000, -679487, 28846.2, 2053829, 77054.8, -438444, -77054.8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;
    0, 0, -375000, -1198718, -28846.2, -2262821, 77054.8, 3441956, -77054.8, 1173428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;
    -844406, -511364, -1492424, -340909, -532051, 375000, -438444, -77054.8, 4297978, 638939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;
    -511364, -1031906, -340909, -4388258, 375000, -1198718, -77054.8, 1173428, 638939, 7180865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;
    -256993, -233392, -267483, 238636, 0, 0, 0, 0, -103078, 223439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;
    -175699, -1194493, 238636, -829983, 0, 0, 0, 0, 223439, 1412645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;
    0, 0, 0, 0, 0, 0, 0, 0, -158779, 236582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;
    0, 0, 0, 0, 0, 0, 0, 0, 236582, -509582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;
    0, 0, 0, 0, 0, 0, -425975, 339041, -168206, -133674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;
    0, 0, 0, 0, 0, 0, 339041, -384879, -133674, -1868981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;
    0, 0, 0, 0, 0, 0, 22128.6, 64805.1, -560590, -410959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;
    0, 0, 0, 0, 0, 0, 7112.75, -768967, -410959, -769494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]
U := BOUND(n) = [
    0, 0, 1, 0, 0, 0, 0, 0, 0, 0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;
    0, 0, 0, 1, 0, 0, 0, 0, 0, 0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;
    0, 0, 0, 0, 1, 0, 0, 0, 0, 0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;
    0, 0, 0, 0, 0, 1, 0, 0, 0, 0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;
    0, 0, 0, 0, 0, 0, 1, 0, 0, 0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;
    0, 0, 0, 0, 0, 0, 0, 1, 0, 0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;
    0, 0, 0, 0, 0, 0, 0, 0, 1, 0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;
    0, 0, 0, 0, 0, 0, 0, 0, 0, 1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;
    0, 0, 0, 0, 0, 0, 0, 0, 0, 0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;
    0, 0, 0, 0, 0, 0, 0, 0, 0, 0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;
    0, 0, 0, 0, 0, 0, 0, 0, 0, 0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;
    0, 0, 0, 0, 0, 0, 0, 0, 0, 0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]
V := transpose(U)*(U*K_gl*transpose(U))^-1*U*F_gl
V = [0; 0; -0.0391552; -0.0638316; -0.0458299; -0.142055; -0.0213733; -0.141733; -0.015484; -0.0633022; 0; 0; 0; 0; 0.0288611; -0.0484248; 0.051166; -0.151982]
