# Worksheet setting: ORIGIN = 1
EL := READPRN("EL.txt")
dim := max(EL[:, 2], EL[:, 3])
E := 210*10^3
NO := READPRN("NO.txt")
ν := 0.3
A := 700*400 = 280000
EL = [1, 1, 2, 5, 6; 2, 2, 3, 4, 5; 3, 5, 4, 9, 8; 4, 6, 5, 8, 7]
NO = [
    1, 0, 0;
    2, 400, 0;
    3, 700, 0;
    4, 700, 100;
    5, 400, 100;
    6, 0, 300;
    7, 0, 400;
    8, 300, 400;
    9, 700, 700
]
W := [-1/sqrt(3), 1; 1/sqrt(3), 1]
W := [-sqrt(3/5), 5/9; 0, 8/9; sqrt(3/5), 5/9]
N(ξ, η, i) :=
    R ← 1/4*(1 - ξ)*(1 - η) if i == 1
    R ← 1/4*(1 + ξ)*(1 - η) if i == 2
    R ← 1/4*(1 - ξ)*(1 + η) if i == 3
    R ← 1/4*(1 + ξ)*(1 + η) if i == 4
    return R
dN(ξ, η, i) :=
    R ← [-1/4*(1 - η), -1/4*(1 - ξ)] if i == 1
    R ← [-1/4*(1 - η), -1/4*(1 + ξ)] if i == 2
    R ← [-1/4*(1 + η), -1/4*(1 - ξ)] if i == 3
    R ← [-1/4*(1 + η), -1/4*(1 + ξ)] if i == 4
    return transpose(R)
# Jakobiaani maatriks:
J(el, ξ, η) :=
    for i ∈ 1 .. 4
        M[1, i] ← dN(ξ, η, i)[1]
        M[2, i] ← dN(ξ, η, i)[2]
    for i ∈ 1 .. 4
        COR[i, 1] ← NO[EL[el, i + 1], 2]
        COR[i, 2] ← NO[EL[el, i + 1], 3]
    R ← M*COR
    return R
dN(0.2, 0.3, 1) = [-0.175; -0.2]
B(el, ξ, η) :=
    for i ∈ 1 .. 3
        for j ∈ 1 .. 8
            R[i, j] ← 0
    for i ∈ 1 .. 4
        Vdψxy ← J(el, ξ, η)^-1*[dN(ξ, η, 1)[1]; dN(ξ, η, 1)[2]]
        R[1, 2*i - 1] ← Vdψxy[1]
        R[2, 2*i - 1] ← Vdψxy[2]
        R[3, 2*i - 1] ← Vdψxy[2]
        R[4, 2*i - 1] ← Vdψxy[1]
    return R
dN(0.2, 0.3, 1)[1] = -0.175
J(1, -0.2, -0.3) = [-200, -70; -200, -90]
B(1, 0.2, 0.3) = [
    0.0016875, 0, 0.0016875, 0, 0.0016875, 0, 0.0016875, 0;
    -0.00125, 0, -0.00125, 0, -0.00125, 0, -0.00125, 0;
    -0.00125, 0, -0.00125, 0, -0.00125, 0, -0.00125, 0;
    0.0016875, 0, 0.0016875, 0, 0.0016875, 0, 0.0016875, 0
]
BOUND(n) :=
    dim ← 2*max(EL[:, 2], EL[:, 3])
    dim_red ← rows(n)
    for j ∈ 1 .. dim
        for i ∈ 1 .. dim - dim_red
            R[i, j] ← 0
    ind ← 1
    s ← 0
    for k ∈ 1 .. dim
        if k ≠ n[ind]
            1
            R[k - s, k] ← 1
        if k == n[ind]
            ind ← ind + 1 if ind ≠ rows(n)
            s ← s + 1
        S[k] ← s
    return R
K_el(el) :=
    for i ∈ 1 .. 4
        for j ∈ 1 .. 4
            R[i, j] ← 0
    for inte ∈ 1 .. rows(W)
        x_a ← 0
        x_b ← h_e
        x ← 1/2*(x_a + x_b + W[inte, 1]*(x_b - x_a))
        for i ∈ 1 .. 4
            for j ∈ 1 .. 4
                R[i, j] ← R[i, j] + E*I*W[inte, 2]*ddϕ(x, h_e, i)*ddϕ(x, h_e, j)*(x_b - x_a)/2
    return R
F_el(h_e) :=
    for i ∈ 1 .. 4
        R[i] ← 0
    for inte ∈ 1 .. rows(W)
        x_a ← 0
        x_b ← h_e
        x ← 1/2*(x_a + x_b + W[inte, 1]*(x_b - x_a))
        for i ∈ 1 .. 4
            R[i] ← R[i] + W[inte, 2]*ϕ(x, h_e, i)*q*(x_b - x_a)/2
    return R
F2_gl :=
    dim ← 2*max(EL[:, 2], EL[:, 3])
    for i ∈ 1 .. dim
        R[i] ← 0
    R[7] ← -25*10^3
    return R
K_gl :=
    dim ← 2*max(EL[:, 2], EL[:, 3])
    for i ∈ 1 .. dim
        for j ∈ 1 .. dim
            R[i, j] ← 0
    for el ∈ 1 .. rows(EL)
        Kel ← K_el(E, I, h_e)
        for i ∈ 1 .. 2
            for j ∈ 1 .. 2
                1
                for i_v ∈ 1 .. 2
                    for j_v ∈ 1 .. 2
                        R[(EL[el, i + 1] - 1)*2 + i_v, (EL[el, j + 1] - 1)*2 + j_v] ← R[(EL[el, i + 1] - 1)*2 + i_v, (EL[el, j + 1] - 1)*2 + j_v] + Kel[(i - 1)*2 + i_v, (j - 1)*2 + j_v]
    return R
F1_gl :=
    dim ← 2*max(EL[:, 2], EL[:, 3])
    for i ∈ 1 .. dim
        R[i] ← 0
    for el ∈ 1 .. rows(EL)
        Fel ← F_el(h_e)
        for i ∈ 1 .. 2
            1
            for i_v ∈ 1 .. 2
                R[(EL[el, i + 1] - 1)*2 + i_v] ← R[(EL[el, i + 1] - 1)*2 + i_v] + Fel[(i - 1)*2 + i_v]
    return R
F_gl := F1_gl
K_gl =  # error: This variable is undefined.
F_gl =  # error
n := [1; 21]
U := BOUND(n) = [
    0, 1, 0, 0, 0, 0, 0, 0, 0, 0, 0, 0;
    0, 0, 1, 0, 0, 0, 0, 0, 0, 0, 0, 0;
    0, 0, 0, 1, 0, 0, 0, 0, 0, 0, 0, 0;
    0, 0, 0, 0, 1, 0, 0, 0, 0, 0, 0, 0;
    0, 0, 0, 0, 0, 1, 0, 0, 0, 0, 0, 0;
    0, 0, 0, 0, 0, 0, 1, 0, 0, 0, 0, 0;
    0, 0, 0, 0, 0, 0, 0, 1, 0, 0, 0, 0;
    0, 0, 0, 0, 0, 0, 0, 0, 1, 0, 0, 0;
    0, 0, 0, 0, 0, 0, 0, 0, 0, 1, 0, 0;
    0, 0, 0, 0, 0, 0, 0, 0, 0, 0, 1, 0;
    0, 0, 0, 0, 0, 0, 0, 0, 0, 0, 0, 1
]
u := transpose(U)*(U*K_gl*transpose(U))^-1*U*F_gl
EL = [1, 1, 2, 5, 6; 2, 2, 3, 4, 5; 3, 5, 4, 9, 8; 4, 6, 5, 8, 7]
u =  # error
X :=
    N_solm ← max(EL[:, 2], EL[:, 3])
    for i ∈ 1 .. N_solm
        R[i] ← h_e*(i - 1)
    return R
U_MC :=
    N_solm ← max(EL[:, 2], EL[:, 3])
    for i ∈ 1 .. N_solm
        R[i] ← u[2*i - 1]
    return R
w_q(x) := q*L^2/(G_v*A_red*2)*(x^2/L^2 - x/L)
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U_FEMAP
w_q(X) =  # error
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S_MC :=
    h ← 150
    N_el ← max(EL[:, 1])
    for i_el ∈ 1 .. N_el
        for i ∈ 1 .. 4
            ue[i] ← u[(i_el - 1)*2 + i]
        for i ∈ 1 .. 6
            R[(i_el - 1)*6 + i, 1] ← (i_el - 1)*h_e + (i - 1)/5*h_e
            SUM ← 0
            for j ∈ 1 .. 4
                x ← (i - 1)/5*h_e
                SUM ← SUM + ue[j]*ddϕ(x, h_e, j)
            R[(i_el - 1)*6 + i, 2] ← -E*SUM*h/2
        1
    return R
T_MC :=
    N_el ← max(EL[:, 1])
    for i_el ∈ 1 .. N_el
        for i ∈ 1 .. 4
            ue[i] ← u[(i_el - 1)*2 + i]
        for i ∈ 1 .. 6
            R[(i_el - 1)*6 + i, 1] ← (i_el - 1)*h_e + (i - 1)/5*h_e
            SUM ← 0
            for j ∈ 1 .. 4
                x ← (i - 1)/5*h_e
                SUM ← SUM + ue[j]*dddϕ(x, h_e, j)
            R[(i_el - 1)*6 + i, 2] ← -E*SUM*S_t/b_t
        1
    return R
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S_MC =  # error
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# *******************Timoshenko tala *************************************************************************
I := □  # error: This placeholder is empty.
EL = [1, 1, 2, 5, 6; 2, 2, 3, 4, 5; 3, 5, 4, 9, 8; 4, 6, 5, 8, 7]
ψ(i, h_e, x) :=
    R ← (2*x^2/h_e^2 - 3*x/h_e + 1) if i == 1
    R ← (4*x/h_e - 4*x^2/h_e^2) if i == 2
    R ← -(x/h_e - 2*x^2/h_e^2) if i == 3
    return R
F_tim_el(h_e) :=
    for i ∈ 1 .. 3
        R[i] ← 0
    for inte ∈ 1 .. rows(W)
        x_a ← 0
        x_b ← h_e
        x ← 1/2*(x_a + x_b + W[inte, 1]*(x_b - x_a))
        for i ∈ 1 .. 3
            R[i] ← R[i] + W[inte, 2]*ψ(i, h_e, x)*q*(x_b - x_a)/2
    R1 ← [R[1] + 1/2*R[2]; -1/8*R[2]*h_e; R[3] + 1/2*R[2]; 1/8*R[2]*h_e]
    return R1
K_tim_el(E, G_v, I, A_red, h_e) :=
    λ_e ← E*I/(G_v*A_red*h_e^2)
    μ_0 ← 12*λ_e
    R ← 2*E*I/(μ_0*h_e^3)*[
        6, -3*h_e, -6, -3*h_e;
        -3*h_e, h_e^2*(1.5 + 6*λ_e), 3*h_e, h_e^2*(1.5 - 6*λ_e);
        -6, 3*h_e, 6, 3*h_e;
        -3*h_e, h_e^2*(1.5 - 6*λ_e), 3*h_e, h_e^2*(1.5 + 6*λ_e)
    ]
    return R
F_tim_gl :=
    dim ← 2*max(EL[:, 2], EL[:, 3])
    for i ∈ 1 .. dim
        R[i] ← 0
    for el ∈ 1 .. rows(EL)
        Fel ← F_tim_el(h_e)
        for i ∈ 1 .. 2
            1
            for i_v ∈ 1 .. 2
                R[(EL[el, i + 1] - 1)*2 + i_v] ← R[(EL[el, i + 1] - 1)*2 + i_v] + Fel[(i - 1)*2 + i_v]
    return R
K_tim_gl :=
    dim ← 2*max(EL[:, 2], EL[:, 3])
    for i ∈ 1 .. dim
        for j ∈ 1 .. dim
            R[i, j] ← 0
    for el ∈ 1 .. rows(EL)
        Kel ← K_tim_el(E, G_v, I, A_red, h_e)
        for i ∈ 1 .. 2
            for j ∈ 1 .. 2
                1
                for i_v ∈ 1 .. 2
                    for j_v ∈ 1 .. 2
                        R[(EL[el, i + 1] - 1)*2 + i_v, (EL[el, j + 1] - 1)*2 + j_v] ← R[(EL[el, i + 1] - 1)*2 + i_v, (EL[el, j + 1] - 1)*2 + j_v] + Kel[(i - 1)*2 + i_v, (j - 1)*2 + j_v]
    return R
u_tim := transpose(U)*(U*K_tim_gl*transpose(U))^-1*U*F_tim_gl
X :=
    N_solm ← max(EL[:, 2], EL[:, 3])
    for i ∈ 1 .. N_solm
        R[i] ← h_e*(i - 1)
    return R
U_tim_MC :=
    N_solm ← max(EL[:, 2], EL[:, 3])
    for i ∈ 1 .. N_solm
        R[i] ← u_tim[2*i - 1]
    return R
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