# Worksheet setting: ORIGIN = 1
EL := READPRN("EL.txt")
h_e := 1000
E := 210*10^3
dim := max(EL[:, 2], EL[:, 3])
A := 6*150
EL = [
    1, 1, 2, 1;
    2, 2, 3, 1;
    3, 3, 4, 1;
    4, 4, 5, 1;
    5, 5, 6, 1;
    6, 6, 7, 1;
    7, 7, 8, 1;
    8, 8, 9, 1;
    9, 9, 10, 1;
    10, 10, 11, 1
]
ρ := 7.8*10^-9
N(x, h_e, i) :=
    R ← 1 - x/h_e if i == 1
    R ← x/h_e if i == 2
    return R
dN(x, h_e, i) :=
    R ← -1/h_e if i == 1
    R ← 1/h_e if i == 2
    return R
L := 6000
s := 0, 50 .. h_e
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W := [1, -1/sqrt(3); 1, 1/sqrt(3)]
BOUND(n) :=
    dim ← max(EL[:, 2], EL[:, 3])
    dim_red ← rows(n)
    for j ∈ 1 .. dim
        for i ∈ 1 .. dim - dim_red
            R[i, j] ← 0
    ind ← 1
    s ← 0
    for k ∈ 1 .. dim
        if k ≠ n[ind]
            1
            R[k - s, k] ← 1
        if k == n[ind]
            ind ← ind + 1 if ind ≠ rows(n)
            s ← s + 1
        S[k] ← s
    return R
K_el(E, A, h_e) :=
    for i ∈ 1 .. 2
        for j ∈ 1 .. 2
            R[i, j] ← 0
    for inte ∈ 1 .. rows(W)
        x_a ← 0
        x_b ← h_e
        x ← 1/2*(x_a + x_b + W[inte, 2]*(x_b - x_a))
        for i ∈ 1 .. 2
            for j ∈ 1 .. 2
                R[i, j] ← R[i, j] + E*A*W[inte, 1]*dN(x, h_e, i)*dN(x, h_e, j)*(x_b - x_a)/2
    return R
K_gl :=
    dim ← max(EL[:, 2], EL[:, 3])
    for i ∈ 1 .. dim
        for j ∈ 1 .. dim
            R[i, j] ← 0
    for el ∈ 1 .. 6
        Kel ← K_el(E, A, h_e)
        for i ∈ 1 .. 2
            for j ∈ 1 .. 2
                R[EL[el, i + 1], EL[el, j + 1]] ← R[EL[el, i + 1], EL[el, j + 1]] + Kel[i, j]
    return R
# Massimaatriksi arvutamine
M_el(ρ, A, h_e) :=
    for i ∈ 1 .. 2
        for j ∈ 1 .. 2
            R[i, j] ← 0
    for inte ∈ 1 .. rows(W)
        x_a ← 0
        x_b ← h_e
        x ← 1/2*(x_a + x_b + W[inte, 2]*(x_b - x_a))
        for i ∈ 1 .. 2
            for j ∈ 1 .. 2
                R[i, j] ← R[i, j] + ρ*A*W[inte, 1]*N(x, h_e, i)*N(x, h_e, j)*(x_b - x_a)/2
    return R  # Globaalne massimaatriks
M_gl :=
    dim ← max(EL[:, 2], EL[:, 3])
    for i ∈ 1 .. dim
        for j ∈ 1 .. dim
            R[i, j] ← 0
    for el ∈ 1 .. 6
        Mel ← M_el(ρ, A, h_e)
        for i ∈ 1 .. 2
            for j ∈ 1 .. 2
                R[EL[el, i + 1], EL[el, j + 1]] ← R[EL[el, i + 1], EL[el, j + 1]] + Mel[i, j]
    return R
M_gl = [
    0.00234, 0.00117, 0, 0, 0, 0, 0, 0, 0, 0, 0;
    0.00117, 0.00468, 0.00117, 0, 0, 0, 0, 0, 0, 0, 0;
    0, 0.00117, 0.00468, 0.00117, 0, 0, 0, 0, 0, 0, 0;
    0, 0, 0.00117, 0.00468, 0.00117, 0, 0, 0, 0, 0, 0;
    0, 0, 0, 0.00117, 0.00468, 0.00117, 0, 0, 0, 0, 0;
    0, 0, 0, 0, 0.00117, 0.00468, 0.00117, 0, 0, 0, 0;
    0, 0, 0, 0, 0, 0.00117, 0.00234, 0, 0, 0, 0;
    0, 0, 0, 0, 0, 0, 0, 0, 0, 0, 0;
    0, 0, 0, 0, 0, 0, 0, 0, 0, 0, 0;
    0, 0, 0, 0, 0, 0, 0, 0, 0, 0, 0;
    0, 0, 0, 0, 0, 0, 0, 0, 0, 0, 0
]
K_gl = [
    189000, -189000, 0, 0, 0, 0, 0, 0, 0, 0, 0;
    -189000, 378000, -189000, 0, 0, 0, 0, 0, 0, 0, 0;
    0, -189000, 378000, -189000, 0, 0, 0, 0, 0, 0, 0;
    0, 0, -189000, 378000, -189000, 0, 0, 0, 0, 0, 0;
    0, 0, 0, -189000, 378000, -189000, 0, 0, 0, 0, 0;
    0, 0, 0, 0, -189000, 378000, -189000, 0, 0, 0, 0;
    0, 0, 0, 0, 0, -189000, 189000, 0, 0, 0, 0;
    0, 0, 0, 0, 0, 0, 0, 0, 0, 0, 0;
    0, 0, 0, 0, 0, 0, 0, 0, 0, 0, 0;
    0, 0, 0, 0, 0, 0, 0, 0, 0, 0, 0;
    0, 0, 0, 0, 0, 0, 0, 0, 0, 0, 0
]
n := [1]
U := BOUND(n) = [
    0, 1, 0, 0, 0, 0, 0, 0, 0, 0, 0;
    0, 0, 1, 0, 0, 0, 0, 0, 0, 0, 0;
    0, 0, 0, 1, 0, 0, 0, 0, 0, 0, 0;
    0, 0, 0, 0, 1, 0, 0, 0, 0, 0, 0;
    0, 0, 0, 0, 0, 1, 0, 0, 0, 0, 0;
    0, 0, 0, 0, 0, 0, 1, 0, 0, 0, 0;
    0, 0, 0, 0, 0, 0, 0, 1, 0, 0, 0;
    0, 0, 0, 0, 0, 0, 0, 0, 1, 0, 0;
    0, 0, 0, 0, 0, 0, 0, 0, 0, 1, 0;
    0, 0, 0, 0, 0, 0, 0, 0, 0, 0, 1
]  # Ääretingimuste maatriks
K := U*K_gl*transpose(U)
M := U*M_gl*transpose(U)
K = [
    378000, -189000, 0, 0, 0, 0, 0, 0, 0, 0;
    -189000, 378000, -189000, 0, 0, 0, 0, 0, 0, 0;
    0, -189000, 378000, -189000, 0, 0, 0, 0, 0, 0;
    0, 0, -189000, 378000, -189000, 0, 0, 0, 0, 0;
    0, 0, 0, -189000, 378000, -189000, 0, 0, 0, 0;
    0, 0, 0, 0, -189000, 189000, 0, 0, 0, 0;
    0, 0, 0, 0, 0, 0, 0, 0, 0, 0;
    0, 0, 0, 0, 0, 0, 0, 0, 0, 0;
    0, 0, 0, 0, 0, 0, 0, 0, 0, 0;
    0, 0, 0, 0, 0, 0, 0, 0, 0, 0
]
M = [
    0.00468, 0.00117, 0, 0, 0, 0, 0, 0, 0, 0;
    0.00117, 0.00468, 0.00117, 0, 0, 0, 0, 0, 0, 0;
    0, 0.00117, 0.00468, 0.00117, 0, 0, 0, 0, 0, 0;
    0, 0, 0.00117, 0.00468, 0.00117, 0, 0, 0, 0, 0;
    0, 0, 0, 0.00117, 0.00468, 0.00117, 0, 0, 0, 0;
    0, 0, 0, 0, 0.00117, 0.00234, 0, 0, 0, 0;
    0, 0, 0, 0, 0, 0, 0, 0, 0, 0;
    0, 0, 0, 0, 0, 0, 0, 0, 0, 0;
    0, 0, 0, 0, 0, 0, 0, 0, 0, 0;
    0, 0, 0, 0, 0, 0, 0, 0, 0, 0
]
Omaväärtused
OMAVÄÄRTUS := genvals(K, M)
OMAVÄÄRTUS = [307108176; 213291708; 116787225; 53005234; 1855842; 17477523; 0; 0; 0; 0]
Sagedus :=
    for i ∈ 1 .. rows(OMAVÄÄRTUS)
        R[i] ← (1/(2*π)*sqrt(OMAVÄÄRTUS[i]))
    return R
k := 1, 2 .. 4
((2*k - 1)/(2*2*π))*π/L*(E/ρ)^0.5 = [216.198; 648.593; 1080.99; 1513.38]
Sagedus = [2789.11; 2324.38; 1719.96; 1158.72; 216.816; 665.365; 0; 0; 0; 0]
σ(el, x) :=
    u_1 ← u[EL[el, 2]]
    u_2 ← u[EL[el, 3]]
    R ← E*u_1*dN(x, h_e, 1) + E*u_2*dN(x, h_e, 2)
    return R  # error: This variable is undefined.
U(el, x) :=
    u_1 ← u[EL[el, 2]]
    u_2 ← u[EL[el, 3]]
    R ← u_1*N(x, h_e, 1) + u_2*N(x, h_e, 2)
    return R  # error: This variable is undefined.
L := 6*h_e
s := 0, 0.1 .. h_e
C := A*ρ*4*π^2*8.33^2
s1 := 0, 500 .. L
u_a(x) := 1/(E*A)*(-C*x^3/6 + C*L^2/2*x)
σ_a(x) := 1/A*(-C*x^2/2 + C*L^2/2)
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