# Worksheet setting: ORIGIN = 1
# Näide
# Joonkoormus
EL := READPRN("Timoshenko_tingimused.txt")
E := 210000  # MPa
h_e := 300
q := -3
U_FEMAP := READPRN("FEMAP_Timoshenko_siirded.txt")
σ_FEMAP := READPRN("FEM_Pinge.txt")
s := 0, 50 .. h_e
EL = [
    1, 1, 2, 1;
    2, 2, 3, 1;
    3, 3, 4, 1;
    4, 4, 5, 1;
    5, 5, 6, 1;
    6, 6, 7, 1;
    7, 7, 8, 1;
    8, 8, 9, 1;
    9, 9, 10, 1;
    10, 10, 11, 1
]
I := 2*(2^3*100/12 + 100*2*49^2)
U_FEMAP = [
    -3000, 0, 1827;
    -2980, -1.74546, 3318;
    -2960, -4.21778, 3309;
    -2940, -7.07512, 3300;
    -2920, -10.1169, 3291;
    -2900, -13.2327, 3282;
    -2880, -16.3628, 3273;
    -2860, -19.4761, 3264;
    -2840, -22.5575, 3255;
    -2820, -25.6001, 3246
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]
σ_FEMAP = [
    500, 0, 1;
    1500, -111.664, 2;
    2500, -202.659, 3;
    3500, -272.984, 4;
    4500, -193.453, 5;
    5500, -93.2531, 6;
    6500, 27.6168, 7;
    7500, 169.156, 8
]
W := [-sqrt(3/5), 5/9; 0, 8/9; sqrt(3/5), 5/9]
I = 960533
# Vt. ϕ.1-4 5.loeng
ϕ(i, h_e, x) :=
    R ← 2*x^3/h_e^3 - 3*x^2/h_e^2 + 1 if i == 1
    R ← 2*x^2/h_e - x^3/h_e^2 - x if i == 2
    R ← 3*x^2/h_e^2 - 2*x^3/h_e^3 if i == 3
    R ← x^2/h_e - x^3/h_e^2 if i == 4
    return R
ddϕ(i, h_e, x) :=
    R ← 12*x/h_e^3 - 6/h_e^2 if i == 1
    R ← 4/h_e - 6*x/h_e^2 if i == 2
    R ← 6/h_e^2 - 12*x/h_e^3 if i == 3
    R ← 2/h_e - 6*x/h_e^2 if i == 4
    return R
dddϕ(i, h_e, x) :=
    R ← 12/h_e^3 if i == 1
    R ← -6/h_e^2 if i == 2
    R ← -12/h_e^3 if i == 3
    R ← -6/h_e^2 if i == 4
    return R
2*max(EL[:, 2], EL[:, 3]) = 22
dim := 2*max(EL[:, 2], EL[:, 3])
dim = 22
W = [-0.774597, 0.555556; 0, 0.888889; 0.774597, 0.555556]
rows(EL) = 10
ddϕ(1, 1000, 200) = -3.6e-6
Dim := max(EL[:, 2], EL[:, 3])
Dim = 11
h_e = 300
K_el(E, I, h_e) :=
    for i ∈ 1 .. 4
        for j ∈ 1 .. 4
            R[i, j] ← 0
    for inte ∈ 1 .. rows(W)
        x_a ← 0
        x_b ← h_e
        x ← 1/2*(x_a + x_b + W[inte, 1]*(x_b - x_a))
        for i ∈ 1 .. 4
            for j ∈ 1 .. 4
                R[i, j] ← R[i, j] + E*I*W[inte, 2]*ddϕ(i, h_e, x)*ddϕ(j, h_e, x)*(x_b - x_a)/2
    return R
T(θ) := [cos(θ), sin(θ), 0, 0; -sin(θ), cos(θ), 0, 0; 0, 0, cos(θ), sin(θ); 0, 0, -sin(θ), cos(θ)]
F_el(h_e) :=
    for i ∈ 1 .. 4
        R[i] ← 0
    for inte ∈ 1 .. rows(W)
        x_a ← 0
        x_b ← h_e
        x ← 1/2*(x_a + x_b + W[inte, 1]*(x_b - x_a))
        for i ∈ 1 .. 4
            R[i] ← R[i] + W[inte, 2]*ϕ(i, h_e, x)*q*(x_b - x_a)/2
    return R
E = 210000
K_el(E, I, h_e) = [
    89649.8, -13447467, -89649.8, -13447467;
    -13447467, 2.68949e9, 13447467, 1.34475e9;
    -89649.8, 13447467, 89649.8, 13447467;
    -13447467, 1.34475e9, 13447467, 2.68949e9
]
I = 960533  # //Vastused klapivad, seega korras.
F_el(h_e) = [-450; 22500; -450; -22500]
q*h_e/12*[6; -h_e; 6; h_e] = [-450; 22500; -450; -22500]
2*E*I/h_e^3*2*h_e^2 = 2.68949e9
K_gl :=
    dim ← 2*max(EL[:, 2], EL[:, 3])
    for i ∈ 1 .. dim
        for j ∈ 1 .. dim
            R[i, j] ← 0
    for el_n ∈ 1 .. rows(EL)
        K ← K_el(E, I, h_e)
        for i ∈ 1 .. 2
            for j ∈ 1 .. 2
                for i2 ∈ 1 .. 2
                    for j2 ∈ 1 .. 2
                        Ι ← (2*(EL[el_n, i + 1] - 1) + i2)
                        Γ ← (2*(EL[el_n, j + 1] - 1) + j2)
                        R[Ι, Γ] ← R[Ι, Γ] + K[2*(i - 1) + i2, 2*(j - 1) + j2]
    return R
K_gl = [
    89649.8, -13447467, -89649.8, -13447467, 0, 0, 0, 0, 0, 0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;
    -13447467, 2.68949e9, 13447467, 1.34475e9, 0, 0, 0, 0, 0, 0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;
    -89649.8, 13447467, 179300, 0, -89649.8, -13447467, 0, 0, 0, 0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;
    -13447467, 1.34475e9, 0, 5.37899e9, 13447467, 1.34475e9, 0, 0, 0, 0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;
    0, 0, -89649.8, 13447467, 179300, 0, -89649.8, -13447467, 0, 0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;
    0, 0, -13447467, 1.34475e9, 0, 5.37899e9, 13447467, 1.34475e9, 0, 0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;
    0, 0, 0, 0, -89649.8, 13447467, 179300, 0, -89649.8, -13447467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;
    0, 0, 0, 0, -13447467, 1.34475e9, 0, 5.37899e9, 13447467, 1.34475e9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;
    0, 0, 0, 0, 0, 0, -89649.8, 13447467, 179300, 0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;
    0, 0, 0, 0, 0, 0, -13447467, 1.34475e9, 0, 5.37899e9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;
    0, 0, 0, 0, 0, 0, 0, 0, -89649.8, 13447467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;
    0, 0, 0, 0, 0, 0, 0, 0, -13447467, 1.34475e9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;
    0, 0, 0, 0, 0, 0, 0, 0, 0, 0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;
    0, 0, 0, 0, 0, 0, 0, 0, 0, 0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;
    0, 0, 0, 0, 0, 0, 0, 0, 0, 0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;
    0, 0, 0, 0, 0, 0, 0, 0, 0, 0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;
    0, 0, 0, 0, 0, 0, 0, 0, 0, 0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;
    0, 0, 0, 0, 0, 0, 0, 0, 0, 0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;
    0, 0, 0, 0, 0, 0, 0, 0, 0, 0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;
    0, 0, 0, 0, 0, 0, 0, 0, 0, 0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;
    0, 0, 0, 0, 0, 0, 0, 0, 0, 0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;
    0, 0, 0, 0, 0, 0, 0, 0, 0, 0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]
F1_gl :=
    dim ← 2*max(EL[:, 2], EL[:, 3])
    for i ∈ 1 .. dim
        R[i] ← 0
    for el_n ∈ 1 .. rows(EL)
        F ← F_el(h_e)
        for i ∈ 1 .. 2
            for i2 ∈ 1 .. 2
                Ι ← 2*(EL[el_n, i + 1] - 1) + i2
                R[Ι] ← R[Ι] + F[2*(i - 1) + i2]
    return R
F2_gl :=
    dim ← 2*max(EL[:, 2], EL[:, 3])
    for i ∈ 1 .. dim
        R[i] ← 0
    R[7] ← 25*10^3
    return R
F_gl := F1_gl + F2_gl
F_gl = [-450; 22500; -900; 0; -900; 0; 24100; 0; -900; 0; -900; 0; -900; 0; -900; 0; -900; 0; -900; 0; -450; -22500]
n := [1; 21]
BOUND(n) :=
    dim ← 2*max(EL[:, 2], EL[:, 3])
    dim_red ← rows(n)
    for j ∈ 1 .. dim
        for i ∈ 1 .. dim - dim_red
            R[i, j] ← 0
    ind ← 1
    s ← 0
    for k ∈ 1 .. dim
        if k ≠ n[ind]
            1
            R[k - s, k] ← 1
        if k == n[ind]
            ind ← ind + 1 if ind ≠ rows(n)
            s ← s + 1
        S[k] ← s
    return R
U := BOUND(n)
U = [
    0, 1, 0, 0, 0, 0, 0, 0, 0, 0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;
    0, 0, 1, 0, 0, 0, 0, 0, 0, 0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;
    0, 0, 0, 1, 0, 0, 0, 0, 0, 0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;
    0, 0, 0, 0, 1, 0, 0, 0, 0, 0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;
    0, 0, 0, 0, 0, 1, 0, 0, 0, 0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;
    0, 0, 0, 0, 0, 0, 1, 0, 0, 0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;
    0, 0, 0, 0, 0, 0, 0, 1, 0, 0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;
    0, 0, 0, 0, 0, 0, 0, 0, 1, 0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;
    0, 0, 0, 0, 0, 0, 0, 0, 0, 1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;
    0, 0, 0, 0, 0, 0, 0, 0, 0, 0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;
    0, 0, 0, 0, 0, 0, 0, 0, 0, 0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;
    0, 0, 0, 0, 0, 0, 0, 0, 0, 0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;
    0, 0, 0, 0, 0, 0, 0, 0, 0, 0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;
    0, 0, 0, 0, 0, 0, 0, 0, 0, 0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;
    0, 0, 0, 0, 0, 0, 0, 0, 0, 0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;
    0, 0, 0, 0, 0, 0, 0, 0, 0, 0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;
    0, 0, 0, 0, 0, 0, 0, 0, 0, 0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;
    0, 0, 0, 0, 0, 0, 0, 0, 0, 0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;
    0, 0, 0, 0, 0, 0, 0, 0, 0, 0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;
    0, 0, 0, 0, 0, 0, 0, 0, 0, 0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]
U*K_gl*transpose(U) = [
    2.68949e9, 13447467, 1.34475e9, 0, 0, 0, 0, 0, 0, 0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;
    13447467, 179300, 0, -89649.8, -13447467, 0, 0, 0, 0, 0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;
    1.34475e9, 0, 5.37899e9, 13447467, 1.34475e9, 0, 0, 0, 0, 0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;
    0, -89649.8, 13447467, 179300, 0, -89649.8, -13447467, 0, 0, 0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;
    0, -13447467, 1.34475e9, 0, 5.37899e9, 13447467, 1.34475e9, 0, 0, 0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;
    0, 0, 0, -89649.8, 13447467, 179300, 0, -89649.8, -13447467, 0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;
    0, 0, 0, -13447467, 1.34475e9, 0, 5.37899e9, 13447467, 1.34475e9, 0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;
    0, 0, 0, 0, 0, -89649.8, 13447467, 179300, 0, -89649.8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;
    0, 0, 0, 0, 0, -13447467, 1.34475e9, 0, 5.37899e9, 13447467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;
    0, 0, 0, 0, 0, 0, 0, -89649.8, 13447467, 179300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;
    0, 0, 0, 0, 0, 0, 0, -13447467, 1.34475e9, 0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;
    0, 0, 0, 0, 0, 0, 0, 0, 0, -89649.8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;
    0, 0, 0, 0, 0, 0, 0, 0, 0, -13447467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;
    0, 0, 0, 0, 0, 0, 0, 0, 0, 0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;
    0, 0, 0, 0, 0, 0, 0, 0, 0, 0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;
    0, 0, 0, 0, 0, 0, 0, 0, 0, 0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;
    0, 0, 0, 0, 0, 0, 0, 0, 0, 0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;
    0, 0, 0, 0, 0, 0, 0, 0, 0, 0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;
    0, 0, 0, 0, 0, 0, 0, 0, 0, 0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;
    0, 0, 0, 0, 0, 0, 0, 0, 0, 0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]
U*F_gl = [22500; -900; 0; -900; 0; 24100; 0; -900; 0; -900; 0; -900; 0; -900; 0; -900; 0; -900; 0; -22500]
V := (U*K_gl*transpose(U))^-1*U*F_gl
Υ := transpose(U)*V
ddϕ(i, h_e, x)
σ_MC :=
    h ← 150
    N_el ← max(EL[:, 1])
    for i_el ∈ 1 .. N_el
        for j ∈ 1 .. 4
            ue[j] ← Υ[(i_el - 1)*2 + j]
        for i ∈ 1 .. 6
            R[(i_el - 1)*6 + i, 1] ← (i_el - 1)*h_e + (i - 1)/5*h_e
            SUM ← 0
            for j ∈ 1 .. 4
                x ← (i - 1)/5*h_e
                SUM ← SUM + ue[j]*ddϕ(j, h_e, x)
            R[(i_el - 1)*6 + i, 2] ← -E*SUM*h/2
        1
    return R
V = [-0.0496376; 14.5962; -0.0466705; 27.3821; -0.0375015; 36.4368; -0.021729; 40.2767; -0.00452873; 39.5288; 0.00892361; 35.2572; 0.0190296; 28.4055; 0.0261908; 19.797; 0.0308088; 10.1344; 0.0332851; 0.0340213]
Υ = [0; -0.0496376; 14.5962; -0.0466705; 27.3821; -0.0375015; 36.4368; -0.021729; 40.2767; -0.00452873; 39.5288; 0.00892361; 35.2572; 0.0190296; 28.4055; 0.0261908; 19.797; 0.0308088; 10.1344; 0.0332851; 0; 0.0340213]
σ_MC = [
    0, -1.75684;
    60, 61.255;
    120, 124.267;
    180, 187.279;
    240, 250.291;
    300, 313.303;
    300, 313.303;
    360, 380.531;
    420, 447.759;
    480, 514.987
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]
U_MC :=
    N_solm ← max(EL[:, 2], EL[:, 3])
    for i ∈ 1 .. N_solm
        R[i] ← Υ[2*i - 1]
    return R
X :=
    N_solm ← max(EL[:, 2], EL[:, 3])
    for i ∈ 1 .. N_solm
        R[i] ← h_e*(i - 1)
    return R
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T_MC :=
    h ← 150
    N_el ← max(EL[:, 1])
    for i_el ∈ 1 .. N_el
        for i ∈ 1 .. 4
            ue[i] ← Υ[(i_el - 1)*2 + i]
        for i ∈ 1 .. 6
            R[(i_el - 1)*2 + i, 1] ← (i_el - 1)*h_e + (i - 1)/5*h_e
            SUM ← 0
            for j ∈ 1 .. 4
                x ← (i - 1)/5*h_e
                SUM ← SUM + ue[j]*dddϕ(x, h_e, j)
            R[(i_el - 1)*6 + i, 2] ← -E*SUM*h/2
        1
    return R
Q_MC :=
    h ← 150
    N_el ← max(EL[:, 1])
    for i_el ∈ 1 .. N_el
        for i ∈ 1 .. 4
            ue[i] ← Υ[(i_el - 1)*2 + i]
        for i ∈ 1 .. 6
            R[(i_el - 1)*2 + i, 1] ← (i_el - 1)*h_e + (i - 1)/5*h_e
            SUM ← 0
            for j ∈ 1 .. 4
                x ← (i - 1)/5*h_e
                SUM ← SUM + ue[j]*ddϕ(x, h_e, j)
            R[(i_el - 1)*6 + i, 2] ← -E*SUM*h/2
        1
    return R
T_MC = [
    0, 0;
    60, 0;
    300, 0;
    360, 0;
    600, 0;
    660, 0;
    900, 0;
    960, 0;
    1200, 0;
    1260, 0
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]
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# *********************************************Timoshenko tala*******************************************************
K_el(E, I, h_e) :=
    Λ_e ← E*I/(G_y*A_red)
    μ_0 ← 12*Λ_e
    R ← 2*E*I/(μ_0*h_e)*[
        6, -3*h_e, -6, -3*h_e;
        -3*h_e, h_e^2*(1.5 + 6*Λ_e), 3*h_e, h_e^2*(1.5 - 6*Λ_e);
        -6, 3*h_e, 6, 3*h_e;
        -3*h_e, h_e^2*(1.5 - 6*Λ_e), 3*h_e, h_e^2*(1.5 + 6*Λ_e)
    ]
    return R  # error: This variable is undefined.
F_el(h_e) :=
    for i ∈ 1 .. 4
        R[i] ← 0
    for inte ∈ 1 .. rows(W)
        x_a ← 0
        x_b ← h_e
        x ← 1/2*(x_a + x_b + W[inte, 1]*(x_b - x_a))
        for i ∈ 1 .. 4
            R[i] ← R[i] + W[inte, 2]*ϕ(i, h_e, x)*q*(x_b - x_a)/2
    return R
