# Worksheet setting: ORIGIN = 1
EL := READPRN("UUS_EL.txt")
L := 250
dim := max(EL[:, 2], EL[:, 3])
E := 210*10^3
h_e := L/12
b := 17.88
t := 0.4
I := b*t^3/12
ρ := 7.8*10^-9
A := b*t = 7.152
dddϕ(x, h_e, i) :=
    R ← 12/h_e^3 if i == 1
    R ← -6/h_e^2 if i == 2
    R ← -12/h_e^3 if i == 3
    R ← -6/h_e^2 if i == 4
    return R
ddϕ(x, h_e, i) :=
    R ← 12*x/h_e^3 - 6/h_e^2 if i == 1
    R ← 4/h_e - 6*x/h_e^2 if i == 2
    R ← 6/h_e^2 - 12*x/h_e^3 if i == 3
    R ← 2/h_e - 6*x/h_e^2 if i == 4
    return R
ϕ(x, h_e, i) :=
    R ← 2*x^3/h_e^3 - 3*x^2/h_e^2 + 1 if i == 1
    R ← 2*x^2/h_e - x^3/h_e^2 - x if i == 2
    R ← 3*x^2/h_e^2 - 2*x^3/h_e^3 if i == 3
    R ← x^2/h_e - x^3/h_e^2 if i == 4
    return R
EL = [
    1, 1, 2, 1;
    2, 2, 3, 1;
    3, 3, 4, 1;
    4, 4, 5, 1;
    5, 5, 6, 1;
    6, 6, 7, 1;
    7, 7, 8, 1;
    8, 8, 9, 1;
    9, 9, 10, 1;
    10, 10, 11, 1;
    11, 11, 12, 1;
    12, 12, 13, 1
]
s := 0, 50 .. h_e
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W := [-sqrt(3/5), 5/9; 0, 8/9; sqrt(3/5), 5/9]
W := [-1/sqrt(3), 1; 1/sqrt(3), 1]
M_el(ρ, A, h_e) :=
    for i ∈ 1 .. 4
        for j ∈ 1 .. 4
            R[i, j] ← 0
    for inte ∈ 1 .. rows(W)
        x_a ← 0
        x_b ← h_e
        x ← 1/2*(x_a + x_b + W[inte, 1]*(x_b - x_a))
        for i ∈ 1 .. 4
            for j ∈ 1 .. 4
                R[i, j] ← R[i, j] + ρ*A*W[inte, 2]*ϕ(x, h_e, i)*ϕ(x, h_e, j)*(x_b - x_a)/2
    return R
K_el(E, I, h_e) :=
    for i ∈ 1 .. 4
        for j ∈ 1 .. 4
            R[i, j] ← 0
    for inte ∈ 1 .. rows(W)
        x_a ← 0
        x_b ← h_e
        x ← 1/2*(x_a + x_b + W[inte, 1]*(x_b - x_a))
        for i ∈ 1 .. 4
            for j ∈ 1 .. 4
                R[i, j] ← R[i, j] + E*I*W[inte, 2]*ddϕ(x, h_e, i)*ddϕ(x, h_e, j)*(x_b - x_a)/2
    return R
BOUND(n) :=
    dim ← 2*max(EL[:, 2], EL[:, 3])
    dim_red ← rows(n)
    for j ∈ 1 .. dim
        for i ∈ 1 .. dim - dim_red
            R[i, j] ← 0
    ind ← 1
    s ← 0
    for k ∈ 1 .. dim
        if k ≠ n[ind]
            1
            R[k - s, k] ← 1
        if k == n[ind]
            ind ← ind + 1 if ind ≠ rows(n)
            s ← s + 1
        S[k] ← s
    return R
K_el(E, I, h_e) = [
    26.5761, -276.834, -26.5761, -276.834;
    -276.834, 3844.92, 276.834, 1922.46;
    -26.5761, 276.834, 26.5761, 276.834;
    -276.834, 1922.46, 276.834, 3844.92
]
M_el(ρ, A, h_e) = [
    4.62728e-7, -1.45723e-6, 1.18372e-7, 5.60475e-7;
    -1.45723e-6, 4.67062e-6, -5.60475e-7, -2.33531e-6;
    1.18372e-7, -5.60475e-7, 4.62728e-7, 1.45723e-6;
    5.60475e-7, -2.33531e-6, 1.45723e-6, 4.67062e-6
]
K_gl :=
    dim ← 2*max(EL[:, 2], EL[:, 3])
    for i ∈ 1 .. dim
        for j ∈ 1 .. dim
            R[i, j] ← 0
    for el ∈ 1 .. rows(EL)
        Kel ← K_el(E, I, h_e)
        for i ∈ 1 .. 2
            for j ∈ 1 .. 2
                1
                for i_v ∈ 1 .. 2
                    for j_v ∈ 1 .. 2
                        R[(EL[el, i + 1] - 1)*2 + i_v, (EL[el, j + 1] - 1)*2 + j_v] ← R[(EL[el, i + 1] - 1)*2 + i_v, (EL[el, j + 1] - 1)*2 + j_v] + Kel[(i - 1)*2 + i_v, (j - 1)*2 + j_v]
    return R
M_gl :=
    dim ← 2*max(EL[:, 2], EL[:, 3])
    for i ∈ 1 .. dim
        for j ∈ 1 .. dim
            R[i, j] ← 0
    for el ∈ 1 .. rows(EL)
        Mel ← M_el(ρ, A, h_e)
        for i ∈ 1 .. 2
            for j ∈ 1 .. 2
                1
                for i_v ∈ 1 .. 2
                    for j_v ∈ 1 .. 2
                        R[(EL[el, i + 1] - 1)*2 + i_v, (EL[el, j + 1] - 1)*2 + j_v] ← R[(EL[el, i + 1] - 1)*2 + i_v, (EL[el, j + 1] - 1)*2 + j_v] + Mel[(i - 1)*2 + i_v, (j - 1)*2 + j_v]
    return R
K_gl =  # no stored result
M_gl =  # no stored result
n := [1; 2]
U := BOUND(n)
K := U*K_gl*transpose(U)
M := U*M_gl*transpose(U)
Omaväärtused
OMAVÄÄRTUS := genvals(K, M)
Sagedus :=
    for i ∈ 1 .. rows(OMAVÄÄRTUS)
        R[i] ← (1/(2*π)*sqrt(OMAVÄÄRTUS[i]))
    return R
K = [
    53.1521, 0, -26.5761, -276.834, 0, 0, 0, 0, 0, 0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;
    0, 7689.83, 276.834, 1922.46, 0, 0, 0, 0, 0, 0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;
    -26.5761, 276.834, 53.1521, 0, -26.5761, -276.834, 0, 0, 0, 0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;
    -276.834, 1922.46, 0, 7689.83, 276.834, 1922.46, 0, 0, 0, 0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;
    0, 0, -26.5761, 276.834, 53.1521, 0, -26.5761, -276.834, 0, 0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;
    0, 0, -276.834, 1922.46, 0, 7689.83, 276.834, 1922.46, 0, 0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;
    0, 0, 0, 0, -26.5761, 276.834, 53.1521, 0, -26.5761, -276.834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;
    0, 0, 0, 0, -276.834, 1922.46, 0, 7689.83, 276.834, 1922.46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;
    0, 0, 0, 0, 0, 0, -26.5761, 276.834, 53.1521, 0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;
    0, 0, 0, 0, 0, 0, -276.834, 1922.46, 0, 7689.83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;
    0, 0, 0, 0, 0, 0, 0, 0, -26.5761, 276.834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;
    0, 0, 0, 0, 0, 0, 0, 0, -276.834, 1922.46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;
    0, 0, 0, 0, 0, 0, 0, 0, 0, 0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;
    0, 0, 0, 0, 0, 0, 0, 0, 0, 0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;
    0, 0, 0, 0, 0, 0, 0, 0, 0, 0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;
    0, 0, 0, 0, 0, 0, 0, 0, 0, 0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;
    0, 0, 0, 0, 0, 0, 0, 0, 0, 0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;
    0, 0, 0, 0, 0, 0, 0, 0, 0, 0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;
    0, 0, 0, 0, 0, 0, 0, 0, 0, 0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;
    0, 0, 0, 0, 0, 0, 0, 0, 0, 0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;
    0, 0, 0, 0, 0, 0, 0, 0, 0, 0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;
    0, 0, 0, 0, 0, 0, 0, 0, 0, 0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;
    0, 0, 0, 0, 0, 0, 0, 0, 0, 0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;
    0, 0, 0, 0, 0, 0, 0, 0, 0, 0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]
OMAVÄÄRTUS = [1.79769e308; 0; 0; 0; 0; 0; 0; 0; 0; 0; 0; 0; 0; 0; 0; 0; 0; 0; 0; 0; 0; 0; 0; 0]
Sagedus = [2.13392e153; 0; 0; 0; 0; 0; 0; 0; 0; 0; 0; 0; 0; 0; 0; 0; 0; 0; 0; 0; 0; 0; 0; 0]
M = [
    9.25456e-7, 0, 1.18372e-7, 5.60475e-7, 0, 0, 0, 0, 0, 0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;
    0, 9.34124e-6, -5.60475e-7, -2.33531e-6, 0, 0, 0, 0, 0, 0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;
    1.18372e-7, -5.60475e-7, 9.25456e-7, 0, 1.18372e-7, 5.60475e-7, 0, 0, 0, 0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;
    5.60475e-7, -2.33531e-6, 0, 9.34124e-6, -5.60475e-7, -2.33531e-6, 0, 0, 0, 0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;
    0, 0, 1.18372e-7, -5.60475e-7, 9.25456e-7, 0, 1.18372e-7, 5.60475e-7, 0, 0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;
    0, 0, 5.60475e-7, -2.33531e-6, 0, 9.34124e-6, -5.60475e-7, -2.33531e-6, 0, 0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;
    0, 0, 0, 0, 1.18372e-7, -5.60475e-7, 9.25456e-7, 0, 1.18372e-7, 5.60475e-7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;
    0, 0, 0, 0, 5.60475e-7, -2.33531e-6, 0, 9.34124e-6, -5.60475e-7, -2.33531e-6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;
    0, 0, 0, 0, 0, 0, 1.18372e-7, -5.60475e-7, 9.25456e-7, 0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;
    0, 0, 0, 0, 0, 0, 5.60475e-7, -2.33531e-6, 0, 9.34124e-6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;
    0, 0, 0, 0, 0, 0, 0, 0, 1.18372e-7, -5.60475e-7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;
    0, 0, 0, 0, 0, 0, 0, 0, 5.60475e-7, -2.33531e-6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;
    0, 0, 0, 0, 0, 0, 0, 0, 0, 0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;
    0, 0, 0, 0, 0, 0, 0, 0, 0, 0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;
    0, 0, 0, 0, 0, 0, 0, 0, 0, 0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;
    0, 0, 0, 0, 0, 0, 0, 0, 0, 0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;
    0, 0, 0, 0, 0, 0, 0, 0, 0, 0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;
    0, 0, 0, 0, 0, 0, 0, 0, 0, 0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;
    0, 0, 0, 0, 0, 0, 0, 0, 0, 0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;
    0, 0, 0, 0, 0, 0, 0, 0, 0, 0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;
    0, 0, 0, 0, 0, 0, 0, 0, 0, 0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;
    0, 0, 0, 0, 0, 0, 0, 0, 0, 0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;
    0, 0, 0, 0, 0, 0, 0, 0, 0, 0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;
    0, 0, 0, 0, 0, 0, 0, 0, 0, 0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]
OMAVEKTOR := genvecs(K, M, "R")
OMAVEKTOR = [
    2.67141e-13, -0.302136, -0.451125, 0.405166, -0.339078, 0.252528, -0.146618, -0.0244211, -0.108714, 0.244981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;
    -8.40641e-14, 0.202497, 0.317791, -0.31282, 0.304642, -0.292437, 0.275612, 0.253984, -0.22793, 0.198537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;
    3.6405e-12, -0.281448, -0.292195, 0.069775, 0.176264, -0.390602, 0.519364, 0.52382, -0.393105, 0.151706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;
    -1.20998e-12, 0.458055, 0.650227, -0.533613, 0.386492, -0.225039, 0.0683026, -0.0648147, 0.159332, -0.207755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;
    5.06927e-11, -0.231936, -0.0356342, -0.322087, 0.513624, -0.426369, 0.0960475, -0.300416, 0.534957, -0.459391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;
    -1.6858e-11, 0.681283, 0.795582, -0.418096, 0.0544202, 0.196633, -0.281418, -0.209872, 0.0473898, 0.117679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;
    7.06056e-10, -0.164944, 0.231648, -0.50964, 0.297768, 0.213515, -0.530641, -0.330155, -0.205199, 0.542226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;
    -2.34802e-10, 0.853817, 0.708721, -0.0370395, -0.336235, 0.306518, -0.0343716, 0.199959, -0.212366, 0.0301727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;
    9.83409e-9, -0.0856623, 0.431304, -0.373438, -0.238972, 0.514901, -0.0321689, 0.512932, -0.305597, -0.359172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;
    -3.27036e-9, 0.962761, 0.414935, 0.367545, -0.364543, -0.0695302, 0.285557, 0.0811669, 0.189988, -0.163227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;
    1.36971e-7, 2.03537e-10, 0.505031, -2.52223e-10, -0.518183, -1.89277e-10, 0.534513, 2.03817e-10, 0.54679, 4.83906e-10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;
    -4.55503e-8, 1, 6.54774e-11, 0.538637, 4.64094e-11, -0.335351, 3.68213e-11, -0.252203, -5.19612e-11, 0.216244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;
    1.90776e-6, 0.0856623, 0.431304, 0.373438, -0.238972, -0.514901, -0.0321689, -0.512932, -0.305597, 0.359172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;
    -6.34434e-7, 0.962761, -0.414935, 0.367545, 0.364543, -0.0695302, -0.285557, 0.0811669, -0.189988, -0.163227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;
    2.65717e-5, 0.164945, 0.231648, 0.509639, 0.297768, -0.213515, -0.530641, 0.330155, -0.205198, -0.542225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;
    -8.83652e-6, 0.853817, -0.708721, -0.0370394, 0.336235, 0.306518, 0.0343717, 0.199959, 0.212366, 0.0301726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;
    0.000370096, 0.231948, -0.0356513, 0.322071, 0.51361, 0.426355, 0.096034, 0.300431, 0.534973, 0.459413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;
    -0.000123077, 0.681281, -0.795578, -0.418092, -0.054417, 0.196636, 0.281421, -0.209874, -0.0473929, 0.117675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;
    0.00515478, 0.281882, -0.292858, -0.0704068, 0.175664, 0.390028, 0.518797, -0.523232, -0.39245, -0.150921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;
    -0.00171424, 0.457957, -0.650078, -0.533473, -0.386363, -0.224919, -0.068188, -0.0649289, -0.159453, -0.207894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;
    0.0717968, 0.318684, -0.476876, -0.430302, -0.363556, -0.27649, -0.170424, 0.0486801, -0.083134, -0.216961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;
    -0.0238763, 0.198742, -0.312007, -0.307269, -0.299361, -0.287417, -0.270797, 0.249273, 0.223186, 0.193596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;
    1, 0.632072, -1, -1, -1, -1, -1, 1, 1, 1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;
    -0.332554, -0.14342, 0.224593, 0.220836, 0.215757, 0.209509, 0.20226, -0.194184, -0.185466, -0.176336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]
W1 := (transpose(U)*OMAVEKTOR)[:, 24]
W2 := (transpose(U)*OMAVEKTOR)[:, 23]
W1 = [0; 0; -0.0117416; 0.00110479; -0.0451004; 0.00207531; -0.0972858; 0.00291237; -0.165536; 0.00361801; -0.247149; 0.00419599; -0.339523; 0.00465222; -0.440204; 0.00499508; -0.546941; 0.00523574; -0.657747; 0.00538832; -0.770962; 0.00547005; -0.885315; 0.00550139; -1; 0.00550602]
W3 := (transpose(U)*OMAVEKTOR)[:, 22]
X :=
    N_solm ← max(EL[:, 2], EL[:, 3])
    for i ∈ 1 .. N_solm
        R[i] ← h_e*(i - 1)
    return R
W_1 :=
    N_solm ← max(EL[:, 2], EL[:, 3])
    for i ∈ 1 .. N_solm
        R[i] ← W1[2*i - 1]
    return R
W_2 :=
    N_solm ← max(EL[:, 2], EL[:, 3])
    for i ∈ 1 .. N_solm
        R[i] ← W2[2*i - 1]
    return R
W_3 :=
    N_solm ← max(EL[:, 2], EL[:, 3])
    for i ∈ 1 .. N_solm
        R[i] ← W3[2*i - 1]
    return R
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