# Worksheet setting: ORIGIN = 1
EL := READPRN("EL.txt")
L := 3000
dim := max(EL[:, 2], EL[:, 3])
h_e := 300
E := 210*10^3
q := -3
E_v := 6
U_FEMAP := READPRN("FEM_labipaine.txt")
S_FEMAP := READPRN("FEM_Pinge.txt")
I := 2*(2^3*100/12 + 2*100*49^2)
ν_v := 0.001
b_t := 8
S_t := 80*20*65 + 55^2*8/2
A_red := 100*98
U_FEMAP := READPRN("Labipaine.txt")
G_v := E_v/(2*(1 + ν_v))
dddϕ(x, h_e, i) :=
    R ← 12/h_e^3 if i == 1
    R ← -6/h_e^2 if i == 2
    R ← -12/h_e^3 if i == 3
    R ← -6/h_e^2 if i == 4
    return R
ddϕ(x, h_e, i) :=
    R ← 12*x/h_e^3 - 6/h_e^2 if i == 1
    R ← 4/h_e - 6*x/h_e^2 if i == 2
    R ← 6/h_e^2 - 12*x/h_e^3 if i == 3
    R ← 2/h_e - 6*x/h_e^2 if i == 4
    return R
ϕ(x, h_e, i) :=
    R ← 2*x^3/h_e^3 - 3*x^2/h_e^2 + 1 if i == 1
    R ← 2*x^2/h_e - x^3/h_e^2 - x if i == 2
    R ← 3*x^2/h_e^2 - 2*x^3/h_e^3 if i == 3
    R ← x^2/h_e - x^3/h_e^2 if i == 4
    return R
EL = [
    1, 1, 2, 1;
    2, 2, 3, 1;
    3, 3, 4, 1;
    4, 4, 5, 1;
    5, 5, 6, 1;
    6, 6, 7, 1;
    7, 7, 8, 1;
    8, 8, 9, 1;
    9, 9, 10, 1;
    10, 10, 11, 1
]
s := 0, 50 .. h_e
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W := [-1/sqrt(3), 1; 1/sqrt(3), 1]
W := [-sqrt(3/5), 5/9; 0, 8/9; sqrt(3/5), 5/9]
K_el(E, I, h_e) :=
    for i ∈ 1 .. 4
        for j ∈ 1 .. 4
            R[i, j] ← 0
    for inte ∈ 1 .. rows(W)
        x_a ← 0
        x_b ← h_e
        x ← 1/2*(x_a + x_b + W[inte, 1]*(x_b - x_a))
        for i ∈ 1 .. 4
            for j ∈ 1 .. 4
                R[i, j] ← R[i, j] + E*I*W[inte, 2]*ddϕ(x, h_e, i)*ddϕ(x, h_e, j)*(x_b - x_a)/2
    return R
F_el(h_e) :=
    for i ∈ 1 .. 4
        R[i] ← 0
    for inte ∈ 1 .. rows(W)
        x_a ← 0
        x_b ← h_e
        x ← 1/2*(x_a + x_b + W[inte, 1]*(x_b - x_a))
        for i ∈ 1 .. 4
            R[i] ← R[i] + W[inte, 2]*ϕ(x, h_e, i)*q*(x_b - x_a)/2
    return R
BOUND(n) :=
    dim ← 2*max(EL[:, 2], EL[:, 3])
    dim_red ← rows(n)
    for j ∈ 1 .. dim
        for i ∈ 1 .. dim - dim_red
            R[i, j] ← 0
    ind ← 1
    s ← 0
    for k ∈ 1 .. dim
        if k ≠ n[ind]
            1
            R[k - s, k] ← 1
        if k == n[ind]
            ind ← ind + 1 if ind ≠ rows(n)
            s ← s + 1
        S[k] ← s
    return R
K_gl :=
    dim ← 2*max(EL[:, 2], EL[:, 3])
    for i ∈ 1 .. dim
        for j ∈ 1 .. dim
            R[i, j] ← 0
    for el ∈ 1 .. rows(EL)
        Kel ← K_el(E, I, h_e)
        for i ∈ 1 .. 2
            for j ∈ 1 .. 2
                1
                for i_v ∈ 1 .. 2
                    for j_v ∈ 1 .. 2
                        R[(EL[el, i + 1] - 1)*2 + i_v, (EL[el, j + 1] - 1)*2 + j_v] ← R[(EL[el, i + 1] - 1)*2 + i_v, (EL[el, j + 1] - 1)*2 + j_v] + Kel[(i - 1)*2 + i_v, (j - 1)*2 + j_v]
    return R
F1_gl :=
    dim ← 2*max(EL[:, 2], EL[:, 3])
    for i ∈ 1 .. dim
        R[i] ← 0
    for el ∈ 1 .. rows(EL)
        Fel ← F_el(h_e)
        for i ∈ 1 .. 2
            1
            for i_v ∈ 1 .. 2
                R[(EL[el, i + 1] - 1)*2 + i_v] ← R[(EL[el, i + 1] - 1)*2 + i_v] + Fel[(i - 1)*2 + i_v]
    return R
F2_gl :=
    dim ← 2*max(EL[:, 2], EL[:, 3])
    for i ∈ 1 .. dim
        R[i] ← 0
    R[7] ← -25*10^3
    return R
F_gl := F1_gl
K_gl = [
    89649.8, -13447467, -89649.8, -13447467, 0, 0, 0, 0, 0, 0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;
    -13447467, 2.68949e9, 13447467, 1.34475e9, 0, 0, 0, 0, 0, 0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;
    -89649.8, 13447467, 179300, 0, -89649.8, -13447467, 0, 0, 0, 0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;
    -13447467, 1.34475e9, 0, 5.37899e9, 13447467, 1.34475e9, 0, 0, 0, 0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;
    0, 0, -89649.8, 13447467, 179300, 0, -89649.8, -13447467, 0, 0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;
    0, 0, -13447467, 1.34475e9, 0, 5.37899e9, 13447467, 1.34475e9, 0, 0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;
    0, 0, 0, 0, -89649.8, 13447467, 179300, 0, -89649.8, -13447467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;
    0, 0, 0, 0, -13447467, 1.34475e9, 0, 5.37899e9, 13447467, 1.34475e9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;
    0, 0, 0, 0, 0, 0, -89649.8, 13447467, 179300, 0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;
    0, 0, 0, 0, 0, 0, -13447467, 1.34475e9, 0, 5.37899e9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;
    0, 0, 0, 0, 0, 0, 0, 0, -89649.8, 13447467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;
    0, 0, 0, 0, 0, 0, 0, 0, -13447467, 1.34475e9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;
    0, 0, 0, 0, 0, 0, 0, 0, 0, 0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;
    0, 0, 0, 0, 0, 0, 0, 0, 0, 0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;
    0, 0, 0, 0, 0, 0, 0, 0, 0, 0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;
    0, 0, 0, 0, 0, 0, 0, 0, 0, 0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;
    0, 0, 0, 0, 0, 0, 0, 0, 0, 0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;
    0, 0, 0, 0, 0, 0, 0, 0, 0, 0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;
    0, 0, 0, 0, 0, 0, 0, 0, 0, 0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;
    0, 0, 0, 0, 0, 0, 0, 0, 0, 0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;
    0, 0, 0, 0, 0, 0, 0, 0, 0, 0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;
    0, 0, 0, 0, 0, 0, 0, 0, 0, 0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]
F_gl = [-450; 22500; -900; 0; -900; 0; -900; 0; -900; 0; -900; 0; -900; 0; -900; 0; -900; 0; -900; 0; -450; -22500]
n := [1; 21]
U := BOUND(n) = [
    0, 1, 0, 0, 0, 0, 0, 0, 0, 0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;
    0, 0, 1, 0, 0, 0, 0, 0, 0, 0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;
    0, 0, 0, 1, 0, 0, 0, 0, 0, 0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;
    0, 0, 0, 0, 1, 0, 0, 0, 0, 0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;
    0, 0, 0, 0, 0, 1, 0, 0, 0, 0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;
    0, 0, 0, 0, 0, 0, 1, 0, 0, 0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;
    0, 0, 0, 0, 0, 0, 0, 1, 0, 0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;
    0, 0, 0, 0, 0, 0, 0, 0, 1, 0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;
    0, 0, 0, 0, 0, 0, 0, 0, 0, 1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;
    0, 0, 0, 0, 0, 0, 0, 0, 0, 0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;
    0, 0, 0, 0, 0, 0, 0, 0, 0, 0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;
    0, 0, 0, 0, 0, 0, 0, 0, 0, 0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;
    0, 0, 0, 0, 0, 0, 0, 0, 0, 0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;
    0, 0, 0, 0, 0, 0, 0, 0, 0, 0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;
    0, 0, 0, 0, 0, 0, 0, 0, 0, 0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;
    0, 0, 0, 0, 0, 0, 0, 0, 0, 0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;
    0, 0, 0, 0, 0, 0, 0, 0, 0, 0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;
    0, 0, 0, 0, 0, 0, 0, 0, 0, 0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;
    0, 0, 0, 0, 0, 0, 0, 0, 0, 0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;
    0, 0, 0, 0, 0, 0, 0, 0, 0, 0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]
u := transpose(U)*(U*K_gl*transpose(U))^-1*U*F_gl
EL = [
    1, 1, 2, 1;
    2, 2, 3, 1;
    3, 3, 4, 1;
    4, 4, 5, 1;
    5, 5, 6, 1;
    6, 6, 7, 1;
    7, 7, 8, 1;
    8, 8, 9, 1;
    9, 9, 10, 1;
    10, 10, 11, 1
]
u = [0; 0.0167318; -4.92416; 0.0157948; -9.31625; 0.0132516; -12.7546; 0.00950365; -14.9381; 0.00495261; -15.686; 0; -14.9381; -0.00495261; -12.7546; -0.00950365; -9.31625; -0.0132516; -4.92416; -0.0157948; 0; -0.0167318]
X :=
    N_solm ← max(EL[:, 2], EL[:, 3])
    for i ∈ 1 .. N_solm
        R[i] ← h_e*(i - 1)
    return R
U_MC :=
    N_solm ← max(EL[:, 2], EL[:, 3])
    for i ∈ 1 .. N_solm
        R[i] ← u[2*i - 1]
    return R
w_q(x) := q*L^2/(G_v*A_red*2)*(x^2/L^2 - x/L)
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U_FEMAP
w_q(X) = [0; 41.3679; 73.5429; 96.525; 110.314; 114.911; 110.314; 96.525; 73.5429; 41.3679; 0]
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S_MC :=
    h ← 150
    N_el ← max(EL[:, 1])
    for i_el ∈ 1 .. N_el
        for i ∈ 1 .. 4
            ue[i] ← u[(i_el - 1)*2 + i]
        for i ∈ 1 .. 6
            R[(i_el - 1)*6 + i, 1] ← (i_el - 1)*h_e + (i - 1)/5*h_e
            SUM ← 0
            for j ∈ 1 .. 4
                x ← (i - 1)/5*h_e
                SUM ← SUM + ue[j]*ddϕ(x, h_e, j)
            R[(i_el - 1)*6 + i, 2] ← -E*SUM*h/2
        1
    return R
T_MC :=
    N_el ← max(EL[:, 1])
    for i_el ∈ 1 .. N_el
        for i ∈ 1 .. 4
            ue[i] ← u[(i_el - 1)*2 + i]
        for i ∈ 1 .. 6
            R[(i_el - 1)*6 + i, 1] ← (i_el - 1)*h_e + (i - 1)/5*h_e
            SUM ← 0
            for j ∈ 1 .. 4
                x ← (i - 1)/5*h_e
                SUM ← SUM + ue[j]*dddϕ(x, h_e, j)
            R[(i_el - 1)*6 + i, 2] ← -E*SUM*S_t/b_t
        1
    return R
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S_MC = [
    0, -1.75684;
    60, -20.7307;
    120, -39.7045;
    180, -58.6783;
    240, -77.6522;
    300, -96.626;
    300, -96.626;
    360, -111.383;
    420, -126.141;
    480, -140.898
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]
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# *******************Timoshenko tala *************************************************************************
I := □  # error: This placeholder is empty.
EL = [
    1, 1, 2, 1;
    2, 2, 3, 1;
    3, 3, 4, 1;
    4, 4, 5, 1;
    5, 5, 6, 1;
    6, 6, 7, 1;
    7, 7, 8, 1;
    8, 8, 9, 1;
    9, 9, 10, 1;
    10, 10, 11, 1
]
ψ(i, h_e, x) :=
    R ← (2*x^2/h_e^2 - 3*x/h_e + 1) if i == 1
    R ← (4*x/h_e - 4*x^2/h_e^2) if i == 2
    R ← -(x/h_e - 2*x^2/h_e^2) if i == 3
    return R
F_tim_el(h_e) :=
    for i ∈ 1 .. 3
        R[i] ← 0
    for inte ∈ 1 .. rows(W)
        x_a ← 0
        x_b ← h_e
        x ← 1/2*(x_a + x_b + W[inte, 1]*(x_b - x_a))
        for i ∈ 1 .. 3
            R[i] ← R[i] + W[inte, 2]*ψ(i, h_e, x)*q*(x_b - x_a)/2
    R1 ← [R[1] + 1/2*R[2]; -1/8*R[2]*h_e; R[3] + 1/2*R[2]; 1/8*R[2]*h_e]
    return R1
K_tim_el(E, G_v, I, A_red, h_e) :=
    λ_e ← E*I/(G_v*A_red*h_e^2)
    μ_0 ← 12*λ_e
    R ← 2*E*I/(μ_0*h_e^3)*[
        6, -3*h_e, -6, -3*h_e;
        -3*h_e, h_e^2*(1.5 + 6*λ_e), 3*h_e, h_e^2*(1.5 - 6*λ_e);
        -6, 3*h_e, 6, 3*h_e;
        -3*h_e, h_e^2*(1.5 - 6*λ_e), 3*h_e, h_e^2*(1.5 + 6*λ_e)
    ]
    return R
F_tim_gl :=
    dim ← 2*max(EL[:, 2], EL[:, 3])
    for i ∈ 1 .. dim
        R[i] ← 0
    for el ∈ 1 .. rows(EL)
        Fel ← F_tim_el(h_e)
        for i ∈ 1 .. 2
            1
            for i_v ∈ 1 .. 2
                R[(EL[el, i + 1] - 1)*2 + i_v] ← R[(EL[el, i + 1] - 1)*2 + i_v] + Fel[(i - 1)*2 + i_v]
    return R
K_tim_gl :=
    dim ← 2*max(EL[:, 2], EL[:, 3])
    for i ∈ 1 .. dim
        for j ∈ 1 .. dim
            R[i, j] ← 0
    for el ∈ 1 .. rows(EL)
        Kel ← K_tim_el(E, G_v, I, A_red, h_e)
        for i ∈ 1 .. 2
            for j ∈ 1 .. 2
                1
                for i_v ∈ 1 .. 2
                    for j_v ∈ 1 .. 2
                        R[(EL[el, i + 1] - 1)*2 + i_v, (EL[el, j + 1] - 1)*2 + j_v] ← R[(EL[el, i + 1] - 1)*2 + i_v, (EL[el, j + 1] - 1)*2 + j_v] + Kel[(i - 1)*2 + i_v, (j - 1)*2 + j_v]
    return R
u_tim := transpose(U)*(U*K_tim_gl*transpose(U))^-1*U*F_tim_gl
X :=
    N_solm ← max(EL[:, 2], EL[:, 3])
    for i ∈ 1 .. N_solm
        R[i] ← h_e*(i - 1)
    return R
U_tim_MC :=
    N_solm ← max(EL[:, 2], EL[:, 3])
    for i ∈ 1 .. N_solm
        R[i] ← u_tim[2*i - 1]
    return R
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