E := 210000  # MPa
h_e := 300
q := -3
w(x) == a*x^2 + b*x + c
a*0^2 + b*0 + c == 0
w(0) == w[1]
a*(h_e/2)^2 + b*(h_e/2) + c == w[c]
w(h_e/2) == w[c]
s := 0, 50 .. h_e
w(h_e) == w[2]
a*h_e^2 + b*h_e + c == w[2]
I := 2*(2^3*100/12 + 100*2*49^2)
W := [-sqrt(3/5), 5/9; 0, 8/9; sqrt(3/5), 5/9]
[0, 0, 1; (h_e/2)^2, (h_e/2), 1; h_e, h_e, 1]*[a; b; c] == [w[1]; w[c]; w[2]]
I = 960533
[a; b; c] == [0, 0, 1; (h_e/2)^2, (h_e/2), 1; h_e, h_e, 1]^-1*[w[1]; w[c]; w[2]]
[a; b; c] == [2*w[1]/h_e^2 + 2*w[2]/h_e - 4*w[c]/h_e^2; 2*w[1]/h_e^2 - 2*w[2]/h_e - 4*w[c]/h_e^2; w[1]]
w(x) == w1 + 2*w[1]*x^2/h_e^2 + 2*w[2]*x^2/h_e - 4*w[c]*x^2/h_e^2 - 3*w[1]*x/h_e - w[2]/h_e + 4*w[c]*x/h_e
w1*(2*x^2/h_e^2 - 3*x/h_e + 1) + (4*x/h_e - 4*x^2/h_e^2)*w[c] - w[2]*(x/h_e - 2*x^2/h_e^2)
N[1] == 2*x^2/h_e^2 - 3*x/h_e + 1
N[2] == 4*x/h_e - 4*x^2/h_e^2
N[3] == x/h_e - 2*x^2/h_e^2
Nψ[1] == 1 - h_e/2
Nψ[2] == h_e/2
integral((1 - h_e/2)*G*A*K_s*(h_e/2), h_e = 0 .. h_e)
ϕ(i, h_e, x) :=
    R ← 2*x^3/h_e^3 - 3*x^2/h_e^2 + 1 if i == 1
    R ← 2*x^2/h_e - x^3/h_e^2 - x if i == 2
    R ← 3*x^2/h_e^2 - 2*x^3/h_e^3 if i == 3
    R ← x^2/h_e - x^3/h_e^2 if i == 4
    return R
ddϕ(i, h_e, x) :=
    R ← 12*x/h_e^3 - 6/h_e^2 if i == 1
    R ← 4/h_e - 6*x/h_e^2 if i == 2
    R ← 6/h_e^2 - 12*x/h_e^3 if i == 3
    R ← 2/h_e - 6*x/h_e^2 if i == 4
    return R
dddϕ(i, h_e, x) :=
    R ← 12/h_e^3 if i == 1
    R ← -6/h_e^2 if i == 2
    R ← -12/h_e^3 if i == 3
    R ← -6/h_e^2 if i == 4
    return R
K_el(E, I, h_e) :=
    λ_e ← E*I/(G_y*A_red)
    μ_0 ← □
    R ← 2*E*I/(μ_0*h_e)*[
        6, -3*h_e, -6, -3*h_e;
        -3*h_e, h_e^2*(1.5 + 6*Λ_e), 3*h_e, h_e^2*(1.5 - 6*Λ_e);
        -6, 3*h_e, 6, 3*h_e;
        -3*h_e, h_e^2*(1.5 - 6*Λ_e), 3*h_e, h_e^2*(1.5 + 6*Λ_e)
    ]
    return R  # error: This placeholder is empty.
F_el(h_e) :=
    for i ∈ 1 .. 4
        R[i] ← 0
    for inte ∈ 1 .. rows(W)
        x_a ← 0
        x_b ← h_e
        x ← 1/2*(x_a + x_b + W[inte, 1]*(x_b - x_a))
        for i ∈ 1 .. 4
            R[i] ← R[i] + W[inte, 2]*ϕ(i, h_e, x)*q*(x_b - x_a)/2
    return R
