# 9.
a == d/dx(v)
a == 4*x - 2
v[0] == 4
dv == a*dx
x == 2
v
integral(1, v = v[o] == 4 .. v) == integral(4*x - 2, x = x[0] == 0 .. x == 2)
v - v[0] == 2*x^2 - 2*x
v - 4 == 4*2^2/2 - 2*2
v == 2^3 - 2^2 + 4
v == 2*x^2 - 2*x + v[0]
v == 2*x(x - 1) + 4
v := 8
14.
a == d/dt(v)
t == 10
x == 30
dv == a*dt
v == 5*v[0]
a
# -?
integral(1, v = v[o] .. v == 5*v[0]) == integral(a, t = t[0] == 0 .. t == 10)
3 == 5*v[0]
4*v[0] == a*10
v[0] := 3/5 = 0.6
a := 4/10*v[0] = 0.24
v == dx/dt
dx == v*dt
integral(1, x = x[0] == 0 .. x == 30) == integral(v, t = t[0] == 0 .. t == 10)
30 - 0 == v*(10 - 0)
v == 30/10 == 3
28.
y[0] := 300
a[y] == dv[y]/dt == a == dv/dt == -g
# 1)
v[0] == 5
dv[y] == -g*dt
a == -g
# 2)
v[0] == -5
# 3)
integral(1, v = v[0] .. v[y]) == integral(-g, t = t[0] == 0 .. t)
v[0] == 0
v[y] - v[0] == -g*t
# t -?
v[y] == v[0] - g*t
v[y] == dy/dt == v[0] - g*t
dy == (v[0] - g*t)*dt
integral(1, y = y[0] == 300 .. y == 0) == integral(v[0] - g*t, t = t[0] == 0 .. t)
0 - 300 == v[0]*t - g*t^2/2
# 1)
0 - 300 == 5*t - g*t^2/2  # 2)
0 - 300 == -5*t - g*t^2/2
g*t^2/2 - 5*t - 300 == 0
g*t^2/2 + 5*t - 300 == 0
t[1] == 8.34825
t[1] == -8.34825
t[2] == -7.32857
t[2] == 7.32857
# 3)
g*t^2/2 - 300 == 0
t == 7.82181
31.
x[0] == 0
a[y] == dv[y]/dt == -g
x == 30
y == 0
integral(1, v = v[0] .. v[y]) == integral(-g, t = t[0] == 0 .. t)
t == 0.4
a == -g
v[y] - v[0] == -g*t
v[0] == 0
v[y] == v[0] - g*t
(y[0])
# θ - ?
v[y] == dy/dt == v[0] - g*t
dy == (v[0] - g*t)*dt
dy == (v[0] - g*t)*dt
integral(1, y = y[0] .. y == 0) == integral(v[0] - g*t, t = t[0] == 0 .. t)
y - y[0] == v[0]*t - g*t^2/2
0 - y[0] == -g*0.4^2/2
y[0] == -g*0.4^2/2
y[0] == 0.7848
tan(θ) == 0.7848/0.3
θ := atan(0.7848/0.3) = 69.08 deg
15.
y[1] == 20
integral(1, y = y[1] == (20 + y) .. y == 0) == integral(v[0] - g*t, t = t[0] == 0 .. t == t + 0.5)
t == 0.5
a == -g
0 - (20 + y) == -g*(t + 0.5)^2/2
integral(1, y = y[1] == 20 .. y == 0) == integral(-(v[0] - g*t), t = t[0] == 0.5 .. t == 0)
17.
y[0] == 1960
integral(1, y = y[1] == 1960 .. y == 0) == integral(v[0] - g*t, t = t[0] == 0 .. t)
y == 0
a == -g
0 - 1960 == -g*t^2/2
t := sqrt(1960*2/g) = 19.9932 s/m^(1/2)
h == 19^2*g/2 == 1770.1635
1960 - 1770.1635 = 189.836
