# Worksheet setting: ORIGIN = 1
# Siim  Erik Pugal
# 179411YAFB
# KODUTÖÖ 1
# Varda pikideformatsioonide kirjeldamine Galjorkini meetodiga
# Lähteandmed:
# Tala pikkus: | Tala materjali elastsusmoodul: | Tala ristlõikepindala:
L := 2000  # mm
E := 12*10^3  # MPa
A := 250  # mm^2
# Talale mõjuvad pikikoormused:
f1 := 8  # kN/m
f2 := 2  # kN/m
f(x) := -3*x/1000 + 8
1  # kN/m
# =
1  # N/mm
# Tulemuste saamiseks kasutan koordinaatfunktsioone (niisuguste funktsioonide süsteem {fn}, mille
# lineaarkombinatsioonina konstrueeritakse otsitavat funktsiooni).
# Aproksimatsiooni tegemiseks kasutan nelja koordinaatfunktsiooni ehk n on 1-st 4-ni.
ϕ(n, x) := cos((2*n - 1)*x/L*π/2)
# Leian teise tuletise x-i järgi: | Defineerin vastava vahemiku:
d2ϕ(n, x) := -1*cos((2*n - 1)*x/L*π/2)*((2*n - 1)/L*π/2)^2
s := 0, 100 .. L
# Koostan koordinaatfunktsionide graafikud:
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# Moodustan jäikusmaatriksi [K] ja jõuvektori {F}:
K :=
    for i ∈ 1 .. 4
        for j ∈ 1 .. 4
            R[i, j] ← 0
    for i ∈ 1 .. 4
        for j ∈ 1 .. 4
            R[i, j] ← integral(ϕ(i, x)*E*A*d2ϕ(j, x), x = 0 .. L)
    return R
F :=
    for i ∈ 1 .. 4
        R[i] ← 0
    for i ∈ 1 .. 4
        R[i] ← -integral(ϕ(i, x)*f(x), x = 0 .. L)
    return R
K = [-1850.55, 0, 0, 0; 0, -16655, 0, 0; 0, 0, -46263.8, 0; 0, 0, 0, -90677]
F = [-7409.9; 308.447; -703.832; 264.529]
# Leian võrrandisüsteemist [K]*{c}={F} konstandid:
c := K^-1*F
c = [4.00416; -0.0185198; 0.0152135; -0.00291727]
# Lahend Galjorkini meetodiga: | Analüütiline lahend:
U(x) :=
    R ← 0
    for i ∈ 1 .. 4
        R ← R + c[i]*ϕ(i, x)
    return R
U_a(x) := -1/(E*A)*(-3/1000*x^3/6 + 8*x^2/2 + (-1)*12*10^6)
# Graafik:
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