# *******************************************Ülesanne 1****************************************************
Algandmed
# ********************************************Ülesanne 2*************************************************
# 1) | diameetrid meetritesse | Algandmed:
F_kN := [65; 20; 8]
d_mm := [24; 26; 29]
d := 0.001*d_mm = [0.024; 0.026; 0.029]
b := 10  # cm
h := 15  # cm
F := 8  # kN
M := 19  # kNm
p := 19
# kN /m
l := 1  # m
Q_z := p*l + F = 27  # kN
M_y := -M - p*l/2 - Q_z = -55.5  # kNm
N_kN :=
    for i ∈ 1 .. 3
        R[i - 1] ← 0
    for i ∈ 1 .. 3
        R[i] ← R[i - 1] + F_kN[i - 1]
    return R
I_y := b*0.01*(h*0.01)^3/12 = 2.8125e-5  # m^4
# Muudan arvutamiseks paremale kujule
N_kN = [0; 65; 85; 93]  # Paindepinge:
σ_x := |M_y|/I_y*h/2*1/10^5 = 148  # MPa
A := b*h*10^-4 = 0.015  # m^2
N :=
    for i ∈ 0 .. 2
        R[i] ← 0
    for i ∈ 1 .. 3
        R[i - 1] ← N_kN[i]*10^3
    return R
# Pikijõudude väärtused
# njuutonites
max_τ_xz := 3*Q_z/(2.*A*1000) = 2.7  # MPa
N = [65000; 85000; 93000]
A_m2 :=
    for i ∈ 0 .. 2
        R[i] ← 0
    for i ∈ 0 .. 2
        R[i] ← π*d[i]^2/4
    return R
# Torude ristlõigete pindalad
A_m2 = [0.000452389; 0.000530929; 0.00066052]
σ_MPa :=
    for i ∈ 0 .. 2
        R[i] ← 0
    for i ∈ 0 .. 2
        R[i] ← 10^-6*N[i]/A_m2[i]
    return R
σ_MPa = [143.682; 160.097; 140.798]  # Pikipinged
# 2)
σ_max := 160  # MPa  # Pikipingete maatriksist võetud max väärtus
d_min_mm :=
    for i ∈ 0 .. 2
        R[i] ← 0
    for i ∈ 0 .. 2
        R[i] ← sqrt(4*N[i]/(π*σ_max))
    return R
# /
# {  <----Vastused
# \
d_min_mm = [22.7432; 26.0079; 27.2042]
# ********************************************Ülesanne 2*********************************************************
# I | -tala jama: | IPE nr: 270
h := 200  # mm
W_y := 194  # cm^3
# Tabelist võetud väärtused
b := 100  # mm
I_y := 1943  # cm^4
t_w := 5.6  # mm
t_f := 8.5  # mm
A_1 := b*t_f = 850
l := h - 2*t_f = 183
A_2 := (h - 2*t_f)/2*t_w = 512.4
y_2 := l/2/2 = 45.75
y_1 := h/2 - t_f/2 = 95.75
max_σ_x := M_y*10^3/(W_y*10^-6) = -286082474  # N/m^2
S_y := A_1*y_1 + A_2*y_2 = 104830
max_τ_xz := Q_z*S_y*10^-9*10^3/(I_y*10^-8*t_w*10^-3) = 26012835  # N/m^2
max_τ_xz*10^-6 = 26.0128  # MPa
# <---  Lõppvastus  --->
max_σ_x*10^-6 = -286.082
