# Worksheet setting: ORIGIN = 1
# Leida siirded kõikides sõlmedes
EL := READPRN("solmed.txt")
dim := max(EL[:, 2], EL[:, 3])
dim = 5
EL = [1, 2, 3, 6; 2, 1, 2, 2; 3, 2, 4, 6; 4, 4, 5, 3; 5, 3, 5, 4; 6, 1, 5, 5]
EL[:, 1] = [1; 2; 3; 4; 5; 6]
K_el(k) := [k, -k; -k, k]
K_gl :=
    dim ← max(EL[:, 2], EL[:, 3])
    for i ∈ 1 .. dim
        for j ∈ 1 .. dim
            R[i, j] ← 0
    for el ∈ 1 .. rows(EL)
        k ← EL[el, 4]
        Kel ← K_el(k)
        for i ∈ 1 .. 2
            for j ∈ 1 .. 2
                R[EL[el, i + 1], EL[el, j + 1]] ← R[EL[el, i + 1], EL[el, j + 1]] + Kel[i, j]
        1
    return R
F_gl :=
    dim ← max(EL[:, 2], EL[:, 3])
    for i ∈ 1 .. dim
        R[i] ← 0
    R[2] ← -100
    return R
F_gl = [0; -100; 0; 0; 0]
K_gl = [7, -2, 0, 0, -5; -2, 14, -6, -6, 0; 0, -6, 10, 0, -4; 0, -6, 0, 9, -3; -5, 0, -4, -3, 12]
K_gl^-1*F_gl = [1.1259e17; 1.1259e17; 1.1259e17; 1.1259e17; 1.1259e17]
K_gl^-1 = [
    -1.1259e15, -1.1259e15, -1.1259e15, -1.1259e15, -1.1259e15;
    -1.1259e15, -1.1259e15, -1.1259e15, -1.1259e15, -1.1259e15;
    -1.1259e15, -1.1259e15, -1.1259e15, -1.1259e15, -1.1259e15;
    -1.1259e15, -1.1259e15, -1.1259e15, -1.1259e15, -1.1259e15;
    -1.1259e15, -1.1259e15, -1.1259e15, -1.1259e15, -1.1259e15
]
n := [5]
K1_gl :=
    dim ← max(EL[:, 2], EL[:, 3])
    for i ∈ 1 .. dim
        for j ∈ 1 .. dim
            R[i, j] ← 0
    R[5, 5] ← 10000
    return R
(K_gl + K1_gl)^-1*F_gl = [-4.91196; -17.1669; -10.3041; -11.4479; -0.01]
BOUND(n) :=
    dim_red ← rows(n)
    for j ∈ 1 .. dim
        for i ∈ 1 .. dim - dim_red
            R[i, j] ← 0
    ind ← 1
    s ← 0
    for k ∈ 1 .. dim
        if k ≠ n[ind]
            1
            R[k - s, k] ← 1
        if k == n[ind]
            ind ← ind + 1 if ind ≠ rows(n)
            s ← s + 1
        S[k] ← s
    return R
U := BOUND(n) = [1, 0, 0, 0, 0; 0, 1, 0, 0, 0; 0, 0, 1, 0, 0; 0, 0, 0, 1, 0]
U*K_gl*transpose(U) = [7, -2, 0, 0; -2, 14, -6, -6; 0, -6, 10, 0; 0, -6, 0, 9]
U*F_gl = [0; -100; 0; 0]
transpose(U)*U = [1, 0, 0, 0, 0; 0, 1, 0, 0, 0; 0, 0, 1, 0, 0; 0, 0, 0, 1, 0; 0, 0, 0, 0, 0]
u := transpose(U)*(U*K_gl*transpose(U))^-1*U*F_gl
u = [-4.90196; -17.1569; -10.2941; -11.4379; 0]
