# Worksheet setting: ORIGIN = 1
[0, 1; L_e, 1]
[-1/L_e, 1/L_e; 1, 0]*[u_1; u_2]
500/60 = 8.33333
[u_2/L_e - u_1/L_e; u_1]
integral((1 - x/L)^2, x = 0 .. L) = 0.333333 L
# Näiteülesanne - Siirded helikopteri rootoriteras
h_e := 1000
s := 0, 1 .. h_e
E := 210*10^3  # MPa
A := 6*150
L := 6*h_e
EL := READPRN("helikopter.txt")
W := [1, -1/sqrt(3); 1, 1/sqrt(3)]  # For reference
N(x, h_e, i) :=
    R ← 1 - x/h_e if i == 1
    R ← x/h_e if i == 2
    return R
dN(x, h_e, i) :=
    R ← -1/h_e if i == 1
    R ← 1/h_e if i == 2
    return R
INTE(x_a, x_b) :=
    R ← 0
    for i ∈ 1 .. rows(W)
        x ← 1/2*(x_a + x_b + W[i, 2]*(x_b - x_a))
        R ← R + W[i, 1]*f(x)
    return R  # error: This variable is undefined.
# Lihtsustamine:
# Komaga saab lisada lisafunktsioone
1/2*(0 + h_e + W[i, 2]*h_e)
1/2*(0 + h_e + 1*h_e)
h_e
W = [1, -0.57735; 1, 0.57735]
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0
dim := max(EL[:, 2], EL[:, 3])
K_el(E, A, h_e) :=
    for i ∈ 1 .. 2
        for j ∈ 1 .. 2
            R[i, j] ← 0
    for inte ∈ 1 .. rows(W)
        x_a ← 0
        x_b ← h_e
        x ← 1/2*(x_a + x_b + W[inte, 2]*(x_b - x_a))
        for i ∈ 1 .. 2
            for j ∈ 1 .. 2
                R[i, j] ← R[i, j] + E*A*W[inte, 1]*dN(x, h_e, i)*dN(x, h_e, j)*(x_b - x_a)/2
    return R
n := [1]
BOUND(n) :=
    dim_red ← rows(n)
    for j ∈ 1 .. dim
        for i ∈ 1 .. dim - dim_red
            R[i, j] ← 0
    ind ← 1
    s ← 0
    for k ∈ 1 .. dim
        if k ≠ n[ind]
            1
            R[k - s, k] ← 1
        if k == n[ind]
            ind ← ind + 1 if ind ≠ rows(n)
            s ← s + 1
        S[k] ← s
    return R
E*A/h_e = 189000
K_el(E, A, h_e) = [189000, -189000; -189000, 189000]
ρ := 7.8*10^-9
F.el(h_e, el) :=
    for i ∈ 1 .. 2
        R[i] ← 0
    q_1 ← A*ρ*8.33^2*4*π^2*(el - 1)*h_e
    q_2 ← A*ρ*8.33^2*4*π^2*el*h_e
    for inte ∈ 1 .. rows(W)
        x_a ← 0
        x_b ← h_e
        x ← 1/2*(x_a + x_b + W[inte, 2]*(x_b - x_a))
        for i ∈ 1 .. 2
            R[i] ← R[i] + W[inte, 1]*N(x, h_e, i)*(q_1 + (q_2 - q_1)/h_e*x)*(x_b - x_a)/2
    1
    1
    return R
K_gl :=
    dim ← max(EL[:, 2], EL[:, 3])
    for i ∈ 1 .. dim
        for j ∈ 1 .. dim
            R[i, j] ← 0
    for el ∈ 1 .. 6
        Kel ← K_el(E, A, h_e)
        for i ∈ 1 .. 2
            for j ∈ 1 .. 2
                R[EL[el, i + 1], EL[el, j + 1]] ← R[EL[el, i + 1], EL[el, j + 1]] + Kel[i, j]
    return R
U := BOUND(n) = [
    0, 1, 0, 0, 0, 0, 0;
    0, 0, 1, 0, 0, 0, 0;
    0, 0, 0, 1, 0, 0, 0;
    0, 0, 0, 0, 1, 0, 0;
    0, 0, 0, 0, 0, 1, 0;
    0, 0, 0, 0, 0, 0, 1
]
F_gl :=
    dim ← max(EL[:, 2], EL[:, 3])
    for i ∈ 1 .. dim
        R[i] ← 0
    for el ∈ 1 .. 6
        F_el ← F.el(h_e, el)
        for i ∈ 1 .. 2
            R[EL[el, i + 1]] ← R[EL[el, i + 1]] + F_el[i]
    return R
F_gl = [3205.06; 19230.3; 38460.7; 57691; 76921.3; 96151.7; 54485.9]
m := A*h_e*ρ
a := 4*π^2*8.33^2*(2000 + 1000)/2
a*m = 28845.5
m = 0.00702
a = 4109046
1.282*10^4 + 1.603*10^4 = 28850
F.el(h_e, 2) = [12820.2; 16025.3]
K_gl = [
    189000, -189000, 0, 0, 0, 0, 0;
    -189000, 378000, -189000, 0, 0, 0, 0;
    0, -189000, 378000, -189000, 0, 0, 0;
    0, 0, -189000, 378000, -189000, 0, 0;
    0, 0, 0, -189000, 378000, -189000, 0;
    0, 0, 0, 0, -189000, 378000, -189000;
    0, 0, 0, 0, 0, -189000, 189000
]
U*K_gl*transpose(U) = [
    378000, -189000, 0, 0, 0, 0;
    -189000, 378000, -189000, 0, 0, 0;
    0, -189000, 378000, -189000, 0, 0;
    0, 0, -189000, 378000, -189000, 0;
    0, 0, 0, -189000, 378000, -189000;
    0, 0, 0, 0, -189000, 189000
]
u := transpose(U)*(U*K_gl*transpose(U))^-1*U*F_gl = [0; 1.8145; 3.52726; 5.03652; 6.24053; 7.03756; 7.32584]
C := A*ρ*4*π^2*8.33^2
U(el, x) :=
    u_1 ← u[EL[el, 2]]
    u_2 ← u[EL[el, 3]]
    R ← u_1*N(x, h_e, 1) + u_2*N(x, h_e, 2)
    return R
σ(el, x) :=
    u_1 ← u[EL[el, 2]]
    u_2 ← u[EL[el, 3]]
    R ← E*u_1*dN(x, h_e, 1) + E*u_2*dN(x, h_e, 2)
    return R
u_a(x) := 1/(E*A)*(-C*x^3/6 + C*L^2/2*x)
σ_a(x) := 1/A*(-C*x^2/2 + C*L^2/2)
s := 0, 0.1 .. h_e
s1 := 0, 500 .. 6*h_e
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σ(2, s) =  # no stored result
(s + h_e) =  # no stored result
