# Worksheet setting: ORIGIN = 1
# Näiteülesanne - Siirded sillas
W := [1, -1/sqrt(3); 1, 1/sqrt(3)]
EL := READPRN("sorestiku_siirded.txt")
h_e := 1000
s := 0, 1 .. h_e
A := 7500
E := 10*10^3  # MPa
EL = [
    1, 1, 2, 0, 3000;
    2, 2, 3, 0, 3000;
    3, 3, 4, 0, 3000;
    4, 2, 5, -90, 1500;
    5, 5, 3, 26.57, 3354;
    6, 3, 6, -90, 3000;
    7, 3, 7, 45, 4243;
    8, 4, 7, -90, 3000;
    9, 1, 5, -26.57, 3354;
    10, 5, 6, -26.57, 3354;
    11, 6, 7, 0, 3000
]
dN(x, h_e, i) :=
    R ← -1/h_e if i == 1
    R ← 1/h_e if i == 2
    return R
N(x, h_e, i) :=
    R ← 1 - x/h_e if i == 1
    R ← x/h_e if i == 2
    return R
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W = [1, -0.57735; 1, 0.57735]
dim := max(EL[:, 2], EL[:, 3])*2
K_el(E, A, h_e) :=
    for i ∈ 1 .. 2
        for j ∈ 1 .. 2
            R[i, j] ← 0
    for inte ∈ 1 .. rows(W)
        x_a ← 0
        x_b ← h_e
        x ← 1/2*(x_a + x_b + W[inte, 2]*(x_b - x_a))
        for i ∈ 1 .. 2
            for j ∈ 1 .. 2
                R[i, j] ← R[i, j] + E*A*W[inte, 1]*dN(x, h_e, i)*dN(x, h_e, j)*(x_b - x_a)/2
    return R
dim = 14
n := [1; 2; 7; 13]
rows(EL) = 11
BOUND(n) :=
    dim_red ← rows(n)
    for j ∈ 1 .. dim
        for i ∈ 1 .. dim - dim_red
            R[i, j] ← 0
    ind ← 1
    s ← 0
    for k ∈ 1 .. dim
        if k ≠ n[ind]
            1
            R[k - s, k] ← 1
        if k == n[ind]
            ind ← ind + 1 if ind ≠ rows(n)
            s ← s + 1
        S[k] ← s
    return R
U := BOUND(n) = [
    0, 0, 1, 0, 0, 0, 0, 0, 0, 0, 0, 0, 0, 0;
    0, 0, 0, 1, 0, 0, 0, 0, 0, 0, 0, 0, 0, 0;
    0, 0, 0, 0, 1, 0, 0, 0, 0, 0, 0, 0, 0, 0;
    0, 0, 0, 0, 0, 1, 0, 0, 0, 0, 0, 0, 0, 0;
    0, 0, 0, 0, 0, 0, 0, 1, 0, 0, 0, 0, 0, 0;
    0, 0, 0, 0, 0, 0, 0, 0, 1, 0, 0, 0, 0, 0;
    0, 0, 0, 0, 0, 0, 0, 0, 0, 1, 0, 0, 0, 0;
    0, 0, 0, 0, 0, 0, 0, 0, 0, 0, 1, 0, 0, 0;
    0, 0, 0, 0, 0, 0, 0, 0, 0, 0, 0, 1, 0, 0;
    0, 0, 0, 0, 0, 0, 0, 0, 0, 0, 0, 0, 0, 1
]
E*A/h_e = 75000
K_el(E, A, h_e) = [75000, -75000; -75000, 75000]
ABI := [0, 1; 0, 0; 0, 1; 0, 0]
ABI*K_el(E, A, h_e)*transpose(ABI) = [75000, 0, 75000, 0; 0, 0, 0, 0; 75000, 0, 75000, 0; 0, 0, 0, 0]
ρ := 7.8*10^-9
F_el(h_e, el) :=
    for i ∈ 1 .. 2
        R[i] ← 0
    q_1 ← A*ρ*8.33^2*4*π^2*(el - 1)*h_e
    q_2 ← A*ρ*8.33^2*4*π^2*el*h_e
    for inte ∈ 1 .. rows(W)
        x_a ← 0
        x_b ← h_e
        x ← 1/2*(x_a + x_b + W[inte, 2]*(x_b - x_a))
        for i ∈ 1 .. 2
            R[i] ← R[i] + W[inte, 1]*N(x, h_e, i)*(q_1 + (q_2 - q_1)/h_e*x)*(x_b - x_a)/2
    1
    1
    return R
T(θ) := [cos(θ), sin(θ), 0, 0; -sin(θ), cos(θ), 0, 0; 0, 0, cos(θ), -sin(θ); 0, 0, sin(θ), cos(θ)]
K_gl :=
    dim ← 2*max(EL[:, 2], EL[:, 3])
    for i ∈ 1 .. dim
        for j ∈ 1 .. dim
            R[i, j] ← 0
    for el ∈ 1 .. rows(EL)
        h_e ← EL[el, 5]
        θ ← EL[el, 4]*π/180
        Te ← T(θ)
        Kel ← transpose(Te)*ABI*K_el(E, A, h_e)*transpose(ABI)*Te
        for i ∈ 1 .. 2
            for j ∈ 1 .. 2
                1
                for i_v ∈ 1 .. 2
                    for j_v ∈ 1 .. 2
                        R[(EL[el, i + 1] - 1)*2 + i_v, (EL[el, j + 1] - 1)*2 + j_v] ← R[(EL[el, i + 1] - 1)*2 + i_v, (EL[el, j + 1] - 1)*2 + j_v] + Kel[(i - 1)*2 + i_v, (j - 1)*2 + j_v]
    return R
K_gl = [
    42887.5, -8945.7, 25000, 0, 0, 0, 0, 0, 17887.5, 8945.7, 0, 0, 0, 0;
    -8945.7, 4473.82, 0, 0, 0, 0, 0, 0, -8945.7, -4473.82, 0, 0, 0, 0;
    25000, 0, 50000, 0, 25000, 0, 0, 0, 0, 0, 0, 0, 0, 0;
    0, 0, 0, 50000, 0, 0, 0, 0, 0, -50000, 0, 0, 0, 0;
    0, 0, 25000, 0, 76725.6, -107.616, 25000, 0, 17887.5, 8945.7, 0, 0, 8838.09, -8838.09;
    0, 0, 0, 0, -107.616, 38311.9, 0, 0, -8945.7, -4473.82, 0, -25000, 8838.09, -8838.09;
    0, 0, 0, 0, 25000, 0, 25000, 0, 0, 0, 0, 0, 0, 0;
    0, 0, 0, 0, 0, 0, 0, 25000, 0, 0, 0, 0, 0, -25000;
    17887.5, -8945.7, 0, 0, 17887.5, -8945.7, 0, 0, 53662.6, 8945.7, 17887.5, 8945.7, 0, 0;
    8945.7, -4473.82, 0, -50000, 8945.7, -4473.82, 0, 0, 8945.7, 63421.5, -8945.7, -4473.82, 0, 0;
    0, 0, 0, 0, 0, 0, 0, 0, 17887.5, -8945.7, 42887.5, 8945.7, 25000, 0;
    0, 0, 0, 0, 0, -25000, 0, 0, 8945.7, -4473.82, 8945.7, 29473.8, 0, 0;
    0, 0, 0, 0, 8838.09, 8838.09, 0, 0, 0, 0, 25000, 0, 33838.1, -8838.09;
    0, 0, 0, 0, -8838.09, -8838.09, 0, -25000, 0, 0, 0, 0, -8838.09, 33838.1
]
F_gl :=
    dim ← 2*max(EL[:, 2], EL[:, 3])
    for i ∈ 1 .. dim
        R[i] ← 0
    R[8] ← -500
    return R
U*K_gl*transpose(U) = [
    50000, 0, 25000, 0, 0, 0, 0, 0, 0, 0;
    0, 50000, 0, 0, 0, 0, -50000, 0, 0, 0;
    25000, 0, 76725.6, -107.616, 0, 17887.5, 8945.7, 0, 0, -8838.09;
    0, 0, -107.616, 38311.9, 0, -8945.7, -4473.82, 0, -25000, -8838.09;
    0, 0, 0, 0, 25000, 0, 0, 0, 0, -25000;
    0, 0, 17887.5, -8945.7, 0, 53662.6, 8945.7, 17887.5, 8945.7, 0;
    0, -50000, 8945.7, -4473.82, 0, 8945.7, 63421.5, -8945.7, -4473.82, 0;
    0, 0, 0, 0, 0, 17887.5, -8945.7, 42887.5, 8945.7, 0;
    0, 0, 0, -25000, 0, 8945.7, -4473.82, 8945.7, 29473.8, 0;
    0, 0, -8838.09, -8838.09, -25000, 0, 0, 0, 0, 33838.1
]
F_gl = [0; 0; 0; 0; 0; 0; 0; -500; 0; 0; 0; 0; 0; 0]
u := transpose(U)*(U*K_gl*transpose(U))^-1*U*F_gl = [0; 0; 0.0199971; -0.207628; -0.0399942; -0.303494; 0; -0.420062; 0.0479435; -0.207628; 0; -0.303494; 0; -0.400062]
L := 6*3000
I := 2*(150^3*50/12 + 150*50*1500^2)
F := 1000
F*L^3/(48*E*I) = 0.3597  # //Seega tomib
Al_Voo := READPRN("FEM_siirded_Alumine_voo.txt")
Ul_Voo := READPRN("FEM_siirded_Ulemine_voo.txt")
X := [
    0, u[2*(1 - 1) + 2], u[2*(1 - 1) + 2];
    3000, u[2*(2 - 1) + 2], u[2*(2 - 1) + 2];
    6000, u[2*(3 - 1) + 2], u[2*(3 - 1) + 2];
    9000, u[2*(4 - 1) + 2], u[2*(4 - 1) + 2];
    12000, u[2*(3 - 1) + 2], u[2*(3 - 1) + 2];
    15000, u[2*(2 - 1) + 2], u[2*(2 - 1) + 2];
    18000, u[2*(1 - 1) + 2], u[2*(1 - 1) + 2]
]
X[:, 2] = [0; -0.207628; -0.303494; -0.420062; -0.303494; -0.207628; 0]
X[:, 3] = [0; -0.207628; -0.303494; -0.420062; -0.303494; -0.207628; 0]
Al_Voo[:, 2] = [0; -0.204372; -0.303607; -0.393509; -0.303607; -0.204372; 0]
Ul_Voo[:, 2] = [0; -0.204372; -0.323607; -0.433509; -0.323607; -0.204372; 0]
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