# Worksheet setting: ORIGIN = 1
k := 300
L := 2000
E := 20*10^3
A := 10*10
f := 10
q := 10
N := 4
ϕ(i, x) := sin((2*i - 1)*x*π/(2*L))
s := 0, 0.1 .. L
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ddϕ(i, x) := -sin((2*i - 1)*x*π/(2*L))*((2*i - 1)*π/(2*L))^2
dϕ(i, x) := cos((2*i - 1)*x*π/(2*L))*((2*i - 1)*π/(2*L))
K :=
    for i ∈ 1 .. N
        for j ∈ 1 .. N
            R[i, j] ← integral(E*A*ϕ(i, x)*ddϕ(j, x), x = 0 .. L)
    return R
F :=
    for i ∈ 1 .. N
        R[i] ← integral(ϕ(i, x)*q, x = 0 .. L)
    return -R
F = [-12732.4; -4244.13; -2546.48; -1818.91]
K = [-1233.7, 0, 0, 0; 0, -11103.3, 0, 0; 0, 0, -30842.5, 0; 0, 0, 0, -60451.3]
c := K^-1*F
K1 :=
    for i ∈ 1 .. N
        for j ∈ 1 .. N
            R[i, j] ← ϕ(i, L)*(E*A*dϕ(j, L) + k*ϕ(j, L))
    return R
c = [10.3205; 0.38224; 0.0825639; 0.0300889]
U(x) :=
    R ← 0
    for i ∈ 1 .. N
        R ← R + c[i]*ϕ(i, x)
    return R
c1 := (K + K1)^-1*F
U1(x) :=
    R ← 0
    for i ∈ 1 .. N
        R ← R + c1[i]*ϕ(i, x)
    return R
c1 = [13.7178; 0.00476672; 0.218454; -0.039243]
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